# OpenSim document version 30000
Model 2018_Greyhound_Hindlimb_Model_Nominal:
  credits: Richard G. Ellis, Jeffery W. Rankin, and John R. Hutchinson
  length_units: meters
  force_units: N
  gravity: 0 0 -9.80665
  publications:
    Ellis, RG, Rankin, JW, and JR Hutchinson (2018). Limb kinematics, kinetics and muscle dynamics during the sit-to-stand transition in greyhounds. Frontiers in Bioengineering and Biotechnology
  defaults: Millard2012EquilibriumMuscle default: min_control=0.02 max_control=1 optimal_force=1 max_isometric_force=10
      optimal_fiber_length=0.1 tendon_slack_length=0.1 pennation_angle_at_optimal=0 [radians]
      max_contraction_velocity=12 fiber_damping=0.01 default_activation=0.05 activation_time_constant=0.01 [seconds]
      deactivation_time_constant=0.015 [seconds] minimum_activation=0.02
    ActiveForceLengthCurve: min_norm_active_fiber_length=0.4441 transition_norm_fiber_length=0.73
        max_norm_active_fiber_length=1.8123 shallow_ascending_slope=0.8616 minimum_value=0
    ForceVelocityCurve: concentric_slope_at_vmax=0 concentric_slope_near_vmax=0.25 isometric_slope=5
        eccentric_slope_at_vmax=0 eccentric_slope_near_vmax=0.15 max_eccentric_velocity_force_multiplier=1.4
        concentric_curviness=0.6 eccentric_curviness=0.9
    FiberForceLengthCurve: strain_at_zero_force=0 strain_at_one_norm_force=0.5
    TendonForceLengthCurve: strain_at_one_norm_force=0.049
  BodySet:
    Body ground: mass=0 mass_center=(0 0 0) inertia_xx=0 inertia_yy=0 inertia_zz=0
    Body: mass=16.56871 mass_center=(0.284999 0 -0.0964548) inertia_xx=0.01929596 inertia_yy=0.02179563
        inertia_zz=0.328794 meshes=PelvisTail.vtp
      CustomJoint GndtoBod: parent_body=ground location_in_parent=(0 0 0) location=(0 0 0)
        Coordinate Gnd_Rx: motion_type=rotational default_value=0 range=(-3.141593 3.141593) clamped=true
        Coordinate Gnd_Ry: motion_type=rotational default_value=0 range=(-3.141593 3.141593) clamped=true
        Coordinate Gnd_Rz: motion_type=rotational default_value=0 range=(-3.141593 3.141593) clamped=true
        Coordinate Gnd_Tx: motion_type=translational default_value=0 range=(-10 10) clamped=true
        Coordinate Gnd_Ty: motion_type=translational default_value=0 range=(-10 10) clamped=true
        Coordinate Gnd_Tz: motion_type=translational default_value=0.675 range=(-10 10) clamped=true
        SpatialTransform:
          TransformAxis rotation1: coordinates=Gnd_Rx axis=(1 0 0) LinearFunction(coefficients=1 0)
          TransformAxis rotation2: coordinates=Gnd_Ry axis=(0 1 0) LinearFunction(coefficients=1 0)
          TransformAxis rotation3: coordinates=Gnd_Rz axis=(0 0 1) LinearFunction(coefficients=1 0)
          TransformAxis translation1: coordinates=Gnd_Tx axis=(1 0 0) LinearFunction(coefficients=1 0)
          TransformAxis translation2: coordinates=Gnd_Ty axis=(0 1 0) LinearFunction(coefficients=1 0)
          TransformAxis translation3: coordinates=Gnd_Tz axis=(0 0 1) LinearFunction(coefficients=1 0)
      WrapEllipsoid GlutesVolume: xyz_body_rotation=(-0.239634 1.0279 2.90786) translation=(-0.0081 0.02268 -0.06075)
          quadrant=x dimensions=(0.02187 0.02187 0.0486)
      WrapCylinder Pelvis1: xyz_body_rotation=(1.45595 1.30481 -1.28788) translation=(-0.050382 0.033372 -0.085212)
          quadrant=x radius=0.00486 length=0.081
    Body Thigh: mass=2.247074 mass_center=(-0.0110538 0.0132379 -0.085917) inertia_xx=0.006729144 inertia_yy=0.00865053
        inertia_zz=0.004246072 inertia_xy=-0.0001037509 inertia_xz=-0.0004170511 inertia_yz=-0.0002060949
        meshes=(Femur.vtp Patella.vtp)
      CustomJoint Hip: parent_body=Body location_in_parent=(-0.02179143 0.03598182 -0.0810486) location=(0 0 0)
        Coordinate Hip_Rx: motion_type=rotational default_value=0 range=(-0.2617994 0.7853982) clamped=true
        Coordinate Hip_Ry: motion_type=rotational default_value=-0.523599 range=(-2.094395 0.610866) clamped=true
        Coordinate Hip_Rz: motion_type=rotational default_value=0 range=(-0.5235988 0.6981317) clamped=true
        SpatialTransform: axes_held_at_zero=(translation1 translation2 translation3)
          TransformAxis rotation1: coordinates=Hip_Rx axis=(1 0 0) LinearFunction(coefficients=1 0)
          TransformAxis rotation2: coordinates=Hip_Ry axis=(0 1 0) LinearFunction(coefficients=1 0)
          TransformAxis rotation3: coordinates=Hip_Rz axis=(0 0 1) LinearFunction(coefficients=1 0)
      WrapCylinder FemurShaft: xyz_body_rotation=(-0.0181514 -0.216421 -0.010821)
          translation=(0.008099 0.014596 -0.078142) quadrant=all radius=0.01068 length=0.1602
      WrapCylinder FemurNeck: xyz_body_rotation=(0.621337 0.026529 -0.476824) translation=(0.008455 0.018957 0.006764)
          quadrant=x radius=0.02225 length=0.267
      WrapCylinder Knee: xyz_body_rotation=(1.51285 -0.0965167 -2.60857) translation=(0.007565 0.014418 -0.17889)
          quadrant=y radius=0.02581 length=0.445
      WrapCylinder KneeBack: xyz_body_rotation=(1.5708 0 0) translation=(0.025365 0.007565 -0.166697) quadrant=-x
          radius=0.0623 length=0.267
      WrapEllipsoid KneeLateral: xyz_body_rotation=(0 0.937765 0) translation=(0.005073 0.011303 -0.147384)
          quadrant=all dimensions=(0.089 0.02937 0.0356)
      WrapEllipsoid FemurNeckSmall: xyz_body_rotation=(2.07136 -0.08029 -3.03251)
          translation=(-0.003026 0.002937 -0.004628) quadrant=x dimensions=(0.00979 0.03115 0.0089)
      WrapEllipsoid Ball: xyz_body_rotation=(-0.653626 1.41546 0.535467) translation=(-0.000712 0.000445 0.001424)
          quadrant=all dimensions=(0.01068 0.01068 0.01068)
      WrapCylinder FemurNeck2: xyz_body_rotation=(0.861145 0.0801106 -1.35804)
          translation=(-0.001691 0.01157 -0.005518) quadrant=all radius=0.00801 length=0.0267
      WrapCylinder CondylesSmall: xyz_body_rotation=(1.51146 -0.126536 -0.440172)
          translation=(-0.003115 0.007832 -0.189748) quadrant=-x radius=0.00979 length=0.089
      WrapCylinder CondylesLarge: xyz_body_rotation=(1.51146 -0.126536 -0.440172)
          translation=(-0.002848 0.00801 -0.188591) quadrant=-x radius=0.01424 length=0.089
      WrapEllipsoid SConstraint: xyz_body_rotation=(1.50657 -0.173137 3.08819)
          translation=(-0.024564 -0.092293 -0.004361) quadrant=x dimensions=(0.0267 0.0445 0.267)
    Body Shank: mass=0.3873093 mass_center=(-0.00375995 -0.00139855 -0.0739001) inertia_xx=0.0008116995
        inertia_yy=0.0008809105 inertia_zz=0.0001403822 inertia_xy=9.46461e-6 inertia_xz=4.583335e-5
        inertia_yz=-7.146019e-5 meshes=TibFib.vtp
      CustomJoint Knee: parent_body=Thigh location_in_parent=(0.00167498 0.01187438 -0.1855383) location=(0 0 0)
        Coordinate Knee_Rx: motion_type=rotational default_value=0 range=(-0.08727 0.08727) clamped=true locked=true
        Coordinate Knee_Ry: motion_type=rotational default_value=0.8726646 range=(0 2.356194) clamped=true
        Coordinate Knee_Rz: motion_type=rotational default_value=0 range=(-0.08727 0.08727) clamped=true locked=true
        SpatialTransform: axes_held_at_zero=(translation1 translation2 translation3)
          TransformAxis rotation1: coordinates=Knee_Rx axis=(1 0 0) LinearFunction(coefficients=1 0)
          TransformAxis rotation2: coordinates=Knee_Ry axis=(0 1 0) LinearFunction(coefficients=1 0)
          TransformAxis rotation3: coordinates=Knee_Rz axis=(0 0 1) LinearFunction(coefficients=1 0)
    Body Foot: mass=0.1529041 mass_center=(-0.0044194 -0.00938184 -0.065942) inertia_xx=0.0003920704
        inertia_yy=0.000383238 inertia_zz=2.362731e-5 inertia_xy=3.277273e-6 inertia_xz=1.200314e-5
        inertia_yz=-5.93156e-5 meshes=(Tarsals.vtp Toes.vtp)
      CustomJoint Ankle: parent_body=Shank location_in_parent=(0.00196232 -0.0151506 -0.197942) location=(0 0 0)
        Coordinate Ankle_Rx: motion_type=rotational default_value=0 range=(-0.08727 0.08727) clamped=true locked=true
        Coordinate Ankle_Ry: motion_type=rotational default_value=-0.7854 range=(-2.356194 -0.2618) clamped=true
        Coordinate Ankle_Rz: motion_type=rotational default_value=0 range=(-0.08727 0.08727) clamped=true locked=true
        SpatialTransform: axes_held_at_zero=(translation1 translation2 translation3)
          TransformAxis rotation1: coordinates=Ankle_Rx axis=(1 0 0) LinearFunction(coefficients=1 0)
          TransformAxis rotation2: coordinates=Ankle_Ry axis=(0 1 0) LinearFunction(coefficients=1 0)
          TransformAxis rotation3: coordinates=Ankle_Rz axis=(0 0 1) LinearFunction(coefficients=1 0)
  ForceSet:
    Millard2012EquilibriumMuscle GMed: max_isometric_force=723.3 optimal_fiber_length=0.03296675
        tendon_slack_length=0.02967007 pennation_angle_at_optimal=0.1745329 default_fiber_length=0.03296675
      PathPoint P1: Body (0.0110322 0.0297675 -0.028026)
      PathPoint P2: Thigh (-0.0031684 0.0291119 0.0059808)
      PathWrap: wrap_object=GlutesVolume method=hybrid range=(1 2)
    Millard2012EquilibriumMuscle GInt: max_isometric_force=128 optimal_fiber_length=0.0172982
        tendon_slack_length=0.005904675 pennation_angle_at_optimal=0.1396263 default_fiber_length=0.0172982
      PathPoint P1: Body (-0.0118341 0.0321408 -0.060183)
      PathPoint P2: Thigh (0.001424 0.0149164 0.0013172)
    Millard2012EquilibriumMuscle GSup: max_isometric_force=113 optimal_fiber_length=0.04233582
        tendon_slack_length=0.01169036 pennation_angle_at_optimal=0.3804818 default_fiber_length=0.04233582
      PathPoint P1: Body (-0.0339714 0.0175446 -0.0405648)
      PathPoint P2: Thigh (-0.0122731 0.0261215 0.0023229)
      PathWrap: wrap_object=GlutesVolume method=hybrid range=(1 2)
    Millard2012EquilibriumMuscle ObtExt: max_isometric_force=56.7 optimal_fiber_length=0.04219244
        tendon_slack_length=8.421645e-5 pennation_angle_at_optimal=0 default_fiber_length=0.04219244
      PathPoint P1: Body (-0.0468504 0.0345141 -0.0797121)
      PathPoint P2: Thigh (-0.0057761 0.0212977 -0.0037736)
      PathWrap: wrap_object=FemurNeckSmall method=hybrid
    Millard2012EquilibriumMuscle ObtInt: max_isometric_force=106 optimal_fiber_length=0.01915658
        tendon_slack_length=0.01856585 pennation_angle_at_optimal=0 default_fiber_length=0.01915658
      PathPoint P1: Body (-0.0381024 0.0203715 -0.0950292)
      PathPoint P2: Body (-0.0334935 0.0302373 -0.0917406)
      PathPoint P3: Thigh (-0.0068797 0.0211108 -0.0032752)
      PathWrap: wrap_object=Ball method=hybrid range=(2 3)
      PathWrap: wrap_object=FemurNeck2 method=hybrid range=(2 3)
    Millard2012EquilibriumMuscle AddBrev: max_isometric_force=103.3 optimal_fiber_length=0.02497939
        tendon_slack_length=0.006032437 pennation_angle_at_optimal=0.1164135 default_fiber_length=0.02497939
      PathPoint P1: Body (-0.0219672 0.0139077 -0.0988281)
      PathPoint P2: Thigh (-0.0049929 0.0042186 -0.0292187)
    Millard2012EquilibriumMuscle AddMag: max_isometric_force=423.3 optimal_fiber_length=0.1098672
        tendon_slack_length=0.01467825 pennation_angle_at_optimal=0 default_fiber_length=0.1098672
      PathPoint P1: Body (-0.0560763 0.0146043 -0.0987957)
      PathPoint P2: Thigh (0.0100748 0.0155839 -0.13876)
    Millard2012EquilibriumMuscle Pect: max_isometric_force=128 optimal_fiber_length=0.0159997
        tendon_slack_length=0.1223347 pennation_angle_at_optimal=0.2478368 default_fiber_length=0.0159997
      PathPoint P1: Body (-0.008019 0.0204849 -0.0913437)
      PathPoint P2: Thigh (0.0149075 0.0055981 -0.148434)
    Millard2012EquilibriumMuscle Sart: max_isometric_force=71.8 optimal_fiber_length=0.1736823
        tendon_slack_length=0.05036786 pennation_angle_at_optimal=0 default_fiber_length=0.1736823
      PathPoint P1: Body (0.048357 0.0458379 -0.0440154)
      PathPoint P2: Thigh (0.0391778 0.0010769 -0.147322)
      PathPoint P3: Thigh (0.0352796 0.0108936 -0.173755)
      PathPoint P4: Shank (0.0255816 -0.0044384 -0.0188936)
      PathWrap: wrap_object=FemurNeck method=hybrid
      PathWrap: wrap_object=Knee method=hybrid range=(3 4)
    Millard2012EquilibriumMuscle VL: max_isometric_force=348.4 optimal_fiber_length=0.06882895
        tendon_slack_length=0.1538581 pennation_angle_at_optimal=0.2234021 default_fiber_length=0.06882895
      PathPoint P1: Thigh (0.0011926 0.0270382 -0.0088911)
      PathPoint P2: Thigh (0.0193041 0.0327253 -0.0372643)
      PathPoint P3: Thigh (0.0246975 0.0299752 -0.0963781)
      PathPoint P4: Thigh (0.0293077 0.0227484 -0.144091)
      PathPoint P5: Thigh (0.0352796 0.0108936 -0.173755)
      PathPoint P6: Shank (0.0255816 -0.0044384 -0.0188936)
      PathWrap: wrap_object=Knee method=hybrid range=(5 6)
    Millard2012EquilibriumMuscle VM: max_isometric_force=187.8 optimal_fiber_length=0.07558107
        tendon_slack_length=0.149936 pennation_angle_at_optimal=0.2495821 default_fiber_length=0.07558107
      PathPoint P1: Thigh (0.0026255 0.0065415 -0.0115611)
      PathPoint P2: Thigh (0.0145604 -0.0030438 -0.0271005)
      PathPoint P3: Thigh (0.0232468 -0.0098879 -0.0639109)
      PathPoint P4: Thigh (0.0276434 -0.0103151 -0.0982916)
      PathPoint P5: Thigh (0.0242169 -0.0016287 -0.148861)
      PathPoint P6: Thigh (0.0352796 0.0108936 -0.173755)
      PathPoint P7: Shank (0.0255816 -0.0044384 -0.0188936)
      PathWrap: wrap_object=Knee method=hybrid range=(6 7)
    Millard2012EquilibriumMuscle RF: max_isometric_force=350.3 optimal_fiber_length=0.04843616
        tendon_slack_length=0.1880203 pennation_angle_at_optimal=0.2094395 default_fiber_length=0.04843616
      PathPoint P1: Body (-0.0084078 0.0360531 -0.0763668)
      PathPoint P2: Thigh (0.0307139 0.007565 -0.0123354)
      PathPoint P3: Thigh (0.0378962 0.00623 -0.0386349)
      PathPoint P4: Thigh (0.0381365 0.0123799 -0.138902)
      PathPoint P5: Thigh (0.0352796 0.0108936 -0.173755)
      PathPoint P6: Shank (0.0255816 -0.0044384 -0.0188936)
      PathWrap: wrap_object=Knee method=hybrid range=(5 6)
    Millard2012EquilibriumMuscle Sart2: max_isometric_force=17.2 optimal_fiber_length=0.2125375
        tendon_slack_length=0.005173326 pennation_angle_at_optimal=0 default_fiber_length=0.2125375
      PathPoint P1: Body (0.0446715 0.0435942 -0.0485757)
      PathPoint P2: Thigh (0.0208972 -0.0155661 -0.122028)
      PathPoint P3: Shank (0.004256 -0.0152228 -0.031578)
      PathWrap: wrap_object=KneeLateral method=hybrid
    Millard2012EquilibriumMuscle TFL1: max_isometric_force=388.9 optimal_fiber_length=0.02366234
        tendon_slack_length=0.2056266 pennation_angle_at_optimal=0.5585054 default_fiber_length=0.02366234
      PathPoint P1: Body (0.048681 0.0481221 -0.0295326)
      PathPoint P2: Body (0.0326025 0.0499527 -0.0578421)
      PathPoint P3: Thigh (0.0341569 0.0453752 -0.0664065)
      PathPoint P4: Thigh (0.0339891 0.0279549 -0.150161)
      PathPoint P5: Thigh (0.0368905 0.0109025 -0.176585)
    Millard2012EquilibriumMuscle IP: max_isometric_force=251.6 optimal_fiber_length=0.05229118
        tendon_slack_length=0.0405358 pennation_angle_at_optimal=0.2076942 default_fiber_length=0.05229118
      PathPoint P1: Body (0.0680643 0.0180225 -0.048114)
      PathPoint P2: Thigh (7.12e-5 0.0037024 -0.0182628)
      PathWrap: wrap_object=FemurShaft method=hybrid
      PathWrap: wrap_object=FemurNeck method=hybrid
    Millard2012EquilibriumMuscle QF: max_isometric_force=43.1 optimal_fiber_length=0.0417664
        tendon_slack_length=0.000577796 pennation_angle_at_optimal=0 default_fiber_length=0.0417664
      PathPoint P1: Body (-0.0668412 0.0385398 -0.0902421)
      PathPoint P2: Thigh (-0.0125401 0.015397 -0.0203899)
    Millard2012EquilibriumMuscle Gra: max_isometric_force=469.6 optimal_fiber_length=0.05256582
        tendon_slack_length=0.16828 pennation_angle_at_optimal=0 default_fiber_length=0.05256582
      PathPoint P1: Body (-0.064233 0.009558 -0.104927)
      PathPoint P2: Thigh (-0.0520383 -0.0231044 -0.112193)
      PathPoint P3: Shank (0.0033212 -0.01311 -0.0345496)
      PathPoint P4: Shank (0.023294 -0.0105792 -0.0406068)
    Millard2012EquilibriumMuscle ST: max_isometric_force=162.3 optimal_fiber_length=0.157307
        tendon_slack_length=0.05540912 pennation_angle_at_optimal=0 default_fiber_length=0.157307
      PathPoint P1: Body (-0.0651645 0.0526986 -0.0934335)
      PathPoint P2: Shank (0.003344 -0.016416 -0.0397936)
      PathPoint P3: Shank (0.02432 -0.009842 -0.0422256)
      PathWrap: wrap_object=SConstraint method=hybrid range=(1 2)
      PathWrap: wrap_object=KneeBack method=hybrid range=(1 2)
    Millard2012EquilibriumMuscle SM: max_isometric_force=228.7 optimal_fiber_length=0.1825891
        tendon_slack_length=0.00910369 pennation_angle_at_optimal=0 default_fiber_length=0.1825891
      PathPoint P1: Body (-0.0785538 0.0269892 -0.0991602)
      PathPoint P2: Shank (0.0066044 -0.0161272 -0.0254828)
      PathPoint P3: Shank (0.023636 -0.0083524 -0.032832)
      PathWrap: wrap_object=SConstraint method=hybrid range=(1 2)
    Millard2012EquilibriumMuscle BF1: max_isometric_force=279.5 optimal_fiber_length=0.1037464
        tendon_slack_length=0.1504323 pennation_angle_at_optimal=0 default_fiber_length=0.1037464
      PathPoint P1: Body (-0.0486567 0.0303831 -0.0729486)
      PathPoint P2: Body (-0.0546345 0.0455949 -0.0667359)
      PathPoint P3: Body (-0.0576801 0.0562707 -0.0693036)
      PathPoint P5: Thigh (0.007654 0.0510949 -0.0339179)
      PathPoint P6: Shank (0.002964 0.0177308 -0.0215916)
    Millard2012EquilibriumMuscle BF2: max_isometric_force=343.1 optimal_fiber_length=0.1047957
        tendon_slack_length=0.1619179 pennation_angle_at_optimal=0 default_fiber_length=0.1047957
      PathPoint P1: Body (-0.0486567 0.0303831 -0.0729486)
      PathPoint P2: Body (-0.0546345 0.0455949 -0.0667359)
      PathPoint P3: Body (-0.0576801 0.0562707 -0.0693036)
      PathPoint P5: Thigh (-0.0340959 0.0473124 -0.0200784)
      PathPoint P6: Shank (0.0003876 0.013338 -0.0565136)
    Millard2012EquilibriumMuscle FDS: max_isometric_force=863 optimal_fiber_length=0.03541371
        tendon_slack_length=0.1623255 pennation_angle_at_optimal=0.4939282 default_fiber_length=0.03541371
      PathPoint P1: Thigh (-0.0027768 0.0118103 -0.179175)
      PathPoint P2: Shank (-0.0145388 -0.005852 -0.118659)
      PathPoint P3: Foot (-0.0137748 0.0081822 0.0210366)
      PathWrap: wrap_object=CondylesSmall method=hybrid range=(1 2)
    Millard2012EquilibriumMuscle GasL: max_isometric_force=439.2 optimal_fiber_length=0.02363582
        tendon_slack_length=0.1866388 pennation_angle_at_optimal=0.4508185 default_fiber_length=0.02363582
      PathPoint P1: Thigh (0.0042275 0.0027412 -0.170542)
      PathPoint P2: Shank (-0.0237804 -0.0107844 -0.0548188)
      PathPoint P3: Shank (-0.0140372 -0.0059888 -0.118666)
      PathPoint P4: Foot (-0.0141258 0.0070122 0.0209664)
      PathWrap: wrap_object=CondylesLarge method=hybrid range=(1 2)
    Millard2012EquilibriumMuscle GasM: max_isometric_force=486.4 optimal_fiber_length=0.01688197
        tendon_slack_length=0.2002647 pennation_angle_at_optimal=0.4642576 default_fiber_length=0.01688197
      PathPoint P1: Thigh (0.0065059 0.023496 -0.17015)
      PathPoint P2: Shank (-0.0257944 0.0083068 -0.0565592)
      PathPoint P3: Shank (-0.0144856 -0.0067108 -0.118142)
      PathPoint P4: Foot (-0.0142428 0.0078858 0.0208494)
      PathWrap: wrap_object=CondylesLarge method=hybrid range=(1 2)
    Millard2012EquilibriumMuscle TibCran: max_isometric_force=56.56 optimal_fiber_length=0.08242663
        tendon_slack_length=0.09677497 pennation_angle_at_optimal=0.08726646 default_fiber_length=0.08242663
      PathPoint P1: Shank (0.020368 0.0009044 -0.027588)
      PathPoint P2: Shank (0.014554 -0.0108756 -0.119244)
      PathPoint P3: Shank (0.0168948 -0.0226404 -0.183441)
      PathPoint P4: Foot (-2.34e-5 -0.0159978 -0.0351624)
    Millard2012EquilibriumMuscle ExtDigLong: max_isometric_force=88.1 optimal_fiber_length=0.03945321
        tendon_slack_length=0.2348771 pennation_angle_at_optimal=0 default_fiber_length=0.03945321
      PathPoint P1: Shank (0.011742 0.0030476 -0.0268052)
      PathPoint P2: Shank (0.0121752 -0.0012996 -0.139088)
      PathPoint P3: Shank (0.0113392 -0.0074936 -0.189202)
      PathPoint P4: Foot (0.003627 -0.0005538 -0.019851)
      PathPoint P5: Foot (0.0061854 -0.0199602 -0.108896)
    Millard2012EquilibriumMuscle PerLong: max_isometric_force=60.1 optimal_fiber_length=0.01869662
        tendon_slack_length=0.1901714 pennation_angle_at_optimal=0 default_fiber_length=0.01869662
      PathPoint P1: Shank (0.0075544 0.0138472 -0.0237272)
      PathPoint P2: Shank (0.0046588 0.0095836 -0.0896192)
      PathPoint P3: Shank (0.0009272 -0.0034732 -0.194932)
      PathPoint P4: Foot (-0.0053196 0.0094692 -0.0117)
      PathPoint P5: Foot (-0.0080418 0.0060138 -0.033618)
    Millard2012EquilibriumMuscle ExtDigLat: max_isometric_force=24.5 optimal_fiber_length=0.009827253
        tendon_slack_length=0.2641842 pennation_angle_at_optimal=0.1745329 default_fiber_length=0.009827253
      PathPoint P1: Shank (-0.0008208 0.0105032 -0.02698)
      PathPoint P2: Shank (0.0036176 0.0042788 -0.088578)
      PathPoint P3: Shank (-0.0008588 -0.006118 -0.19225)
      PathPoint P4: Foot (-0.003666 0.0097968 0.0042198)
      PathPoint P5: Foot (-0.0020514 -0.002808 -0.101767)
    Millard2012EquilibriumMuscle FDP: max_isometric_force=550 optimal_fiber_length=0.01181936
        tendon_slack_length=0.2808249 pennation_angle_at_optimal=0.5410521 default_fiber_length=0.01181936
      PathPoint P1: Shank (-0.0043396 0.0065588 -0.0231648)
      PathPoint P2: Shank (-0.0024092 -0.0037164 -0.139027)
      PathPoint P3: Shank (0.0013756 -0.0001596 -0.194248)
      PathPoint P4: Foot (-0.007371 0.0073242 0.0020514)
      PathPoint P5: Foot (-0.012792 0.0085176 -0.0086034)
      PathPoint P6: Foot (-0.0038532 -0.0158418 -0.104863)
    ObjectGroup hip_abd: members=(GInt GMed GSup TFL1)
    ObjectGroup hip_flex: members=(AddMag GMed IP Pect RF Sart Sart2)
    ObjectGroup hip_inrot: members=(AddBrev AddMag BF1 BF2 GMed Gra Pect Sart)
    ObjectGroup hip: members=(AddBrev AddMag BF1 BF2 GInt GMed GSup Gra IP ObtExt ObtInt Pect QF RF SM ST Sart Sart2 TFL1)
    ObjectGroup hip_ext: members=(BF1 BF2 GSup Gra ObtInt SM ST)
    ObjectGroup hip_extrot: members=(GSup IP ObtExt ObtInt QF SM ST Sart2)
    ObjectGroup hip_add: members=(AddBrev AddMag Pect QF)
    ObjectGroup knee: members=(BF1 BF2 FDS GasL GasM Gra RF SM ST Sart Sart2 TFL1 VL VM)
    ObjectGroup knee_ext: members=(RF Sart Sart2 VL VM)
    ObjectGroup knee_flex: members=(BF1 BF2 GasL GasM Gra SM ST)
    ObjectGroup ank_ext: members=(ExtDigLat ExtDigLong FDP FDS GasL GasM PerLong)
    ObjectGroup ankle: members=(ExtDigLat ExtDigLong FDP FDS GasL GasM PerLong TibCran)
    ObjectGroup ank_flex: members=TibCran
    ObjectGroup ank_evert: members=PerLong
