# OpenSim document version 30000
Model Stark (2021) Spezzoo-scaled:
  credits: Stark, Fischer, Hunt, Young, Quinn, Andrada
  length_units: m
  force_units: N
  gravity: 0 0 -9.80665
  publications:
    Stark H, Fischer MS, Hunt A, Young F, Quinn R & Andrada E (2020) A three-dimensional musculoskeletal model of the dog. BioRxiv:2020.07.16.205856; DOI:10.1101/2020.07.16.205856
  BodySet:
    Body ground: mass=0 mass_center=(0 0 0) inertia_xx=0 inertia_yy=0 inertia_zz=0 meshes=box.obj
    Body thorax: mass=3.76044 mass_center=(0.00072 -0.05592 0.07968) inertia_xx=0.02419449 inertia_yy=0.01412704
        inertia_zz=0.02071164 inertia_xy=-4.268352e-5 inertia_xz=-0.0005064439 inertia_yz=-0.002620452
        meshes=new-thorax.obj
      CustomJoint ground_thorax: parent_body=ground location_in_parent=(0 0 0) location=(0 0 0)
        Coordinate thorax_sagittal: motion_type=rotational default_value=0.05235988 range=(-3.141593 3.141593)
            clamped=true locked=true
        Coordinate thorax_frontal: motion_type=rotational default_value=0 range=(-3.141593 3.141593) clamped=true
            locked=true
        Coordinate thorax_horizontal: motion_type=rotational default_value=0 range=(-3.141593 3.141593) clamped=true
            locked=true
        Coordinate thorax_transx: motion_type=translational default_value=0 range=(-100 100) clamped=true
        Coordinate thorax_transy: motion_type=translational default_value=-0.1 range=(-100 100) clamped=true
        Coordinate thorax_transz: motion_type=translational default_value=0.23 range=(-100 100) clamped=true
        SpatialTransform:
          TransformAxis rotation1: coordinates=thorax_sagittal axis=(1 0 0) LinearFunction(coefficients=1 0)
          TransformAxis rotation2: coordinates=thorax_frontal axis=(0 1 0) LinearFunction(coefficients=1 0)
          TransformAxis rotation3: coordinates=thorax_horizontal axis=(0 0 1) LinearFunction(coefficients=1 0)
          TransformAxis translation1: coordinates=thorax_transx axis=(1 0 0) LinearFunction(coefficients=1 0)
          TransformAxis translation2: coordinates=thorax_transy axis=(0 1 0) LinearFunction(coefficients=1 0)
          TransformAxis translation3: coordinates=thorax_transz axis=(0 0 1) LinearFunction(coefficients=1 0)
    Body cervix: mass=0.96876 mass_center=(0.00736 -0.07184 0.02824) inertia_xx=0.002023349 inertia_yy=0.0004808177
        inertia_zz=0.001758975 inertia_xy=3.892416e-6 inertia_xz=3.009536e-6 inertia_yz=0.0006972961
        meshes=new-cervix.obj
      CustomJoint thorax_cervix: parent_body=thorax location_in_parent=(0 -0.1736 0.064) location=(0 0 0)
        Coordinate cervix_sagittal: motion_type=rotational default_value=-0.1745329 range=(-1.570796 1.570796)
            clamped=true locked=true
        Coordinate cervix_frontal: motion_type=rotational default_value=0 range=(-1.570796 1.570796) clamped=true
            locked=true
        Coordinate cervix_horizontal: motion_type=rotational default_value=0 range=(-1.570796 1.570796) clamped=true
            locked=true
        SpatialTransform: axes_held_at_zero=(translation1 translation2 translation3)
          TransformAxis rotation1: coordinates=cervix_sagittal axis=(1 0 0) LinearFunction(coefficients=1 0)
          TransformAxis rotation2: coordinates=cervix_frontal axis=(0 1 0) LinearFunction(coefficients=1 0)
          TransformAxis rotation3: coordinates=cervix_horizontal axis=(0 0 1) LinearFunction(coefficients=1 0)
    Body caput: mass=1.27236 mass_center=(-0.000952 -0.072728 -0.013472) inertia_xx=0.003042448 inertia_yy=0.001807133
        inertia_zz=0.002124223 inertia_xy=-7.473286e-5 inertia_xz=-7.077779e-5 inertia_yz=-0.0008241376
        meshes=new-caput.obj
      CustomJoint cervix_caput: parent_body=cervix location_in_parent=(0.005592 -0.142 0.03324232) location=(0 0 0)
        Coordinate caput_sagittal: motion_type=rotational default_value=0 range=(-1.570796 1.570796) clamped=true
            locked=true
        Coordinate caput_frontal: motion_type=rotational default_value=0 range=(-1.570796 1.570796) clamped=true
            locked=true
        Coordinate caput_horizontal: motion_type=rotational default_value=0 range=(-1.570796 1.570796) clamped=true
            locked=true
        SpatialTransform: axes_held_at_zero=(translation1 translation2 translation3)
          TransformAxis rotation1: coordinates=caput_sagittal axis=(1 0 0) LinearFunction(coefficients=1 0)
          TransformAxis rotation2: coordinates=caput_frontal axis=(0 1 0) LinearFunction(coefficients=1 0)
          TransformAxis rotation3: coordinates=caput_horizontal axis=(0 0 1) LinearFunction(coefficients=1 0)
    Body abdomen: mass=3.76044 mass_center=(0.00304 0.08392 -0.00768) inertia_xx=0.009078297 inertia_yy=0.0009720602
        inertia_zz=0.008782928 inertia_xy=0.0002589337 inertia_xz=2.350656e-6 inertia_yz=0.001099507
        meshes=new-abdomen.obj
      CustomJoint thorax_abdomen: parent_body=thorax location_in_parent=(0 0.0384 0.12872) location=(0 0 0)
        Coordinate abdomen_sagittal: motion_type=rotational default_value=0 range=(-1.570796 1.570796) clamped=true
            locked=true
        Coordinate abdomen_frontal: motion_type=rotational default_value=0 range=(-1.570796 1.570796) clamped=true
            locked=true
        Coordinate abdomen_horizontal: motion_type=rotational default_value=0 range=(-1.570796 1.570796) clamped=true
            locked=true
        SpatialTransform: axes_held_at_zero=(translation1 translation2 translation3)
          TransformAxis rotation1: coordinates=abdomen_sagittal axis=(1 0 0) LinearFunction(coefficients=1 0)
          TransformAxis rotation2: coordinates=abdomen_frontal axis=(0 1 0) LinearFunction(coefficients=1 0)
          TransformAxis rotation3: coordinates=abdomen_horizontal axis=(0 0 1) LinearFunction(coefficients=1 0)
    Body cauda: mass=0.01 mass_center=(0.00696 0.08392 -0.0064) inertia_xx=0.0001330943 inertia_yy=3.779322e-5
        inertia_zz=9.938086e-5 inertia_xy=-1.166093e-5 inertia_xz=6.847232e-6 inertia_yz=4.939072e-5
        meshes=new-cauda.obj
      CustomJoint abdomen_cauda: parent_body=abdomen location_in_parent=(0 0.1648 -0.01032) location=(0 0 0)
        Coordinate cauda_sagittal: motion_type=rotational default_value=0 range=(-1.570796 1.570796) clamped=true
            locked=true
        Coordinate cauda_frontal: motion_type=rotational default_value=0 range=(-1.570796 1.570796) clamped=true
            locked=true
        Coordinate cauda_horizontal: motion_type=rotational default_value=0 range=(-1.570796 1.570796) clamped=true
            locked=true
        SpatialTransform: axes_held_at_zero=(translation1 translation2 translation3)
          TransformAxis rotation1: coordinates=cauda_sagittal axis=(1 0 0) LinearFunction(coefficients=1 0)
          TransformAxis rotation2: coordinates=cauda_frontal axis=(0 1 0) LinearFunction(coefficients=1 0)
          TransformAxis rotation3: coordinates=cauda_horizontal axis=(0 0 1) LinearFunction(coefficients=1 0)
    Body left_scapula: mass=0.272 mass_center=(0.001284 0.00231 0.002886) inertia_xx=0.0003326524
        inertia_yy=0.000274526 inertia_zz=9.304837e-5 inertia_xy=-1.400515e-5 inertia_xz=2.025691e-5
        inertia_yz=-4.341132e-5 meshes=new_stretched-scapula_l.obj
      CustomJoint thorax_left_scapula: parent_body=thorax location_in_parent=(0 0 0) location=(0 0 0)
        Coordinate left_r_m_superioris_sagittal: motion_type=rotational default_value=-0.1902409
            range=(-3.141593 3.141593) clamped=true
        Coordinate left_r_m_superioris_frontal: motion_type=rotational default_value=-0.04886922
            range=(-1.570796 1.570796) clamped=true
        Coordinate left_r_m_superioris_horizontal: motion_type=rotational default_value=-0.005235988
            range=(-1.570796 1.570796) clamped=true
        Coordinate left_r_m_superioris_transx: motion_type=translational default_value=0.06561 range=(-10 10)
            clamped=true locked=true
        Coordinate left_r_m_superioris_transy: motion_type=translational default_value=-0.183 range=(-10 10)
            clamped=true
        Coordinate left_r_m_superioris_transz: motion_type=translational default_value=0.11 range=(-10 10) clamped=true
        SpatialTransform:
          TransformAxis rotation1: coordinates=left_r_m_superioris_sagittal axis=(1 0 0)
              LinearFunction(coefficients=1 0)
          TransformAxis rotation2: coordinates=left_r_m_superioris_frontal axis=(0 1 0)
              LinearFunction(coefficients=1 0)
          TransformAxis rotation3: coordinates=left_r_m_superioris_horizontal axis=(0 0 1)
              LinearFunction(coefficients=1 0)
          TransformAxis translation1: coordinates=left_r_m_superioris_transx axis=(1 0 0)
              LinearFunction(coefficients=1 0)
          TransformAxis translation2: coordinates=left_r_m_superioris_transy axis=(0 1 0)
              LinearFunction(coefficients=1 0)
          TransformAxis translation3: coordinates=left_r_m_superioris_transz axis=(0 0 1)
              LinearFunction(coefficients=1 0)
    Body left_humerus: mass=0.36 mass_center=(0.002166 -0.00177 -0.037056) inertia_xx=0.0005132225
        inertia_yy=0.0005001182 inertia_zz=4.448441e-5 inertia_xy=4.9158e-6 inertia_xz=-2.505744e-6
        inertia_yz=3.101429e-5 meshes=new_stretched-humerus_l.obj
      CustomJoint left_scapula_left_humerus: parent_body=left_scapula location_in_parent=(0 0 -0.07079011)
          location=(0 0 0)
        Coordinate left_r_deltoidea_sagittal: motion_type=rotational default_value=0.9232792 range=(-3.141593 3.141593)
            clamped=true
        Coordinate left_r_deltoidea_frontal: motion_type=rotational default_value=-0.001745329
            range=(-1.570796 1.570796) clamped=true
        Coordinate left_r_deltoidea_horizontal: motion_type=rotational default_value=0.02443461
            range=(-1.570796 1.570796) clamped=true
        SpatialTransform: axes_held_at_zero=(translation1 translation2 translation3)
          TransformAxis rotation1: coordinates=left_r_deltoidea_sagittal axis=(1 0 0) LinearFunction(coefficients=1 0)
          TransformAxis rotation2: coordinates=left_r_deltoidea_frontal axis=(0 1 0) LinearFunction(coefficients=1 0)
          TransformAxis rotation3: coordinates=left_r_deltoidea_horizontal axis=(0 0 1)
              LinearFunction(coefficients=1 0)
      WrapCylinder left_humerus: xyz_body_rotation=(0 1.5708 0) translation=(0 0 0) quadrant=all radius=0.018
          length=0.06
    Body left_antebrachium: mass=0.118 mass_center=(0.002568 0.002952 -0.046602) inertia_xx=0.000179015
        inertia_yy=0.0001726534 inertia_zz=1.119953e-5 inertia_xy=1.045908e-6 inertia_xz=4.7988e-6
        inertia_yz=-1.712329e-5 meshes=new_stretched-antebrachium_l.obj
      CustomJoint left_humerus_left_antebrachium: parent_body=left_humerus location_in_parent=(0 0 -0.08775139)
          location=(0 0 0)
        Coordinate left_r_cubitalis_sagittal: motion_type=rotational default_value=-0.8656833
            range=(-3.141593 3.141593) clamped=true
        Coordinate left_r_cubitalis_frontal: motion_type=rotational default_value=0.07330383 range=(-1.570796 1.570796)
            clamped=true
        Coordinate left_r_cubitalis_horizontal: motion_type=rotational default_value=-0.01745329
            range=(-1.570796 1.570796) clamped=true locked=true
        SpatialTransform: axes_held_at_zero=(translation1 translation2 translation3)
          TransformAxis rotation1: coordinates=left_r_cubitalis_sagittal axis=(1 0 0) LinearFunction(coefficients=1 0)
          TransformAxis rotation2: coordinates=left_r_cubitalis_frontal axis=(0 1 0) LinearFunction(coefficients=1 0)
          TransformAxis rotation3: coordinates=left_r_cubitalis_horizontal axis=(0 0 1)
              LinearFunction(coefficients=1 0)
      WrapCylinder left_antebrachium: xyz_body_rotation=(0 1.5708 0) translation=(0 0 0) quadrant=all radius=0.0078
          length=0.06
    Body left_carpus: mass=0.0205 mass_center=(-0.00048 0.003498 -0.022638) inertia_xx=2.6005e-5 inertia_yy=3.017866e-5
        inertia_zz=7.797348e-6 inertia_xy=-2.51892e-7 inertia_xz=-1.178928e-6 inertia_yz=7.71624e-7
        meshes=(new_stretched-carpus_l.obj new_stretched-carpus_metacarpus_l.obj)
      CustomJoint left_antebrachium_left_carpus: parent_body=left_antebrachium location_in_parent=(0 0 -0.1158557)
          location=(0 0 0)
        Coordinate left_r_carpalis_sagittal: motion_type=rotational default_value=-0.6492625 range=(-3.141593 3.141593)
            clamped=true
        Coordinate left_r_carpalis_frontal: motion_type=rotational default_value=0.01396263 range=(-1.570796 1.570796)
            clamped=true locked=true
        Coordinate left_r_carpalis_horizontal: motion_type=rotational default_value=0.01396263
            range=(-1.570796 1.570796) clamped=true
        SpatialTransform: axes_held_at_zero=(translation1 translation2 translation3)
          TransformAxis rotation1: coordinates=left_r_carpalis_sagittal axis=(1 0 0) LinearFunction(coefficients=1 0)
          TransformAxis rotation2: coordinates=left_r_carpalis_frontal axis=(0 1 0) LinearFunction(coefficients=1 0)
          TransformAxis rotation3: coordinates=left_r_carpalis_horizontal axis=(0 0 1) LinearFunction(coefficients=1 0)
      WrapCylinder left_carpus: xyz_body_rotation=(0 1.5708 0) translation=(0 0 0) quadrant=all radius=0.006
          length=0.06
    Body left_forepaw: mass=0.0205 mass_center=(0.000102 0.002652 -0.01299) inertia_xx=3.786372e-6
        inertia_yy=6.527484e-6 inertia_zz=3.448332e-6 inertia_xy=-1.39356e-7 inertia_xz=-3.05676e-7
        inertia_yz=-4.3758e-7 meshes=new_stretched-digiti_manus_l.obj
      CustomJoint left_carpus_left_forepaw: parent_body=left_carpus location_in_parent=(0 0 -0.06017275)
          location=(0 0 0)
        Coordinate left_r_forepaw_sagittal: motion_type=rotational default_value=0 range=(-3.141593 3.141593)
            clamped=true
        Coordinate left_r_forepaw_frontal: motion_type=rotational default_value=0 range=(-1.570796 1.570796)
            clamped=true
        Coordinate left_r_forepaw_horizontal: motion_type=rotational default_value=0 range=(-1.570796 1.570796)
            clamped=true
        SpatialTransform: axes_held_at_zero=(translation1 translation2 translation3)
          TransformAxis rotation1: coordinates=left_r_forepaw_sagittal axis=(1 0 0) LinearFunction(coefficients=1 0)
          TransformAxis rotation2: coordinates=left_r_forepaw_frontal axis=(0 1 0) LinearFunction(coefficients=1 0)
          TransformAxis rotation3: coordinates=left_r_forepaw_horizontal axis=(0 0 1) LinearFunction(coefficients=1 0)
    Body right_scapula: mass=0.272 mass_center=(-0.001284 0.00231 0.002886) inertia_xx=0.0003326524
        inertia_yy=0.000274526 inertia_zz=9.304837e-5 inertia_xy=1.400515e-5 inertia_xz=-2.025691e-5
        inertia_yz=-4.341132e-5 meshes=new_stretched-scapula_r.obj
      CustomJoint thorax_right_scapula: parent_body=thorax location_in_parent=(0 0 0) location=(0 0 0)
        Coordinate right_r_m_superioris_sagittal: motion_type=rotational default_value=-0.1902409
            range=(-3.141593 3.141593) clamped=true locked=true
        Coordinate right_r_m_superioris_frontal: motion_type=rotational default_value=-0.04886922
            range=(-1.570796 1.570796) clamped=true locked=true
        Coordinate right_r_m_superioris_horizontal: motion_type=rotational default_value=-0.005235988
            range=(-1.570796 1.570796) clamped=true locked=true
        Coordinate right_r_m_superioris_transx: motion_type=translational default_value=-0.06561 range=(-10 10)
            clamped=true locked=true
        Coordinate right_r_m_superioris_transy: motion_type=translational default_value=-0.183 range=(-10 10)
            clamped=true locked=true
        Coordinate right_r_m_superioris_transz: motion_type=translational default_value=0.11 range=(-10 10)
            clamped=true locked=true
        SpatialTransform:
          TransformAxis rotation1: coordinates=right_r_m_superioris_sagittal axis=(1 0 0)
              LinearFunction(coefficients=1 0)
          TransformAxis rotation2: coordinates=right_r_m_superioris_frontal axis=(0 1 0)
              LinearFunction(coefficients=1 0)
          TransformAxis rotation3: coordinates=right_r_m_superioris_horizontal axis=(0 0 1)
              LinearFunction(coefficients=1 0)
          TransformAxis translation1: coordinates=right_r_m_superioris_transx axis=(1 0 0)
              LinearFunction(coefficients=1 0)
          TransformAxis translation2: coordinates=right_r_m_superioris_transy axis=(0 1 0)
              LinearFunction(coefficients=1 0)
          TransformAxis translation3: coordinates=right_r_m_superioris_transz axis=(0 0 1)
              LinearFunction(coefficients=1 0)
    Body right_humerus: mass=0.36 mass_center=(-0.002166 -0.00177 -0.037056) inertia_xx=0.0005132225
        inertia_yy=0.0005001182 inertia_zz=4.448441e-5 inertia_xy=-4.9158e-6 inertia_xz=2.505744e-6
        inertia_yz=3.101429e-5 meshes=new_stretched-humerus_r.obj
      CustomJoint right_scapula_right_humerus: parent_body=right_scapula location_in_parent=(0 0 -0.07079011)
          location=(0 0 0)
        Coordinate right_r_deltoidea_sagittal: motion_type=rotational default_value=0.9232792
            range=(-3.141593 3.141593) clamped=true locked=true
        Coordinate right_r_deltoidea_frontal: motion_type=rotational default_value=-0.001745329
            range=(-1.570796 1.570796) clamped=true locked=true
        Coordinate right_r_deltoidea_horizontal: motion_type=rotational default_value=0.02443461
            range=(-1.570796 1.570796) clamped=true locked=true
        SpatialTransform: axes_held_at_zero=(translation1 translation2 translation3)
          TransformAxis rotation1: coordinates=right_r_deltoidea_sagittal axis=(1 0 0) LinearFunction(coefficients=1 0)
          TransformAxis rotation2: coordinates=right_r_deltoidea_frontal axis=(0 1 0) LinearFunction(coefficients=1 0)
          TransformAxis rotation3: coordinates=right_r_deltoidea_horizontal axis=(0 0 1)
              LinearFunction(coefficients=1 0)
      WrapCylinder right_humerus: xyz_body_rotation=(0 1.5708 0) translation=(0 0 0) quadrant=all radius=0.018
          length=0.06
    Body right_antebrachium: mass=0.118 mass_center=(-0.002568 0.002952 -0.046602) inertia_xx=0.000179015
        inertia_yy=0.0001726534 inertia_zz=1.119953e-5 inertia_xy=-1.045908e-6 inertia_xz=-4.7988e-6
        inertia_yz=-1.712329e-5 meshes=new_stretched-antebrachium_r.obj
      CustomJoint right_humerus_right_antebrachium: parent_body=right_humerus location_in_parent=(0 0 -0.08775139)
          location=(0 0 0)
        Coordinate right_r_cubitalis_sagittal: motion_type=rotational default_value=-0.8656833
            range=(-3.141593 3.141593) clamped=true locked=true
        Coordinate right_r_cubitalis_frontal: motion_type=rotational default_value=0.07330383
            range=(-1.570796 1.570796) clamped=true locked=true
        Coordinate right_r_cubitalis_horizontal: motion_type=rotational default_value=-0.01745329
            range=(-1.570796 1.570796) clamped=true locked=true
        SpatialTransform: axes_held_at_zero=(translation1 translation2 translation3)
          TransformAxis rotation1: coordinates=right_r_cubitalis_sagittal axis=(1 0 0) LinearFunction(coefficients=1 0)
          TransformAxis rotation2: coordinates=right_r_cubitalis_frontal axis=(0 1 0) LinearFunction(coefficients=1 0)
          TransformAxis rotation3: coordinates=right_r_cubitalis_horizontal axis=(0 0 1)
              LinearFunction(coefficients=1 0)
      WrapCylinder right_antebrachium: xyz_body_rotation=(0 1.5708 0) translation=(0 0 0) quadrant=all radius=0.0078
          length=0.06
    Body right_carpus: mass=0.0205 mass_center=(0.00048 0.003498 -0.022638) inertia_xx=7.8336e-6 inertia_yy=9.090864e-6
        inertia_zz=2.34882e-6 inertia_xy=7.5888e-8 inertia_xz=3.5514e-7 inertia_yz=2.32452e-7
        meshes=(new_stretched-carpus_r.obj new_stretched-carpus_metacarpus_r.obj)
      CustomJoint right_antebrachium_right_carpus: parent_body=right_antebrachium location_in_parent=(0 0 -0.1158557)
          location=(0 0 0)
        Coordinate right_r_carpalis_sagittal: motion_type=rotational default_value=-0.6492625
            range=(-3.141593 3.141593) clamped=true locked=true
        Coordinate right_r_carpalis_frontal: motion_type=rotational default_value=0.01396263 range=(-1.570796 1.570796)
            clamped=true locked=true
        Coordinate right_r_carpalis_horizontal: motion_type=rotational default_value=0.01396263
            range=(-1.570796 1.570796) clamped=true locked=true
        SpatialTransform: axes_held_at_zero=(translation1 translation2 translation3)
          TransformAxis rotation1: coordinates=right_r_carpalis_sagittal axis=(1 0 0) LinearFunction(coefficients=1 0)
          TransformAxis rotation2: coordinates=right_r_carpalis_frontal axis=(0 1 0) LinearFunction(coefficients=1 0)
          TransformAxis rotation3: coordinates=right_r_carpalis_horizontal axis=(0 0 1)
              LinearFunction(coefficients=1 0)
      WrapCylinder right_carpus: xyz_body_rotation=(0 1.5708 0) translation=(0 0 0) quadrant=all radius=0.006
          length=0.06
    Body right_forepaw: mass=0.0205 mass_center=(-0.000102 0.002652 -0.01299) inertia_xx=3.786372e-6
        inertia_yy=6.527484e-6 inertia_zz=3.448332e-6 inertia_xy=1.39356e-7 inertia_xz=3.05676e-7 inertia_yz=-4.3758e-7
        meshes=new_stretched-digiti_manus_r.obj
      CustomJoint right_carpus_right_forepaw: parent_body=right_carpus location_in_parent=(0 0 -0.06017275)
          location=(0 0 0)
        Coordinate right_r_forepaw_sagittal: motion_type=rotational default_value=0 range=(-3.141593 3.141593)
            clamped=true locked=true
        Coordinate right_r_forepaw_frontal: motion_type=rotational default_value=0 range=(-1.570796 1.570796)
            clamped=true locked=true
        Coordinate right_r_forepaw_horizontal: motion_type=rotational default_value=0 range=(-1.570796 1.570796)
            clamped=true locked=true
        SpatialTransform: axes_held_at_zero=(translation1 translation2 translation3)
          TransformAxis rotation1: coordinates=right_r_forepaw_sagittal axis=(1 0 0) LinearFunction(coefficients=1 0)
          TransformAxis rotation2: coordinates=right_r_forepaw_frontal axis=(0 1 0) LinearFunction(coefficients=1 0)
          TransformAxis rotation3: coordinates=right_r_forepaw_horizontal axis=(0 0 1) LinearFunction(coefficients=1 0)
    Body pelvis: mass=0.544 mass_center=(0 0.004242 -0.044424) inertia_xx=0.0007641657 inertia_yy=0.001038943
        inertia_zz=0.0004085166 inertia_xy=-3.88404e-7 inertia_xz=7.154892e-6 inertia_yz=9.228902e-5
        meshes=new_stretched-pelvis.obj
      CustomJoint cauda_pelvis: parent_body=cauda location_in_parent=(0 0 0) location=(0 0 0)
        Coordinate m_inferioris_sagittal: motion_type=rotational default_value=0.5078908 range=(-3.141593 3.141593)
            clamped=true locked=true
        Coordinate m_inferioris_frontal: motion_type=rotational default_value=0 range=(-1.570796 1.570796) clamped=true
            locked=true
        Coordinate m_inferioris_horizontal: motion_type=rotational default_value=0 range=(-1.570796 1.570796)
            clamped=true locked=true
        Coordinate m_inferioris_transx: motion_type=translational default_value=0 range=(-100 100) clamped=true
            locked=true
        Coordinate m_inferioris_transy: motion_type=translational default_value=0 range=(-100 100) clamped=true
            locked=true
        Coordinate m_inferioris_transz: motion_type=translational default_value=0 range=(-100 100) clamped=true
            locked=true
        SpatialTransform:
          TransformAxis rotation1: coordinates=m_inferioris_sagittal axis=(1 0 0) LinearFunction(coefficients=1 0)
          TransformAxis rotation2: coordinates=m_inferioris_frontal axis=(0 1 0) LinearFunction(coefficients=1 0)
          TransformAxis rotation3: coordinates=m_inferioris_horizontal axis=(0 0 1) LinearFunction(coefficients=1 0)
          TransformAxis translation1: coordinates=m_inferioris_transx axis=(1 0 0) LinearFunction(coefficients=1 0)
          TransformAxis translation2: coordinates=m_inferioris_transy axis=(0 1 0) LinearFunction(coefficients=1 0)
          TransformAxis translation3: coordinates=m_inferioris_transz axis=(0 0 1) LinearFunction(coefficients=1 0)
    Body left_femur: mass=0.673 mass_center=(0.004494 -0.00177 -0.055716) inertia_xx=0.001119644 inertia_yy=0.00114248
        inertia_zz=9.050076e-5 inertia_xy=-4.632336e-6 inertia_xz=-0.0001188391 inertia_yz=-2.747995e-5
        meshes=new_stretched-femur_l.obj
      CustomJoint pelvis_left_femur: parent_body=pelvis location_in_parent=(0.033318 0 -0.0618) location=(0 0 0)
        Coordinate left_r_coxae_sagittal: motion_type=rotational default_value=-0.7819075 range=(-3.141593 3.141593)
            clamped=true locked=true
        Coordinate left_r_coxae_frontal: motion_type=rotational default_value=0.008726646 range=(-1.570796 1.570796)
            clamped=true locked=true
        Coordinate left_r_coxae_horizontal: motion_type=rotational default_value=0.001745329 range=(-1.570796 1.570796)
            clamped=true locked=true
        SpatialTransform: axes_held_at_zero=(translation1 translation2 translation3)
          TransformAxis rotation1: coordinates=left_r_coxae_sagittal axis=(1 0 0) LinearFunction(coefficients=1 0)
          TransformAxis rotation2: coordinates=left_r_coxae_frontal axis=(0 1 0) LinearFunction(coefficients=1 0)
          TransformAxis rotation3: coordinates=left_r_coxae_horizontal axis=(0 0 1) LinearFunction(coefficients=1 0)
      WrapCylinder left_femur: xyz_body_rotation=(0 1.5708 0) translation=(0 0 0) quadrant=all radius=0.0096
          length=0.06
    Body left_crus: mass=0.194 mass_center=(0.001806 0.001788 -0.063102) inertia_xx=0.0003159476
        inertia_yy=0.0003168089 inertia_zz=2.314724e-5 inertia_xy=-1.186344e-6 inertia_xz=1.00872e-5
        inertia_yz=3.425868e-6 meshes=new_stretched-crus_l.obj
      CustomJoint left_femur_left_crus: parent_body=left_femur location_in_parent=(0 0 -0.1022866) location=(0 0 0)
        Coordinate left_r_genus_sagittal: motion_type=rotational default_value=0.588176 range=(-3.141593 3.141593)
            clamped=true locked=true
        Coordinate left_r_genus_frontal: motion_type=rotational default_value=0.02792527 range=(-1.570796 1.570796)
            clamped=true locked=true
        Coordinate left_r_genus_horizontal: motion_type=rotational default_value=-0.006981317
            range=(-1.570796 1.570796) clamped=true locked=true
        SpatialTransform: axes_held_at_zero=(translation1 translation2 translation3)
          TransformAxis rotation1: coordinates=left_r_genus_sagittal axis=(1 0 0) LinearFunction(coefficients=1 0)
          TransformAxis rotation2: coordinates=left_r_genus_frontal axis=(0 1 0) LinearFunction(coefficients=1 0)
          TransformAxis rotation3: coordinates=left_r_genus_horizontal axis=(0 0 1) LinearFunction(coefficients=1 0)
      WrapCylinder left_crus: xyz_body_rotation=(0 1.5708 0) translation=(0 0 0) quadrant=all radius=0.012 length=0.06
    Body left_calx: mass=0.055 mass_center=(0.003576 0.005226 -0.029136) inertia_xx=4.636408e-5 inertia_yy=4.682236e-5
        inertia_zz=3.90294e-6 inertia_xy=1.82196e-7 inertia_xz=-2.186424e-6 inertia_yz=2.20716e-7
        meshes=(new_stretched-calx_l.obj new_stretched-calx_tarsus_l.obj new_stretched-calx_metatarsus_l.obj)
      CustomJoint left_crus_left_calx: parent_body=left_crus location_in_parent=(0 0 -0.1311185) location=(0 0 0)
        Coordinate left_r_talocruralis_sagittal: motion_type=rotational default_value=-1.050688
            range=(-3.141593 3.141593) clamped=true locked=true
        Coordinate left_r_talocruralis_frontal: motion_type=rotational default_value=0.05410521
            range=(-1.570796 1.570796) clamped=true locked=true
        Coordinate left_r_talocruralis_horizontal: motion_type=rotational default_value=0.04014257
            range=(-1.570796 1.570796) clamped=true locked=true
        SpatialTransform: axes_held_at_zero=(translation1 translation2 translation3)
          TransformAxis rotation1: coordinates=left_r_talocruralis_sagittal axis=(1 0 0)
              LinearFunction(coefficients=1 0)
          TransformAxis rotation2: coordinates=left_r_talocruralis_frontal axis=(0 1 0)
              LinearFunction(coefficients=1 0)
          TransformAxis rotation3: coordinates=left_r_talocruralis_horizontal axis=(0 0 1)
              LinearFunction(coefficients=1 0)
      WrapCylinder left_calx: xyz_body_rotation=(0 1.5708 0) translation=(0 0 0) quadrant=all radius=0.006 length=0.06
    Body left_hindpaw: mass=0.034 mass_center=(0.00189 -0.004242 -0.015822) inertia_xx=7.241832e-6
        inertia_yy=7.613604e-6 inertia_zz=5.657868e-6 inertia_xy=8.9316e-7 inertia_xz=-6.54264e-7
        inertia_yz=-2.170764e-6 meshes=new_stretched-digiti_pedis_l.obj
      CustomJoint left_calx_left_hindpaw: parent_body=left_calx location_in_parent=(0 0 -0.08059911) location=(0 0 0)
        Coordinate left_r_hindpaw_sagittal: motion_type=rotational default_value=0 range=(-3.141593 3.141593)
            clamped=true locked=true
        Coordinate left_r_hindpaw_frontal: motion_type=rotational default_value=0 range=(-1.570796 1.570796)
            clamped=true locked=true
        Coordinate left_r_hindpaw_horizontal: motion_type=rotational default_value=0 range=(-1.570796 1.570796)
            clamped=true locked=true
        SpatialTransform: axes_held_at_zero=(translation1 translation2 translation3)
          TransformAxis rotation1: coordinates=left_r_hindpaw_sagittal axis=(1 0 0) LinearFunction(coefficients=1 0)
          TransformAxis rotation2: coordinates=left_r_hindpaw_frontal axis=(0 1 0) LinearFunction(coefficients=1 0)
          TransformAxis rotation3: coordinates=left_r_hindpaw_horizontal axis=(0 0 1) LinearFunction(coefficients=1 0)
    Body right_femur: mass=0.673 mass_center=(-0.004494 -0.00177 -0.055716) inertia_xx=0.001119644
        inertia_yy=0.00114248 inertia_zz=9.050076e-5 inertia_xy=4.632336e-6 inertia_xz=0.0001188391
        inertia_yz=-2.747995e-5 meshes=new_stretched-femur_r.obj
      CustomJoint pelvis_right_femur: parent_body=pelvis location_in_parent=(-0.033318 0 -0.0618) location=(0 0 0)
        Coordinate right_r_coxae_sagittal: motion_type=rotational default_value=-0.7819075 range=(-3.141593 3.141593)
            clamped=true locked=true
        Coordinate right_r_coxae_frontal: motion_type=rotational default_value=0.008726646 range=(-1.570796 1.570796)
            clamped=true locked=true
        Coordinate right_r_coxae_horizontal: motion_type=rotational default_value=0.001745329
            range=(-1.570796 1.570796) clamped=true locked=true
        SpatialTransform: axes_held_at_zero=(translation1 translation2 translation3)
          TransformAxis rotation1: coordinates=right_r_coxae_sagittal axis=(1 0 0) LinearFunction(coefficients=1 0)
          TransformAxis rotation2: coordinates=right_r_coxae_frontal axis=(0 1 0) LinearFunction(coefficients=1 0)
          TransformAxis rotation3: coordinates=right_r_coxae_horizontal axis=(0 0 1) LinearFunction(coefficients=1 0)
      WrapCylinder right_femur: xyz_body_rotation=(0 1.5708 0) translation=(0 0 0) quadrant=all radius=0.0096
          length=0.06
    Body right_crus: mass=0.194 mass_center=(-0.001806 0.001788 -0.063102) inertia_xx=0.0003159476
        inertia_yy=0.0003168089 inertia_zz=2.314724e-5 inertia_xy=1.186344e-6 inertia_xz=-1.00872e-5
        inertia_yz=3.425868e-6 meshes=new_stretched-crus_r.obj
      CustomJoint right_femur_right_crus: parent_body=right_femur location_in_parent=(0 0 -0.1022866) location=(0 0 0)
        Coordinate right_r_genus_sagittal: motion_type=rotational default_value=0.588176 range=(-3.141593 3.141593)
            clamped=true locked=true
        Coordinate right_r_genus_frontal: motion_type=rotational default_value=0.02792527 range=(-1.570796 1.570796)
            clamped=true locked=true
        Coordinate right_r_genus_horizontal: motion_type=rotational default_value=-0.006981317
            range=(-1.570796 1.570796) clamped=true locked=true
        SpatialTransform: axes_held_at_zero=(translation1 translation2 translation3)
          TransformAxis rotation1: coordinates=right_r_genus_sagittal axis=(1 0 0) LinearFunction(coefficients=1 0)
          TransformAxis rotation2: coordinates=right_r_genus_frontal axis=(0 1 0) LinearFunction(coefficients=1 0)
          TransformAxis rotation3: coordinates=right_r_genus_horizontal axis=(0 0 1) LinearFunction(coefficients=1 0)
      WrapCylinder right_crus: xyz_body_rotation=(0 1.5708 0) translation=(0 0 0) quadrant=all radius=0.012 length=0.06
    Body right_calx: mass=0.055 mass_center=(-0.003576 0.005226 -0.029136) inertia_xx=4.636408e-5
        inertia_yy=4.682236e-5 inertia_zz=3.90294e-6 inertia_xy=-1.82196e-7 inertia_xz=2.186424e-6
        inertia_yz=2.20716e-7
        meshes=(new_stretched-calx_r.obj new_stretched-calx_tarsus_r.obj new_stretched-calx_metatarsus_r.obj)
      CustomJoint right_crus_right_calx: parent_body=right_crus location_in_parent=(0 0 -0.1311185) location=(0 0 0)
        Coordinate right_r_talocruralis_sagittal: motion_type=rotational default_value=-1.050688
            range=(-3.141593 3.141593) clamped=true locked=true
        Coordinate right_r_talocruralis_frontal: motion_type=rotational default_value=0.05410521
            range=(-1.570796 1.570796) clamped=true locked=true
        Coordinate right_r_talocruralis_horizontal: motion_type=rotational default_value=0.04014257
            range=(-1.570796 1.570796) clamped=true locked=true
        SpatialTransform: axes_held_at_zero=(translation1 translation2 translation3)
          TransformAxis rotation1: coordinates=right_r_talocruralis_sagittal axis=(1 0 0)
              LinearFunction(coefficients=1 0)
          TransformAxis rotation2: coordinates=right_r_talocruralis_frontal axis=(0 1 0)
              LinearFunction(coefficients=1 0)
          TransformAxis rotation3: coordinates=right_r_talocruralis_horizontal axis=(0 0 1)
              LinearFunction(coefficients=1 0)
      WrapCylinder right_calx: xyz_body_rotation=(0 1.5708 0) translation=(0 0 0) quadrant=all radius=0.006 length=0.06
    Body right_hindpaw: mass=0.034 mass_center=(-0.00189 -0.004242 -0.015822) inertia_xx=7.241832e-6
        inertia_yy=7.613604e-6 inertia_zz=5.657868e-6 inertia_xy=-8.9316e-7 inertia_xz=6.54264e-7
        inertia_yz=-2.170764e-6 meshes=new_stretched-digiti_pedis_r.obj
      CustomJoint right_calx_right_hindpaw: parent_body=right_calx location_in_parent=(0 0 -0.08059911)
          location=(0 0 0)
        Coordinate right_r_hindpaw_sagittal: motion_type=rotational default_value=0 range=(-3.141593 3.141593)
            clamped=true locked=true
        Coordinate right_r_hindpaw_frontal: motion_type=rotational default_value=0 range=(-1.570796 1.570796)
            clamped=true locked=true
        Coordinate right_r_hindpaw_horizontal: motion_type=rotational default_value=0 range=(-1.570796 1.570796)
            clamped=true locked=true
        SpatialTransform: axes_held_at_zero=(translation1 translation2 translation3)
          TransformAxis rotation1: coordinates=right_r_hindpaw_sagittal axis=(1 0 0) LinearFunction(coefficients=1 0)
          TransformAxis rotation2: coordinates=right_r_hindpaw_frontal axis=(0 1 0) LinearFunction(coefficients=1 0)
          TransformAxis rotation3: coordinates=right_r_hindpaw_horizontal axis=(0 0 1) LinearFunction(coefficients=1 0)
  ForceSet:
    Millard2012EquilibriumMuscle [values shared by the 43 below unless stated]: min_control=0.01
        minimum_activation=0.01
      ActiveForceLengthCurve: minimum_value=0
      ForceVelocityCurve: concentric_slope_at_vmax=0 concentric_slope_near_vmax=0.25 isometric_slope=5
          eccentric_slope_at_vmax=0 eccentric_slope_near_vmax=0.15 max_eccentric_velocity_force_multiplier=1.4
      FiberForceLengthCurve
      TendonForceLengthCurve
    Millard2012EquilibriumMuscle left_trapezius_cervical: max_isometric_force=44.33998 optimal_fiber_length=0.05388583
        tendon_slack_length=0.02989674 pennation_angle_at_optimal=0.1308997 [radians]
      PathPoint P1: left_scapula (0.0120927 -0.000372653 -0.00713411)
      PathPoint P2: cervix (0 -0.008232 0.055128)
    Millard2012EquilibriumMuscle left_trapezius_thoracic: max_isometric_force=58.83338 optimal_fiber_length=0.07792089
        tendon_slack_length=0.04045793 pennation_angle_at_optimal=0.1745329
      PathPoint P1: left_scapula (0.0107264 0.00149009 0.00485464)
      PathPoint P2: thorax (0.005056 -0.09432 0.1342)
    Millard2012EquilibriumMuscle left_rhomboideus_thoracic: max_isometric_force=58.90979
        optimal_fiber_length=0.05511376 tendon_slack_length=0.03925083 pennation_angle_at_optimal=0.1963495
      PathPoint P1: left_scapula (0.00171457 0.0284133 0.0225331)
      PathPoint P2: thorax (0.004864 -0.090216 0.131192)
    Millard2012EquilibriumMuscle left_rhomboideus_cervicis: max_isometric_force=101.7866
        optimal_fiber_length=0.03418772 tendon_slack_length=0.1231802 pennation_angle_at_optimal=0.2181662
      PathPoint P1: left_scapula (-0.0111266 0.0046287 0.0297755)
      PathPoint P2: cervix (-0.002192 -0.117216 0.068896)
    Millard2012EquilibriumMuscle left_latissimus_dorsi: max_isometric_force=125.1545 optimal_fiber_length=0.2696592
        tendon_slack_length=0.020918 pennation_angle_at_optimal=0
      PathPoint P1: thorax (-0.000672 0.059856 0.159496)
      PathPoint P2: left_scapula (-0.00725205 0.0146359 -0.0907174)
    Millard2012EquilibriumMuscle left_brachiocephalicus_1: max_isometric_force=18.46631 optimal_fiber_length=0.1716132
        tendon_slack_length=0.01035109 pennation_angle_at_optimal=0.01745329
      PathPoint P1: left_humerus (0.000982924 -0.00238699 -0.0449273)
      PathPoint P2: left_humerus (-0.00232117 -0.0130901 -0.0168433)
      PathPoint P3: cervix (4.8e-5 -0.092624 0.064912)
    Millard2012EquilibriumMuscle left_brachiocephalicus_2: max_isometric_force=18.46631 optimal_fiber_length=0.1333788
        tendon_slack_length=0.008044927 pennation_angle_at_optimal=0.01745329
      PathPoint P1: left_humerus (0.000982924 -0.00238699 -0.0449273)
      PathPoint P2: left_humerus (-0.00232117 -0.0130901 -0.0168433)
      PathPoint P3: cervix (0.019 -0.168696 0.04196)
      PathWrap: wrap_object=left_humerus method=hybrid
    Millard2012EquilibriumMuscle left_serratus_1: max_isometric_force=22.75595 optimal_fiber_length=0.07314116
        tendon_slack_length=0.04088361 pennation_angle_at_optimal=0.283616
      PathPoint P1: cervix (0.020992 -0.015088 -0.019296)
      PathPoint P2: left_scapula (-0.00341193 0.00218278 0.0148929)
    Millard2012EquilibriumMuscle left_serratus_2: max_isometric_force=22.75595 optimal_fiber_length=0.06361237
        tendon_slack_length=0.03555731 pennation_angle_at_optimal=0.283616
      PathPoint P1: cervix (0.015312 -0.040352 -0.020944)
      PathPoint P2: left_scapula (-0.0040998 -0.00324874 0.0153556)
    Millard2012EquilibriumMuscle left_serratus_3: max_isometric_force=22.75595 optimal_fiber_length=0.0565885
        tendon_slack_length=0.03163119 pennation_angle_at_optimal=0.283616
      PathPoint P1: cervix (0.016208 -0.060672 0.000672)
      PathPoint P2: left_scapula (-0.00403692 -0.00710478 0.0172955)
    Millard2012EquilibriumMuscle left_serratus_4: max_isometric_force=22.75595 optimal_fiber_length=0.06561298
        tendon_slack_length=0.03667559 pennation_angle_at_optimal=0.283616
      PathPoint P1: cervix (0.018064 -0.075368 0.016056)
      PathPoint P2: left_scapula (-0.00477845 -0.0141336 0.0164071)
    Millard2012EquilibriumMuscle left_serratus_5: max_isometric_force=22.75595 optimal_fiber_length=0.06031761
        tendon_slack_length=0.03371565 pennation_angle_at_optimal=0.283616
      PathPoint P1: cervix (0.020072 -0.087992 0.029432)
      PathPoint P2: left_scapula (-0.00458808 -0.00480647 0.0258528)
    Millard2012EquilibriumMuscle left_serratus_6: max_isometric_force=34.79929 optimal_fiber_length=0.07637813
        tendon_slack_length=0.08959824 pennation_angle_at_optimal=0.2617994
      PathPoint P1: thorax (0.059312 -0.014928 0.010992)
      PathPoint P2: left_scapula (0.00249136 0.0345499 0.0140166)
    Millard2012EquilibriumMuscle left_serratus_7: max_isometric_force=34.79929 optimal_fiber_length=0.07715941
        tendon_slack_length=0.09051475 pennation_angle_at_optimal=0.2617994
      PathPoint P1: thorax (0.05764 -0.039232 0.005192)
      PathPoint P2: left_scapula (2.43805e-5 0.0306235 0.0164238)
    Millard2012EquilibriumMuscle left_serratus_8: max_isometric_force=34.79929 optimal_fiber_length=0.06969429
        tendon_slack_length=0.08175751 pennation_angle_at_optimal=0.2617994
      PathPoint P1: thorax (0.045872 -0.066872 -0.004776)
      PathPoint P2: left_scapula (-0.00120345 0.0270356 0.0201191)
    Millard2012EquilibriumMuscle left_serratus_9: max_isometric_force=34.79929 optimal_fiber_length=0.06977395
        tendon_slack_length=0.08185096 pennation_angle_at_optimal=0.2617994
      PathPoint P1: thorax (0.044984 -0.093568 0.000472)
      PathPoint P2: left_scapula (-0.00205964 0.0227221 0.0230016)
    Millard2012EquilibriumMuscle left_serratus_10: max_isometric_force=34.79929 optimal_fiber_length=0.06504662
        tendon_slack_length=0.07630538 pennation_angle_at_optimal=0.2617994
      PathPoint P1: thorax (0.041384 -0.119952 0.00096)
      PathPoint P2: left_scapula (-0.00297863 0.0171507 0.026581)
    Millard2012EquilibriumMuscle left_serratus_11: max_isometric_force=34.79929 optimal_fiber_length=0.06071638
        tendon_slack_length=0.07122563 pennation_angle_at_optimal=0.2617994
      PathPoint P1: thorax (0.029456 -0.145112 0.004088)
      PathPoint P2: left_scapula (-0.00352288 0.0116003 0.0253069)
    Millard2012EquilibriumMuscle left_serratus_12: max_isometric_force=34.79929 optimal_fiber_length=0.04438181
        tendon_slack_length=0.05206376 pennation_angle_at_optimal=0.2617994
      PathPoint P1: thorax (0.026648 -0.16008 0.004824)
      PathPoint P2: left_scapula (-0.00305865 0.00760648 0.020104)
    Millard2012EquilibriumMuscle left_pectoralis_profundus: max_isometric_force=249.1519 optimal_fiber_length=0.1288121
        tendon_slack_length=0.03240556 pennation_angle_at_optimal=0
      PathPoint P1: left_humerus (-0.00328016 -0.00770669 0.00752647)
      PathPoint P2: thorax (0 -0.082736 -0.048344)
      PathWrap: wrap_object=left_humerus method=hybrid
    Millard2012EquilibriumMuscle left_pectoralis_superficialis: max_isometric_force=249.1519
        optimal_fiber_length=0.07254595 tendon_slack_length=0.02440182 pennation_angle_at_optimal=0
      PathPoint P1: left_humerus (-0.00186445 -0.00791108 -0.0158787)
      PathPoint P2: thorax (0 -0.158296 -0.041832)
      PathWrap: wrap_object=left_humerus method=hybrid
    Millard2012EquilibriumMuscle left_supraspinatus: max_isometric_force=280.2508 optimal_fiber_length=0.02715363
        tendon_slack_length=0.04538647 pennation_angle_at_optimal=0.4363323
      PathPoint P1: left_scapula (0.00295707 -0.00695781 -0.00361596)
      PathPoint P2: left_humerus (0.0023352 -0.00339214 0.0156681)
      PathWrap: wrap_object=left_humerus method=hybrid
    Millard2012EquilibriumMuscle left_infraspinatus: max_isometric_force=362.586 optimal_fiber_length=0.01821075
        tendon_slack_length=0.05851525 pennation_angle_at_optimal=0.4363323
      PathPoint P1: left_scapula (0.00705571 0.0116354 -0.00471776)
      PathPoint P2: left_humerus (0.00791748 -0.00125868 0.00996322)
      PathWrap: wrap_object=left_humerus method=hybrid
    Millard2012EquilibriumMuscle left_subscapularis: max_isometric_force=481.3196 optimal_fiber_length=0.01252204
        tendon_slack_length=0.05211907 pennation_angle_at_optimal=0.4363323
      PathPoint P1: left_scapula (-0.00111156 0.00654109 -0.00656437)
      PathPoint P2: left_humerus (-0.0106678 0.00827478 0.0114983)
      PathWrap: wrap_object=left_humerus method=hybrid
    Millard2012EquilibriumMuscle left_deltoideus_sca: max_isometric_force=91.32616 optimal_fiber_length=0.04466585
        tendon_slack_length=0.05028867 pennation_angle_at_optimal=0.1745329
      PathPoint P1: left_scapula (0.0106327 0.00231958 0.00276781)
      PathPoint P2: left_humerus (0.00778188 -0.00559766 -0.0137606)
      PathWrap: wrap_object=left_humerus method=hybrid
    Millard2012EquilibriumMuscle left_deltoideus_acr: max_isometric_force=135.5123 optimal_fiber_length=0.014374
        tendon_slack_length=0.03483592 pennation_angle_at_optimal=0.3490659
      PathPoint P1: left_scapula (0.015584 -0.00456802 -0.0529324)
      PathPoint P2: left_humerus (0.00595476 -0.00753914 -0.0190829)
    Millard2012EquilibriumMuscle left_teres_major: max_isometric_force=61.85755 optimal_fiber_length=0.08019299
        tendon_slack_length=0.02062105 pennation_angle_at_optimal=0
      PathPoint P1: left_scapula (0.00585099 0.0318374 0.00683635)
      PathPoint P2: left_humerus (-0.00638177 -0.00348489 -0.0173329)
      PathWrap: wrap_object=left_humerus method=hybrid
    Millard2012EquilibriumMuscle left_teres_minor: max_isometric_force=43.57018 optimal_fiber_length=0.01674552
        tendon_slack_length=0.02681166 pennation_angle_at_optimal=0.3490659
      PathPoint P1: left_scapula (0.00459329 0.0112262 -0.0337869)
      PathPoint P2: left_humerus (0.00835778 0.00247831 0.00414317)
      PathWrap: wrap_object=left_humerus method=hybrid
    Millard2012EquilibriumMuscle left_coracobrachialis: max_isometric_force=39.75015 optimal_fiber_length=0.01365679
        tendon_slack_length=0.0346751 pennation_angle_at_optimal=0.5235988
      PathPoint P1: left_scapula (-0.00490666 -0.00989613 -0.0550973)
      PathPoint P2: left_humerus (-0.00620509 -9.10141e-5 -0.0188406)
    Millard2012EquilibriumMuscle left_biceps_brachii: max_isometric_force=195.5912 optimal_fiber_length=0.03003431
        tendon_slack_length=0.1006347 pennation_angle_at_optimal=0.6108652
      PathPoint P1: left_scapula (0.000602721 -0.00861975 -0.0579155)
      PathPoint P2: left_antebrachium (-0.00666408 -0.00310528 -0.00825649)
      PathWrap: wrap_object=left_humerus method=hybrid
      PathWrap: wrap_object=left_antebrachium method=hybrid
    Millard2012EquilibriumMuscle left_brachialis: max_isometric_force=61.77082 optimal_fiber_length=0.03862982
        tendon_slack_length=0.06118035 pennation_angle_at_optimal=0.3490659
      PathPoint P1: left_scapula (0.00367262 0.00770834 -0.0768859)
      PathPoint P2: left_antebrachium (-0.00684555 -0.00399987 -0.00454734)
      PathPoint P3: left_antebrachium (-0.00491776 0.00698622 -0.0103273)
      PathWrap: wrap_object=left_humerus method=hybrid
      PathWrap: wrap_object=left_antebrachium method=hybrid
    Millard2012EquilibriumMuscle left_triceps_caput_longum: max_isometric_force=549.2491
        optimal_fiber_length=0.04126673 tendon_slack_length=0.07202293 pennation_angle_at_optimal=0.3665191
      PathPoint P1: left_scapula (0.00159621 0.00821027 -0.0407702)
      PathPoint P2: left_antebrachium (-0.00325284 0.0190248 0.0174313)
    Millard2012EquilibriumMuscle left_triceps_caput_laterale: max_isometric_force=249.1519
        optimal_fiber_length=0.03533623 tendon_slack_length=0.05588768 pennation_angle_at_optimal=0.04363323
      PathPoint P1: left_humerus (0.00793245 -0.00202338 -0.00693239)
      PathPoint P2: left_antebrachium (0.00256773 0.0180713 0.0094996)
      PathWrap: wrap_object=left_humerus method=hybrid
      PathWrap: wrap_object=left_antebrachium method=hybrid
    Millard2012EquilibriumMuscle left_triceps_caput_accessorium: max_isometric_force=73.27124
        optimal_fiber_length=0.0386866 tendon_slack_length=0.02571223 pennation_angle_at_optimal=0.04363323
      PathPoint P1: left_antebrachium (-0.00642134 0.0213328 0.0127927)
      PathPoint P2: left_humerus (0.00194568 0.0123181 0.00268911)
      PathWrap: wrap_object=left_humerus method=hybrid
      PathWrap: wrap_object=left_antebrachium method=hybrid
    Millard2012EquilibriumMuscle left_triceps_caput_medial: max_isometric_force=105.4605
        optimal_fiber_length=0.04089078 tendon_slack_length=0.06708711 pennation_angle_at_optimal=0.5235988
      PathPoint P1: left_antebrachium (-0.00834864 0.00497745 0.022476)
      PathPoint P2: left_humerus (-0.00682452 -0.00227785 -0.0163362)
      PathWrap: wrap_object=left_humerus method=hybrid
      PathWrap: wrap_object=left_antebrachium method=hybrid
    Millard2012EquilibriumMuscle left_anconeus: max_isometric_force=57.18379 optimal_fiber_length=0.004564519
        tendon_slack_length=0.01263809 pennation_angle_at_optimal=0.2617994
      PathPoint P1: left_humerus (0.00344181 0.0146259 -0.0919578)
      PathPoint P2: left_antebrachium (0.00469787 8.81052e-5 0.0169637)
      PathPoint P3: left_antebrachium (0.00453713 -0.00135422 0.0178816)
      PathWrap: wrap_object=left_humerus method=hybrid
      PathWrap: wrap_object=left_antebrachium method=hybrid
    Millard2012EquilibriumMuscle left_pronator_teres: max_isometric_force=67.88177 optimal_fiber_length=0.006858312
        tendon_slack_length=0.04723949 pennation_angle_at_optimal=0.6108652
      PathPoint P1: left_humerus (-0.0115644 0.00614089 -0.082519)
      PathPoint P2: left_antebrachium (-0.0113358 -0.00236206 0.00271904)
      PathPoint P3: left_antebrachium (-0.00613387 -0.00598231 -0.0375518)
      PathWrap: wrap_object=left_humerus method=hybrid
      PathWrap: wrap_object=left_antebrachium method=hybrid
    Millard2012EquilibriumMuscle left_supinator: max_isometric_force=11.99771 optimal_fiber_length=0.01880189
        tendon_slack_length=0.007611068 pennation_angle_at_optimal=0.4363323
      PathPoint P1: left_humerus (0.00769379 0.00165109 -0.0868466)
      PathPoint P2: left_antebrachium (0.00776686 -0.000622976 0.00177796)
      PathPoint P3: left_antebrachium (-0.000402406 -0.00464528 -0.021633)
      PathWrap: wrap_object=left_humerus method=hybrid
      PathWrap: wrap_object=left_antebrachium method=hybrid
    Millard2012EquilibriumMuscle left_flexor_carpi_radialis: max_isometric_force=57.46301
        optimal_fiber_length=0.04443958 tendon_slack_length=0.09697704 pennation_angle_at_optimal=0.2617994
      PathPoint P1: left_humerus (0.00675483 0.0104106 -0.0675552)
      PathPoint P2: left_antebrachium (-0.0037836 -0.0092042 -0.0400047)
      PathPoint P3: left_carpus (-0.00759015 -0.00351531 -0.00235988)
    Millard2012EquilibriumMuscle left_flexor_carpi_ulnaris: max_isometric_force=283.4406
        optimal_fiber_length=0.01436234 tendon_slack_length=0.1372139 pennation_angle_at_optimal=0.6108652
      PathPoint P1: left_humerus (0.00789163 0.00587925 -0.0879023)
      PathPoint P2: left_antebrachium (0.00522577 0.00969591 -0.0622282)
      PathPoint P3: left_carpus (0.00730292 0.0030747 -0.00107941)
      PathWrap: wrap_object=left_humerus method=hybrid
      PathWrap: wrap_object=left_antebrachium method=hybrid
      PathWrap: wrap_object=left_carpus method=hybrid
    Millard2012EquilibriumMuscle left_extensor_carpi_ulnaris: max_isometric_force=135.3576
        optimal_fiber_length=0.01076045 tendon_slack_length=0.1377574 pennation_angle_at_optimal=0.6108652
      PathPoint P1: left_carpus (-0.00490426 0.00822127 0.0150267)
      PathPoint P2: left_antebrachium (-0.00500162 0.015283 0.00280259)
      PathPoint P3: left_humerus (-0.00594031 0.0220563 -0.0852518)
      PathWrap: wrap_object=left_humerus method=hybrid
      PathWrap: wrap_object=left_antebrachium method=hybrid
      PathWrap: wrap_object=left_carpus method=hybrid
    Millard2012EquilibriumMuscle left_extensor_carpi_radialis: max_isometric_force=117.639
        optimal_fiber_length=0.03690693 tendon_slack_length=0.1162332 pennation_angle_at_optimal=0.5235988
      PathPoint P1: left_humerus (-0.0114776 0.0076573 -0.0857901)
      PathPoint P2: left_antebrachium (-0.0128341 -0.00143876 -0.0102583)
      PathPoint P3: left_carpus (-0.0125725 0.00565053 0.00219472)
      PathPoint P4: left_carpus (-0.00595736 0.00506516 -0.0157885)
      PathWrap: wrap_object=left_humerus method=hybrid
      PathWrap: wrap_object=left_antebrachium method=hybrid
      PathWrap: wrap_object=left_carpus method=hybrid
    Millard2012EquilibriumMuscle left_abductor_policis_longum: max_isometric_force=77.79716
        optimal_fiber_length=0.004349672 tendon_slack_length=0.06844812 pennation_angle_at_optimal=0.5235988
      PathPoint P1: left_carpus (-0.0150739 0.0051032 -0.00230261)
      PathPoint P2: left_carpus (-0.0151914 0.00154494 0.00253472)
      PathPoint P3: left_antebrachium (0.00191482 -0.000912305 -0.0592087)
      PathWrap: wrap_object=left_antebrachium method=hybrid
      PathWrap: wrap_object=left_carpus method=hybrid
    PointActuator FX: body=thorax point=(-0.034 0 0) point_is_global=false direction=(-1 0 0) force_is_global=true
        optimal_force=0.5
    PointActuator FY: body=thorax point=(-0.034 0 0) point_is_global=false direction=(0 -1 0) force_is_global=true
        optimal_force=0.5
    PointActuator FZ: body=thorax point=(-0.034 0 0) point_is_global=false direction=(0 0 -1) force_is_global=true
        optimal_force=0.5
    CoordinateActuator motor_left_r_m_superioris_sagittal: coordinate=left_r_m_superioris_sagittal optimal_force=5
    CoordinateActuator motor_left_r_m_superioris_frontal: coordinate=left_r_m_superioris_frontal optimal_force=5
    CoordinateActuator motor_left_r_m_superioris_horizontal: coordinate=left_r_m_superioris_horizontal optimal_force=5
    CoordinateActuator motor_left_r_m_superioris_transx: coordinate=left_r_m_superioris_transx optimal_force=1e-9
    CoordinateActuator motor_left_r_m_superioris_transy: coordinate=left_r_m_superioris_transy optimal_force=5e-5
    CoordinateActuator motor_left_r_m_superioris_transz: coordinate=left_r_m_superioris_transz optimal_force=0.5
    CoordinateActuator motor_right_r_m_superioris_sagittal: isDisabled=true coordinate=right_r_m_superioris_sagittal
        optimal_force=0
    CoordinateActuator motor_right_r_m_superioris_frontal: isDisabled=true coordinate=right_r_m_superioris_frontal
        optimal_force=0
    CoordinateActuator motor_right_r_m_superioris_horizontal: isDisabled=true
        coordinate=right_r_m_superioris_horizontal optimal_force=0
    CoordinateActuator motor_m_inferioris_sagittal: isDisabled=true coordinate=m_inferioris_sagittal optimal_force=0
    CoordinateActuator motor_m_inferioris_frontal: isDisabled=true coordinate=m_inferioris_frontal optimal_force=0
    CoordinateActuator motor_m_inferioris_horizontal: isDisabled=true coordinate=m_inferioris_horizontal
        optimal_force=0
    CoordinateActuator motor_left_r_coxae_sagittal: isDisabled=true coordinate=left_r_coxae_sagittal optimal_force=0
    CoordinateActuator motor_left_r_coxae_frontal: isDisabled=true coordinate=left_r_coxae_frontal optimal_force=0
    CoordinateActuator motor_left_r_coxae_horizontal: isDisabled=true coordinate=left_r_coxae_horizontal
        optimal_force=0
    CoordinateActuator motor_right_r_coxae_sagittal: isDisabled=true coordinate=right_r_coxae_sagittal optimal_force=0
    CoordinateActuator motor_right_r_coxae_frontal: isDisabled=true coordinate=right_r_coxae_frontal optimal_force=0
    CoordinateActuator motor_right_r_coxae_horizontal: isDisabled=true coordinate=right_r_coxae_horizontal
        optimal_force=0
    CoordinateActuator motor_right_r_genus_sagittal: isDisabled=true coordinate=right_r_genus_sagittal optimal_force=0
    CoordinateActuator motor_right_r_genus_frontal: isDisabled=true coordinate=right_r_genus_frontal optimal_force=0
    CoordinateActuator motor_right_r_genus_horizontal: isDisabled=true coordinate=right_r_genus_horizontal
        optimal_force=0
    CoordinateActuator motor_right_r_talocruralis_sagittal: isDisabled=true coordinate=right_r_talocruralis_sagittal
        optimal_force=0
    CoordinateActuator motor_right_r_talocruralis_frontal: isDisabled=true coordinate=right_r_talocruralis_frontal
        optimal_force=0
    CoordinateActuator motor_right_r_talocruralis_horizontal: isDisabled=true
        coordinate=right_r_talocruralis_horizontal optimal_force=0
    CoordinateActuator motor_right_r_hindpaw_sagittal: isDisabled=true coordinate=right_r_hindpaw_sagittal
        optimal_force=0
    CoordinateActuator motor_right_r_hindpaw_frontal: isDisabled=true coordinate=right_r_hindpaw_frontal
        optimal_force=0
    CoordinateActuator motor_right_r_hindpaw_horizontal: isDisabled=true coordinate=right_r_hindpaw_horizontal
        optimal_force=0
    CoordinateActuator motor_left_r_genus_sagittal: isDisabled=true coordinate=left_r_genus_sagittal optimal_force=0
    CoordinateActuator motor_left_r_genus_frontal: isDisabled=true coordinate=left_r_genus_frontal optimal_force=0
    CoordinateActuator motor_left_r_genus_horizontal: isDisabled=true coordinate=left_r_genus_horizontal
        optimal_force=0
    CoordinateActuator motor_left_r_talocruralis_sagittal: isDisabled=true coordinate=left_r_talocruralis_sagittal
        optimal_force=0
    CoordinateActuator motor_left_r_talocruralis_frontal: isDisabled=true coordinate=left_r_talocruralis_frontal
        optimal_force=0
    CoordinateActuator motor_left_r_talocruralis_horizontal: isDisabled=true coordinate=left_r_talocruralis_horizontal
        optimal_force=0
    CoordinateActuator motor_left_r_hindpaw_sagittal: isDisabled=true coordinate=left_r_hindpaw_sagittal
        optimal_force=0
    CoordinateActuator motor_left_r_hindpaw_frontal: isDisabled=true coordinate=left_r_hindpaw_frontal optimal_force=0
    CoordinateActuator motor_left_r_hindpaw_horizontal: isDisabled=true coordinate=left_r_hindpaw_horizontal
        optimal_force=0
    CoordinateActuator motor_right_r_deltoidea_sagittal: isDisabled=true coordinate=right_r_deltoidea_sagittal
        optimal_force=0
    CoordinateActuator motor_right_r_deltoidea_frontal: isDisabled=true coordinate=right_r_deltoidea_frontal
        optimal_force=0
    CoordinateActuator motor_right_r_deltoidea_horizontal: isDisabled=true coordinate=right_r_deltoidea_horizontal
        optimal_force=0
    CoordinateActuator motor_right_r_cubitalis_sagittal: isDisabled=true coordinate=right_r_cubitalis_sagittal
        optimal_force=0
    CoordinateActuator motor_right_r_cubitalis_frontal: isDisabled=true coordinate=right_r_cubitalis_frontal
        optimal_force=0
    CoordinateActuator motor_right_r_cubitalis_horizontal: isDisabled=true coordinate=right_r_cubitalis_horizontal
        optimal_force=0
    CoordinateActuator motor_right_r_carpalis_sagittal: isDisabled=true coordinate=right_r_carpalis_sagittal
        optimal_force=0
    CoordinateActuator motor_right_r_carpalis_frontal: isDisabled=true coordinate=right_r_carpalis_frontal
        optimal_force=0
    CoordinateActuator motor_right_r_carpalis_horizontal: isDisabled=true coordinate=right_r_carpalis_horizontal
        optimal_force=0
    CoordinateActuator motor_right_r_forepaw_sagittal: isDisabled=true coordinate=right_r_forepaw_sagittal
        optimal_force=0
    CoordinateActuator motor_right_r_forepaw_frontal: isDisabled=true coordinate=right_r_forepaw_frontal
        optimal_force=0
    CoordinateActuator motor_right_r_forepaw_horizontal: isDisabled=true coordinate=right_r_forepaw_horizontal
        optimal_force=0
    CoordinateActuator motor_left_r_deltoidea_sagittal: coordinate=left_r_deltoidea_sagittal optimal_force=0.0005
    CoordinateActuator motor_left_r_deltoidea_frontal: coordinate=left_r_deltoidea_frontal optimal_force=5
    CoordinateActuator motor_left_r_deltoidea_horizontal: coordinate=left_r_deltoidea_horizontal optimal_force=5
    CoordinateActuator motor_left_r_cubitalis_sagittal: coordinate=left_r_cubitalis_sagittal optimal_force=1
    CoordinateActuator motor_left_r_cubitalis_frontal: coordinate=left_r_cubitalis_frontal optimal_force=5
    CoordinateActuator motor_left_r_cubitalis_horizontal: coordinate=left_r_cubitalis_horizontal optimal_force=1e-9
    CoordinateActuator motor_left_r_carpalis_sagittal: coordinate=left_r_carpalis_sagittal optimal_force=5
    CoordinateActuator motor_left_r_carpalis_frontal: coordinate=left_r_carpalis_frontal optimal_force=1e-9
    CoordinateActuator motor_left_r_carpalis_horizontal: coordinate=left_r_carpalis_horizontal optimal_force=1
    CoordinateActuator motor_left_r_forepaw_sagittal: coordinate=left_r_forepaw_sagittal optimal_force=0.005
    CoordinateActuator motor_left_r_forepaw_frontal: coordinate=left_r_forepaw_frontal optimal_force=0.005
    CoordinateActuator motor_left_r_forepaw_horizontal: coordinate=left_r_forepaw_horizontal optimal_force=0.0005
    TorqueActuator MX: bodyA=thorax bodyB=ground torque_is_global=true axis=(-1 0 0) optimal_force=1e-9
    TorqueActuator MY: bodyA=thorax bodyB=ground torque_is_global=true axis=(0 -1 0) optimal_force=1e-9
    TorqueActuator MZ: bodyA=thorax bodyB=ground torque_is_global=true axis=(0 0 -1) optimal_force=1e-9
    ObjectGroup left_regio_thoracicae: members=(left_brachiocephalicus_1 left_brachiocephalicus_2 left_latissimus_dorsi left_pectoralis_profundus left_pectoralis_superficialis left_rhomboideus_cervicis left_rhomboideus_thoracic left_serratus_1 left_serratus_10 left_serratus_11 left_serratus_12 left_serratus_2 left_serratus_3 left_serratus_4 left_serratus_5 left_serratus_6 left_serratus_7 left_serratus_8 left_serratus_9 left_trapezius_cervical left_trapezius_thoracic)
    ObjectGroup left_regio_deltoidea: members=(left_coracobrachialis left_deltoideus_acr left_deltoideus_sca left_infraspinatus left_subscapularis left_supraspinatus left_teres_major left_teres_minor)
    ObjectGroup left_regio_brachialis: members=(left_anconeus left_biceps_brachii left_brachialis left_pronator_teres left_triceps_caput_accessorium left_triceps_caput_laterale left_triceps_caput_longum left_triceps_caput_medial)
    ObjectGroup left_regio_antebrachialis: members=(left_abductor_policis_longum left_extensor_carpi_radialis left_extensor_carpi_ulnaris left_flexor_carpi_radialis left_flexor_carpi_ulnaris left_supinator)
