# OpenSim document version 10902
Model Stark (2016) Spezzoo:
  force_units: N
  length_units: m
  gravity: 0 0 -9.80665
  defaults: Millard2012EquilibriumMuscle defaultmuscle: max_isometric_force=100 optimal_fiber_length=0.0535
      tendon_slack_length=0.078 pennation_angle=0 max_contraction_velocity=12
    tendon_force_length_curve: NaturalCubicSpline: x=(-10 -0.002 -0.001 0 0.00131 0.00281 0.00431 0.00581 0.00731 0.00881 0.0103 0.0118 0.0123 9.2 9.201 9.202 20)
        y=(0 0 0 0 0.0108 0.0257 0.0435 0.0652 0.0915 0.123 0.161 0.208 0.227 345 345 345 345)
    active_force_length_curve: NaturalCubicSpline: x=(-35 0 0.401 0.402 0.4035 0.52725 0.62875 0.71875 0.86125 1.045 1.2175 1.43875 1.61875 1.62 1.621 2.2 35)
        y=(0 0 0 0 0 0.226667 0.636667 0.856667 0.95 0.993333 0.77 0.246667 0 0 0 0 0)
    passive_force_length_curve: NaturalCubicSpline: x=(-35 0.998 0.999 1.15 1.25 1.35 1.45 1.55 1.65 1.75 1.7501 1.7502 35)
        y=(0 0 0 0 0.035 0.12 0.26 0.55 1.17 2 2 2 2)
  ForceSet:
    ObjectGroup left_regio_thoracicae: members=(left_brachiocephalicus_1 left_brachiocephalicus_2 left_latissimus_dorsi left_pectoralis_profundus left_pectoralis_superficialis left_rhomboideus_cervicis left_rhomboideus_thoracic left_serratus_1 left_serratus_10 left_serratus_11 left_serratus_12 left_serratus_2 left_serratus_3 left_serratus_4 left_serratus_5 left_serratus_6 left_serratus_7 left_serratus_8 left_serratus_9 left_trapezius_cervical left_trapezius_thoracic)
    ObjectGroup left_regio_deltoidea: members=(left_coracobrachialis left_deltoideus_acr left_deltoideus_sca left_infraspinatus left_subscapularis left_supraspinatus left_teres_major left_teres_minor)
    ObjectGroup left_regio_brachialis: members=(left_anconeus left_biceps_brachii left_brachialis left_pronator_teres left_triceps_caput_accessorium left_triceps_caput_laterale left_triceps_caput_longum left_triceps_caput_medial)
    ObjectGroup left_regio_antebrachialis: members=(left_abductor_policis_longum left_extensor_carpi_radialis left_extensor_carpi_ulnaris left_flexor_carpi_radialis left_flexor_carpi_ulnaris left_supinator)
    ObjectGroup right_regio_thoracicae: members=(right_brachiocephalicus_1 right_brachiocephalicus_2 right_latissimus_dorsi right_pectoralis_profundus right_pectoralis_superficialis right_rhomboideus_cervicis right_rhomboideus_thoracic right_serratus_1 right_serratus_10 right_serratus_11 right_serratus_12 right_serratus_2 right_serratus_3 right_serratus_4 right_serratus_5 right_serratus_6 right_serratus_7 right_serratus_8 right_serratus_9 right_trapezius_cervical right_trapezius_thoracic)
    ObjectGroup right_regio_deltoidea: members=(right_coracobrachialis right_deltoideus_acr right_deltoideus_sca right_infraspinatus right_subscapularis right_supraspinatus right_teres_major right_teres_minor)
    ObjectGroup right_regio_brachialis: members=(right_anconeus right_biceps_brachii right_brachialis right_pronator_teres right_triceps_caput_accessorium right_triceps_caput_laterale right_triceps_caput_longum right_triceps_caput_medial)
    ObjectGroup right_regio_antebrachialis: members=(right_abductor_policis_longum right_extensor_carpi_radialis right_extensor_carpi_ulnaris right_flexor_carpi_radialis right_flexor_carpi_ulnaris right_supinator)
    ObjectGroup left_regio_thoarcicae_dorsales: members=(left_iliocostalis left_longissimus left_quadratus_lumborum)
    ObjectGroup right_regio_thoarcicae_dorsales: members=(right_iliocostalis right_longissimus right_quadratus_lumborum)
    ObjectGroup left_regio_dorsales: members=left_sacrocaudalis
    ObjectGroup left_regio_coxae: members=(left_adductor_longus left_gemelli left_gluteus_medius left_gluteus_profundus left_gluteus_superficialis left_iliacus left_obturator_ext left_obturator_int left_piriformis left_psoas_major left_psoas_minor left_quadratus_femoris)
    ObjectGroup left_regio_femoris: members=(left_abductor_cruris left_adductoren left_biceps_femoris_breve left_biceps_femoris_longum left_gracilis_tractus_calcaneus left_pectineus left_rectus_femoris left_sartorius_caudal left_sartorius_cranial left_semimembranosus left_semitendinosus left_tensor_fasciae left_vastus_lateralis left_vastus_medialis)
    ObjectGroup left_regio_cruris: members=(left_gastrocnemius_lateralis left_gastrocnemius_medialis left_peroneus_longus left_popliteus left_tibialis_caudalis left_tibialis_cranialis)
    ObjectGroup right_regio_dorsales: members=right_sacrocaudalis
    ObjectGroup right_regio_coxae: members=(right_adductor_longus right_gemelli right_gluteus_medius right_gluteus_profundus right_gluteus_superficialis right_iliacus right_obturator_ext right_obturator_int right_piriformis right_psoas_major right_psoas_minor right_quadratus_femoris)
    ObjectGroup right_regio_femoris: members=(right_abductor_cruris right_adductoren right_biceps_femoris_breve right_biceps_femoris_longum right_gracilis_tractus_calcaneus right_pectineus right_rectus_femoris right_sartorius_caudal right_sartorius_cranial right_semimembranosus right_semitendinosus right_tensor_fasciae right_vastus_lateralis right_vastus_medialis)
    ObjectGroup right_regio_cruris: members=(right_gastrocnemius_lateralis right_gastrocnemius_medialis right_peroneus_longus right_popliteus right_tibialis_caudalis right_tibialis_cranialis)
    Millard2012EquilibriumMuscle left_trapezius_cervical: min_control=0.01 max_isometric_force=44.33998
        optimal_fiber_length=0.06955139 tendon_slack_length=0.03858824 pennation_angle=0.1308997
      PathPoint: left_scapula (0.02015456 -0.0006210888 -0.01189018)
      PathPoint: cervix (0 -0.01029 0.06891)
    Millard2012EquilibriumMuscle left_trapezius_thoracic: min_control=0.01 max_isometric_force=58.83338
        optimal_fiber_length=0.07547975 tendon_slack_length=0.03919044 pennation_angle=0.1745329
      PathPoint: left_scapula (0.01787732 0.002483489 0.008091074)
      PathPoint: thorax (0.00632 -0.1179 0.16775)
    Millard2012EquilibriumMuscle left_rhomboideus_thoracic: min_control=0.01 max_isometric_force=58.90979
        optimal_fiber_length=0.04344725 tendon_slack_length=0.0309422 pennation_angle=0.1963495
      PathPoint: left_scapula (0.00285762 0.04735544 0.03755522)
      PathPoint: thorax (0.00608 -0.11277 0.16399)
    Millard2012EquilibriumMuscle left_rhomboideus_cervicis: min_control=0.01 max_isometric_force=101.7866
        optimal_fiber_length=0.05450138 tendon_slack_length=0.1963714 pennation_angle=0.2181662
      PathPoint: left_scapula (-0.01854432 0.007714497 0.04962578)
      PathPoint: cervix (-0.00274 -0.14652 0.08612)
    Millard2012EquilibriumMuscle left_latissimus_dorsi: min_control=0.01 max_isometric_force=125.1545
        optimal_fiber_length=0.3367971 tendon_slack_length=0.02612602 pennation_angle=0
      PathPoint: thorax (-0.00084 0.07482 0.19937)
      PathPoint: left_scapula (-0.01208674 0.02439318 -0.1511957)
    Millard2012EquilibriumMuscle left_brachiocephalicus_1: min_control=0.01 max_isometric_force=18.46631
        optimal_fiber_length=0.287563 tendon_slack_length=0.01734476 pennation_angle=0.01745329
      PathPoint: left_humerus (0.001638207 -0.003978323 -0.07487889)
      PathPoint: left_humerus (-0.003868623 -0.02181682 -0.02807215)
      PathPoint: cervix (0.00006 -0.11578 0.08114)
      PathWrap: wrap_object=left_humerus
    Millard2012EquilibriumMuscle left_brachiocephalicus_2: min_control=0.01 max_isometric_force=18.46631
        optimal_fiber_length=0.2176074 tendon_slack_length=0.01312529 pennation_angle=0.01745329
      PathPoint: left_humerus (0.001638207 -0.003978323 -0.07487889)
      PathPoint: left_humerus (-0.003868623 -0.02181682 -0.02807215)
      PathPoint: cervix (0.02375 -0.21087 0.05245)
      PathWrap: wrap_object=left_humerus
    Millard2012EquilibriumMuscle left_serratus_1: min_control=0.01 max_isometric_force=22.75595
        optimal_fiber_length=0.08654779 tendon_slack_length=0.04837749 pennation_angle=0.283616
      PathPoint: cervix (0.02624 -0.01886 -0.02412)
      PathPoint: left_scapula (-0.005686547 0.003637964 0.02482148)
    Millard2012EquilibriumMuscle left_serratus_2: min_control=0.01 max_isometric_force=22.75595
        optimal_fiber_length=0.08139036 tendon_slack_length=0.04549465 pennation_angle=0.283616
      PathPoint: cervix (0.01914 -0.05044 -0.02618)
      PathPoint: left_scapula (-0.006833004 -0.00541456 0.0255926)
    Millard2012EquilibriumMuscle left_serratus_3: min_control=0.01 max_isometric_force=22.75595
        optimal_fiber_length=0.08032219 tendon_slack_length=0.04489758 pennation_angle=0.283616
      PathPoint: cervix (0.02026 -0.07584 0.00084)
      PathPoint: left_scapula (-0.006728207 -0.01184129 0.02882579)
    Millard2012EquilibriumMuscle left_serratus_4: min_control=0.01 max_isometric_force=22.75595
        optimal_fiber_length=0.09887373 tendon_slack_length=0.05526731 pennation_angle=0.283616
      PathPoint: cervix (0.02258 -0.09421 0.02007)
      PathPoint: left_scapula (-0.007964078 -0.02355606 0.02734525)
    Millard2012EquilibriumMuscle left_serratus_5: min_control=0.01 max_isometric_force=22.75595
        optimal_fiber_length=0.09758019 tendon_slack_length=0.05454426 pennation_angle=0.283616
      PathPoint: cervix (0.02509 -0.10999 0.03679)
      PathPoint: left_scapula (-0.007646794 -0.008010777 0.04308796)
    Millard2012EquilibriumMuscle left_serratus_6: min_control=0.01 max_isometric_force=34.79929
        optimal_fiber_length=0.06764031 tendon_slack_length=0.07934801 pennation_angle=0.2617994
      PathPoint: thorax (0.07414 -0.01866 0.01374)
      PathPoint: left_scapula (0.004152274 0.05758309 0.02336105)
    Millard2012EquilibriumMuscle left_serratus_7: min_control=0.01 max_isometric_force=34.79929
        optimal_fiber_length=0.06966134 tendon_slack_length=0.08171886 pennation_angle=0.2617994
      PathPoint: thorax (0.07205 -0.04904 0.00649)
      PathPoint: left_scapula (4.063411e-5 0.05103919 0.02737304)
    Millard2012EquilibriumMuscle left_serratus_8: min_control=0.01 max_isometric_force=34.79929
        optimal_fiber_length=0.06629387 tendon_slack_length=0.07776852 pennation_angle=0.2617994
      PathPoint: thorax (0.05734 -0.08359 -0.00597)
      PathPoint: left_scapula (-0.002005746 0.04505926 0.03353188)
    Millard2012EquilibriumMuscle left_serratus_9: min_control=0.01 max_isometric_force=34.79929
        optimal_fiber_length=0.06882173 tendon_slack_length=0.08073392 pennation_angle=0.2617994
      PathPoint: thorax (0.05623 -0.11696 0.00059)
      PathPoint: left_scapula (-0.00343274 0.03787014 0.03833608)
    Millard2012EquilibriumMuscle left_serratus_10: min_control=0.01 max_isometric_force=34.79929
        optimal_fiber_length=0.06847233 tendon_slack_length=0.08032404 pennation_angle=0.2617994
      PathPoint: thorax (0.05173 -0.14994 0.0012)
      PathPoint: left_scapula (-0.004964391 0.02858452 0.04430174)
    Millard2012EquilibriumMuscle left_serratus_11: min_control=0.01 max_isometric_force=34.79929
        optimal_fiber_length=0.06621188 tendon_slack_length=0.07767234 pennation_angle=0.2617994
      PathPoint: thorax (0.03682 -0.18139 0.00511)
      PathPoint: left_scapula (-0.005871466 0.0193338 0.04217815)
    Millard2012EquilibriumMuscle left_serratus_12: min_control=0.01 max_isometric_force=34.79929
        optimal_fiber_length=0.04870791 tendon_slack_length=0.05713864 pennation_angle=0.2617994
      PathPoint: thorax (0.03331 -0.2001 0.00603)
      PathPoint: left_scapula (-0.005097745 0.01267747 0.03350671)
    Millard2012EquilibriumMuscle left_pectoralis_profundus: min_control=0.01 max_isometric_force=249.1519
        optimal_fiber_length=0.1140918 tendon_slack_length=0.02870233 pennation_angle=0
      PathPoint: left_humerus (-0.005466926 -0.01284449 0.01254411)
      PathPoint: thorax (0 -0.10342 -0.06043)
      PathWrap: wrap_object=left_humerus
    Millard2012EquilibriumMuscle left_pectoralis_superficialis: min_control=0.01 max_isometric_force=249.1519
        optimal_fiber_length=0.05236322 tendon_slack_length=0.01761308 pennation_angle=0
      PathPoint: left_humerus (-0.003107409 -0.01318513 -0.02646444)
      PathPoint: thorax (0 -0.19787 -0.05229)
      PathWrap: wrap_object=left_humerus
    Millard2012EquilibriumMuscle left_supraspinatus: min_control=0.01 max_isometric_force=280.2508
        optimal_fiber_length=0.04525604 tendon_slack_length=0.07564412 pennation_angle=0.4363323
      PathPoint: left_scapula (0.004928457 -0.01159635 -0.006026604)
      PathPoint: left_humerus (0.003891996 -0.005653561 0.02611354)
      PathWrap: wrap_object=left_humerus
    Millard2012EquilibriumMuscle left_infraspinatus: min_control=0.01 max_isometric_force=362.586
        optimal_fiber_length=0.03035125 tendon_slack_length=0.09752542 pennation_angle=0.4363323
      PathPoint: left_scapula (0.01175952 0.01939237 -0.007862939)
      PathPoint: left_humerus (0.0131958 -0.002097808 0.01660536)
      PathWrap: wrap_object=left_humerus
    Millard2012EquilibriumMuscle left_subscapularis: min_control=0.01 max_isometric_force=481.3196
        optimal_fiber_length=0.02087007 tendon_slack_length=0.08686511 pennation_angle=0.4363323
      PathPoint: left_scapula (-0.001852595 0.01090182 -0.01094062)
      PathPoint: left_humerus (-0.01777967 0.0137913 0.01916386)
      PathWrap: wrap_object=left_humerus
    Millard2012EquilibriumMuscle left_deltoideus_sca: min_control=0.01 max_isometric_force=91.32616
        optimal_fiber_length=0.07444308 tendon_slack_length=0.08381445 pennation_angle=0.1745329
      PathPoint: left_scapula (0.01772118 0.003865962 0.004613016)
      PathPoint: left_humerus (0.0129698 -0.009329429 -0.02293431)
      PathWrap: wrap_object=left_humerus
    Millard2012EquilibriumMuscle left_deltoideus_acr: min_control=0.01 max_isometric_force=135.5123
        optimal_fiber_length=0.02395667 tendon_slack_length=0.05805986 pennation_angle=0.3490659
      PathPoint: left_scapula (0.02597329 -0.007613363 -0.08822067)
      PathPoint: left_humerus (0.009924597 -0.01256523 -0.03180479)
    Millard2012EquilibriumMuscle left_teres_major: min_control=0.01 max_isometric_force=61.85755
        optimal_fiber_length=0.133655 tendon_slack_length=0.03436842 pennation_angle=0
      PathPoint: left_scapula (0.009751655 0.05306233 0.01139392)
      PathPoint: left_humerus (-0.01063629 -0.005808151 -0.02888822)
      PathWrap: wrap_object=left_humerus
    Millard2012EquilibriumMuscle left_teres_minor: min_control=0.01 max_isometric_force=43.57018
        optimal_fiber_length=0.02790921 tendon_slack_length=0.04468609 pennation_angle=0.3490659
      PathPoint: left_scapula (0.007655489 0.01871035 -0.05631155)
      PathPoint: left_humerus (0.01392964 0.004130514 0.006905276)
      PathWrap: wrap_object=left_humerus
    Millard2012EquilibriumMuscle left_coracobrachialis: min_control=0.01 max_isometric_force=39.75015
        optimal_fiber_length=0.02276131 tendon_slack_length=0.05779183 pennation_angle=0.5235988
      PathPoint: left_scapula (-0.00817777 -0.01649355 -0.09182878)
      PathPoint: left_humerus (-0.01034182 -0.0001516902 -0.03140094)
    Millard2012EquilibriumMuscle left_biceps_brachii: min_control=0.01 max_isometric_force=195.5912
        optimal_fiber_length=0.05005718 tendon_slack_length=0.1677246 pennation_angle=0.6108652
      PathPoint: left_scapula (0.001004534 -0.01436625 -0.09652576)
      PathPoint: left_antebrachium (-0.01110679 -0.005175474 -0.01376081)
      PathWrap: wrap_object=left_humerus
      PathWrap: wrap_object=left_antebrachium
    Millard2012EquilibriumMuscle left_brachialis: min_control=0.01 max_isometric_force=61.77082
        optimal_fiber_length=0.06438303 tendon_slack_length=0.1019672 pennation_angle=0.3490659
      PathPoint: left_scapula (0.006121036 0.01284723 -0.1281432)
      PathPoint: left_antebrachium (-0.01140924 -0.006666452 -0.007578903)
      PathPoint: left_antebrachium (-0.008196261 0.0116437 -0.01721212)
      PathWrap: wrap_object=left_humerus
      PathWrap: wrap_object=left_antebrachium
    Millard2012EquilibriumMuscle left_triceps_caput_longum: min_control=0.01 max_isometric_force=549.2491
        optimal_fiber_length=0.06877788 tendon_slack_length=0.1200382 pennation_angle=0.3665191
      PathPoint: left_scapula (0.002660342 0.01368379 -0.06795034)
      PathPoint: left_antebrachium (-0.005421396 0.03170792 0.02905223)
    Millard2012EquilibriumMuscle left_triceps_caput_laterale: min_control=0.01 max_isometric_force=249.1519
        optimal_fiber_length=0.05889372 tendon_slack_length=0.09314613 pennation_angle=0.04363323
      PathPoint: left_humerus (0.01322075 -0.003372306 -0.01155398)
      PathPoint: left_antebrachium (0.004279553 0.03011875 0.01583267)
      PathWrap: wrap_object=left_humerus
      PathWrap: wrap_object=left_antebrachium
    Millard2012EquilibriumMuscle left_triceps_caput_accessorium: min_control=0.01 max_isometric_force=73.27124
        optimal_fiber_length=0.06447767 tendon_slack_length=0.04285372 pennation_angle=0.04363323
      PathPoint: left_antebrachium (-0.01070223 0.03555467 0.02132109)
      PathPoint: left_humerus (0.003242795 0.0205301 0.00448185)
      PathWrap: wrap_object=left_humerus
      PathWrap: wrap_object=left_antebrachium
    Millard2012EquilibriumMuscle left_triceps_caput_medial: min_control=0.01 max_isometric_force=105.4605
        optimal_fiber_length=0.0681513 tendon_slack_length=0.1118118 pennation_angle=0.5235988
      PathPoint: left_antebrachium (-0.0139144 0.008295748 0.03745994)
      PathPoint: left_humerus (-0.0113742 -0.003796421 -0.02722697)
      PathWrap: wrap_object=left_humerus
      PathWrap: wrap_object=left_antebrachium
    Millard2012EquilibriumMuscle left_anconeus: min_control=0.01 max_isometric_force=57.18379
        optimal_fiber_length=0.007607531 tendon_slack_length=0.02106349 pennation_angle=0.2617994
      PathPoint: left_humerus (0.005736356 0.02437649 -0.1532631)
      PathPoint: left_antebrachium (0.007829776 0.0001468421 0.02827281)
      PathPoint: left_antebrachium (0.007561889 -0.002257026 0.02980273)
      PathWrap: wrap_object=left_humerus
      PathWrap: wrap_object=left_antebrachium
    Millard2012EquilibriumMuscle left_pronator_teres: min_control=0.01 max_isometric_force=67.88177
        optimal_fiber_length=0.01143052 tendon_slack_length=0.07873249 pennation_angle=0.6108652
      PathPoint: left_humerus (-0.01927401 0.01023482 -0.1375317)
      PathPoint: left_antebrachium (-0.01889296 -0.003936773 0.004531733)
      PathPoint: left_antebrachium (-0.01022312 -0.009970514 -0.06258638)
      PathWrap: wrap_object=left_humerus
      PathWrap: wrap_object=left_antebrachium
    Millard2012EquilibriumMuscle left_supinator: min_control=0.01 max_isometric_force=11.99771
        optimal_fiber_length=0.03133648 tendon_slack_length=0.01268511 pennation_angle=0.4363323
      PathPoint: left_humerus (0.01282299 0.002751824 -0.1447443)
      PathPoint: left_antebrachium (0.01294476 -0.001038293 0.002963265)
      PathPoint: left_antebrachium (-0.0006706763 -0.007742128 -0.03605501)
      PathWrap: wrap_object=left_humerus
      PathWrap: wrap_object=left_antebrachium
    Millard2012EquilibriumMuscle left_flexor_carpi_radialis: min_control=0.01 max_isometric_force=57.46301
        optimal_fiber_length=0.07406596 tendon_slack_length=0.1616284 pennation_angle=0.2617994
      PathPoint: left_humerus (0.01125806 0.01735092 -0.112592)
      PathPoint: left_antebrachium (-0.006305999 -0.01534033 -0.06667448)
      PathPoint: left_carpus (-0.01265025 -0.005858858 -0.003933138)
    Millard2012EquilibriumMuscle left_flexor_carpi_ulnaris: min_control=0.01 max_isometric_force=283.4406
        optimal_fiber_length=0.02393723 tendon_slack_length=0.2286899 pennation_angle=0.6108652
      PathPoint: left_humerus (0.01315272 0.009798747 -0.1465038)
      PathPoint: left_antebrachium (0.008709616 0.01615986 -0.1037137)
      PathPoint: left_carpus (0.01217153 0.005124492 -0.001799018)
      PathWrap: wrap_object=left_humerus
      PathWrap: wrap_object=left_antebrachium
      PathWrap: wrap_object=left_carpus
    Millard2012EquilibriumMuscle left_extensor_carpi_ulnaris: min_control=0.01 max_isometric_force=135.3576
        optimal_fiber_length=0.01793408 tendon_slack_length=0.2295957 pennation_angle=0.6108652
      PathPoint: left_carpus (-0.008173769 0.01370212 0.02504456)
      PathPoint: left_antebrachium (-0.008336032 0.02547164 0.004670991)
      PathPoint: left_humerus (-0.00990052 0.0367605 -0.1420863)
      PathWrap: wrap_object=left_humerus
      PathWrap: wrap_object=left_antebrachium
      PathWrap: wrap_object=left_carpus
    Millard2012EquilibriumMuscle left_extensor_carpi_radialis: min_control=0.01 max_isometric_force=117.639
        optimal_fiber_length=0.06151155 tendon_slack_length=0.193722 pennation_angle=0.5235988
      PathPoint: left_humerus (-0.01912926 0.01276216 -0.1429835)
      PathPoint: left_antebrachium (-0.02139017 -0.00239793 -0.01709709)
      PathPoint: left_carpus (-0.0209542 0.00941755 0.003657874)
      PathPoint: left_carpus (-0.009928926 0.008441936 -0.02631424)
      PathWrap: wrap_object=left_humerus
      PathWrap: wrap_object=left_antebrachium
      PathWrap: wrap_object=left_carpus
    Millard2012EquilibriumMuscle left_abductor_policis_longum: min_control=0.01 max_isometric_force=77.79716
        optimal_fiber_length=0.007249454 tendon_slack_length=0.1140802 pennation_angle=0.5235988
      PathPoint: left_carpus (-0.02512312 0.008505329 -0.00383769)
      PathPoint: left_carpus (-0.02531902 0.002574901 0.004224533)
      PathPoint: left_antebrachium (0.003191368 -0.001520508 -0.09868117)
      PathWrap: wrap_object=left_antebrachium
      PathWrap: wrap_object=left_carpus
    Millard2012EquilibriumMuscle right_trapezius_cervical: min_control=0.01 max_isometric_force=44.33998
        optimal_fiber_length=0.06955139 tendon_slack_length=0.03858824 pennation_angle=0.1308997
      PathPoint: right_scapula (-0.02121498 -0.0007911221 -0.009862412)
      PathPoint: cervix (0 -0.01029 0.06891)
    Millard2012EquilibriumMuscle right_trapezius_thoracic: min_control=0.01 max_isometric_force=58.83338
        optimal_fiber_length=0.07547975 tendon_slack_length=0.03919044 pennation_angle=0.1745329
      PathPoint: right_scapula (-0.01702011 0.002340056 0.009801606)
      PathPoint: thorax (-0.00632 -0.1179 0.16775)
    Millard2012EquilibriumMuscle right_rhomboideus_thoracic: min_control=0.01 max_isometric_force=58.90979
        optimal_fiber_length=0.04344725 tendon_slack_length=0.0309422 pennation_angle=0.1963495
      PathPoint: right_scapula (0.0004405683 0.04734551 0.03767369)
      PathPoint: thorax (-0.00608 -0.11277 0.16399)
    Millard2012EquilibriumMuscle right_rhomboideus_cervicis: min_control=0.01 max_isometric_force=101.7866
        optimal_fiber_length=0.05450138 tendon_slack_length=0.1963714 pennation_angle=0.2181662
      PathPoint: right_scapula (0.02324471 0.007886254 0.04757745)
      PathPoint: cervix (-0.00274 -0.14652 0.08612)
    Millard2012EquilibriumMuscle right_latissimus_dorsi: min_control=0.01 max_isometric_force=125.1545
        optimal_fiber_length=0.3367971 tendon_slack_length=0.02612602 pennation_angle=0
      PathPoint: thorax (-0.00084 0.07482 0.19937)
      PathPoint: right_scapula (-0.00295788 0.0244307 -0.1516432)
    Millard2012EquilibriumMuscle right_brachiocephalicus_1: min_control=0.01 max_isometric_force=18.46631
        optimal_fiber_length=0.287563 tendon_slack_length=0.01734476 pennation_angle=0.01745329
      PathPoint: right_humerus (-0.009325804 -0.003763325 -0.07432513)
      PathPoint: right_humerus (0.0001654937 -0.02189593 -0.0282759)
      PathPoint: cervix (-0.00006 -0.11578 0.08114)
      PathWrap: wrap_object=right_humerus
    Millard2012EquilibriumMuscle right_brachiocephalicus_2: min_control=0.01 max_isometric_force=18.46631
        optimal_fiber_length=0.2176074 tendon_slack_length=0.01312529 pennation_angle=0.01745329
      PathPoint: right_humerus (-0.009325804 -0.003763325 -0.07432513)
      PathPoint: right_humerus (0.0001654937 -0.02189593 -0.0282759)
      PathPoint: cervix (-0.02375 -0.21087 0.05245)
      PathWrap: wrap_object=right_humerus
    Millard2012EquilibriumMuscle right_serratus_1: min_control=0.01 max_isometric_force=22.75595
        optimal_fiber_length=0.08654779 tendon_slack_length=0.04837749 pennation_angle=0.283616
      PathPoint: cervix (-0.02624 -0.01886 -0.02412)
      PathPoint: right_scapula (0.008056689 0.00369445 0.02414784)
    Millard2012EquilibriumMuscle right_serratus_2: min_control=0.01 max_isometric_force=22.75595
        optimal_fiber_length=0.08139036 tendon_slack_length=0.04549465 pennation_angle=0.283616
      PathPoint: cervix (-0.01914 -0.05044 -0.02618)
      PathPoint: right_scapula (0.009347259 -0.005348057 0.02479951)
    Millard2012EquilibriumMuscle right_serratus_3: min_control=0.01 max_isometric_force=22.75595
        optimal_fiber_length=0.08032219 tendon_slack_length=0.04489758 pennation_angle=0.283616
      PathPoint: cervix (-0.02026 -0.07584 0.00084)
      PathPoint: right_scapula (0.009611861 -0.01177413 0.02802487)
    Millard2012EquilibriumMuscle right_serratus_4: min_control=0.01 max_isometric_force=22.75595
        optimal_fiber_length=0.09887373 tendon_slack_length=0.05526731 pennation_angle=0.283616
      PathPoint: cervix (-0.02258 -0.09421 0.02007)
      PathPoint: right_scapula (0.01079304 -0.02347897 0.02642585)
    Millard2012EquilibriumMuscle right_serratus_5: min_control=0.01 max_isometric_force=22.75595
        optimal_fiber_length=0.09758019 tendon_slack_length=0.05454426 pennation_angle=0.283616
      PathPoint: cervix (-0.02509 -0.10999 0.03679)
      PathPoint: right_scapula (0.01188938 -0.007930481 0.04213038)
    Millard2012EquilibriumMuscle right_serratus_6: min_control=0.01 max_isometric_force=34.79929
        optimal_fiber_length=0.06764031 tendon_slack_length=0.07934801 pennation_angle=0.2617994
      PathPoint: thorax (-0.07414 -0.01866 0.01374)
      PathPoint: right_scapula (-0.002319831 0.05755649 0.02367828)
    Millard2012EquilibriumMuscle right_serratus_7: min_control=0.01 max_isometric_force=34.79929
        optimal_fiber_length=0.06966134 tendon_slack_length=0.08171886 pennation_angle=0.2617994
      PathPoint: thorax (-0.07205 -0.04904 0.00649)
      PathPoint: right_scapula (0.002217978 0.05104814 0.02726632)
    Millard2012EquilibriumMuscle right_serratus_8: min_control=0.01 max_isometric_force=34.79929
        optimal_fiber_length=0.06629387 tendon_slack_length=0.07776852 pennation_angle=0.2617994
      PathPoint: thorax (-0.05734 -0.08359 -0.00597)
      PathPoint: right_scapula (0.004905823 0.04508767 0.0331931)
    Millard2012EquilibriumMuscle right_serratus_9: min_control=0.01 max_isometric_force=34.79929
        optimal_fiber_length=0.06882173 tendon_slack_length=0.08073392 pennation_angle=0.2617994
      PathPoint: thorax (-0.05623 -0.11696 0.00059)
      PathPoint: right_scapula (0.006854711 0.03791242 0.03783183)
    Millard2012EquilibriumMuscle right_serratus_10: min_control=0.01 max_isometric_force=34.79929
        optimal_fiber_length=0.06847233 tendon_slack_length=0.08032404 pennation_angle=0.2617994
      PathPoint: thorax (-0.05173 -0.14994 0.0012)
      PathPoint: right_scapula (0.009038528 0.02864207 0.04361537)
    Millard2012EquilibriumMuscle right_serratus_11: min_control=0.01 max_isometric_force=34.79929
        optimal_fiber_length=0.06621188 tendon_slack_length=0.07767234 pennation_angle=0.2617994
      PathPoint: thorax (-0.03682 -0.18139 0.00511)
      PathPoint: right_scapula (0.009809407 0.01939825 0.04140954)
    Millard2012EquilibriumMuscle right_serratus_12: min_control=0.01 max_isometric_force=34.79929
        optimal_fiber_length=0.04870791 tendon_slack_length=0.05713864 pennation_angle=0.2617994
      PathPoint: thorax (-0.03331 -0.2001 0.00603)
      PathPoint: right_scapula (0.008245978 0.01273231 0.03285266)
    Millard2012EquilibriumMuscle right_pectoralis_profundus: min_control=0.01 max_isometric_force=249.1519
        optimal_fiber_length=0.1140918 tendon_slack_length=0.02870233 pennation_angle=0
      PathPoint: right_humerus (0.006196066 -0.01307319 0.01195505)
      PathPoint: thorax (0 -0.10342 -0.06043)
      PathWrap: wrap_object=right_humerus
    Millard2012EquilibriumMuscle right_pectoralis_superficialis: min_control=0.01 max_isometric_force=249.1519
        optimal_fiber_length=0.05236322 tendon_slack_length=0.01761308 pennation_angle=0
      PathPoint: right_humerus (-9.180656e-5 -0.01324426 -0.02661675)
      PathPoint: thorax (0 -0.19787 -0.05229)
      PathWrap: wrap_object=right_humerus
    Millard2012EquilibriumMuscle right_supraspinatus: min_control=0.01 max_isometric_force=280.2508
        optimal_fiber_length=0.04525604 tendon_slack_length=0.07564412 pennation_angle=0.4363323
      PathPoint: right_scapula (-0.005398946 -0.0116388 -0.005520396)
      PathPoint: right_humerus (-0.001460198 -0.005548608 0.02638386)
      PathWrap: wrap_object=right_humerus
    Millard2012EquilibriumMuscle right_infraspinatus: min_control=0.01 max_isometric_force=362.586
        optimal_fiber_length=0.03035125 tendon_slack_length=0.09752542 pennation_angle=0.4363323
      PathPoint: right_scapula (-0.01263073 0.01929212 -0.006667427)
      PathPoint: right_humerus (-0.01152814 -0.001612986 0.01785409)
      PathWrap: wrap_object=right_humerus
    Millard2012EquilibriumMuscle right_subscapularis: min_control=0.01 max_isometric_force=481.3196
        optimal_fiber_length=0.02087007 tendon_slack_length=0.08686511 pennation_angle=0.4363323
      PathPoint: right_scapula (0.0006843106 0.01091225 -0.01106497)
      PathPoint: right_humerus (0.02014502 0.01304762 0.01724842)
      PathWrap: wrap_object=right_humerus
    Millard2012EquilibriumMuscle right_deltoideus_sca: min_control=0.01 max_isometric_force=91.32616
        optimal_fiber_length=0.07444308 tendon_slack_length=0.08381445 pennation_angle=0.1745329
      PathPoint: right_scapula (-0.0172162 0.003722365 0.006325506)
      PathPoint: right_humerus (-0.01556858 -0.008769809 -0.02149294)
      PathWrap: wrap_object=right_humerus
    Millard2012EquilibriumMuscle right_deltoideus_acr: min_control=0.01 max_isometric_force=135.5123
        optimal_fiber_length=0.02395667 tendon_slack_length=0.05805986 pennation_angle=0.3490659
      PathPoint: right_scapula (-0.03441305 -0.007861557 -0.08526077)
      PathPoint: right_humerus (-0.01356115 -0.01210469 -0.0306186)
    Millard2012EquilibriumMuscle right_teres_major: min_control=0.01 max_isometric_force=61.85755
        optimal_fiber_length=0.133655 tendon_slack_length=0.03436842 pennation_angle=0
      PathPoint: right_scapula (-0.00902544 0.05298516 0.0123143)
      PathPoint: right_humerus (0.007437354 -0.006162564 -0.02980106)
      PathWrap: wrap_object=right_humerus
    Millard2012EquilibriumMuscle right_teres_minor: min_control=0.01 max_isometric_force=43.57018
        optimal_fiber_length=0.02790921 tendon_slack_length=0.04468609 pennation_angle=0.3490659
      PathPoint: right_scapula (-0.01327897 0.0186243 -0.05528542)
      PathPoint: right_humerus (-0.0129911 0.004658414 0.008264951)
      PathWrap: wrap_object=right_humerus
    Millard2012EquilibriumMuscle right_coracobrachialis: min_control=0.01 max_isometric_force=39.75015
        optimal_fiber_length=0.02276131 tendon_slack_length=0.05779183 pennation_angle=0.5235988
      PathPoint: right_scapula (-0.0007068827 -0.01646285 -0.09219497)
      PathPoint: right_humerus (0.007112725 -0.0004939632 -0.03228251)
    Millard2012EquilibriumMuscle right_biceps_brachii: min_control=0.01 max_isometric_force=195.5912
        optimal_fiber_length=0.05005718 tendon_slack_length=0.1677246 pennation_angle=0.6108652
      PathPoint: right_scapula (-0.01032165 -0.0144128 -0.0959706)
      PathPoint: right_antebrachium (0.01170741 -0.005204424 -0.01324224)
      PathWrap: wrap_object=right_humerus
      PathWrap: wrap_object=right_antebrachium
    Millard2012EquilibriumMuscle right_brachialis: min_control=0.01 max_isometric_force=61.77082
        optimal_fiber_length=0.06438303 tendon_slack_length=0.1019672 pennation_angle=0.3490659
      PathPoint: right_scapula (-0.01872865 0.01274509 -0.1269251)
      PathPoint: right_antebrachium (0.01172488 -0.006695808 -0.007053059)
      PathPoint: right_antebrachium (0.00899937 0.01162188 -0.01682126)
      PathWrap: wrap_object=right_humerus
      PathWrap: wrap_object=right_antebrachium
    Millard2012EquilibriumMuscle right_triceps_caput_longum: min_control=0.01 max_isometric_force=549.2491
        optimal_fiber_length=0.06877788 tendon_slack_length=0.1200382 pennation_angle=0.3665191
      PathPoint: right_scapula (-0.009404941 0.0136342 -0.06735895)
      PathPoint: right_antebrachium (0.004176165 0.03169574 0.02927038)
    Millard2012EquilibriumMuscle right_triceps_caput_laterale: min_control=0.01 max_isometric_force=249.1519
        optimal_fiber_length=0.05889372 tendon_slack_length=0.09314613 pennation_angle=0.04363323
      PathPoint: right_humerus (-0.01443892 -0.002829917 -0.01015698)
      PathPoint: right_antebrachium (-0.00491811 0.03013043 0.01562361)
      PathWrap: wrap_object=right_humerus
      PathWrap: wrap_object=right_antebrachium
    Millard2012EquilibriumMuscle right_triceps_caput_accessorium: min_control=0.01 max_isometric_force=73.27124
        optimal_fiber_length=0.06447767 tendon_slack_length=0.04285372 pennation_angle=0.04363323
      PathPoint: right_antebrachium (0.009812561 0.03552864 0.0217874)
      PathPoint: right_humerus (-0.001969603 0.02063231 0.004745111)
      PathWrap: wrap_object=right_humerus
      PathWrap: wrap_object=right_antebrachium
    Millard2012EquilibriumMuscle right_triceps_caput_medial: min_control=0.01 max_isometric_force=105.4605
        optimal_fiber_length=0.0681513 tendon_slack_length=0.1118118 pennation_angle=0.5235988
      PathPoint: right_antebrachium (0.01221896 0.008262586 0.03805396)
      PathPoint: right_humerus (0.008416934 -0.004184513 -0.02822655)
      PathWrap: wrap_object=right_humerus
      PathWrap: wrap_object=right_antebrachium
    Millard2012EquilibriumMuscle right_anconeus: min_control=0.01 max_isometric_force=57.18379
        optimal_fiber_length=0.007607531 tendon_slack_length=0.02106349 pennation_angle=0.2617994
      PathPoint: right_humerus (-0.02018584 0.02488481 -0.1519538)
      PathPoint: right_antebrachium (-0.009105921 0.0001683325 0.02788786)
      PathPoint: right_antebrachium (-0.008913924 -0.002236119 0.02942823)
      PathWrap: wrap_object=right_humerus
      PathWrap: wrap_object=right_antebrachium
    Millard2012EquilibriumMuscle right_pronator_teres: min_control=0.01 max_isometric_force=67.88177
        optimal_fiber_length=0.01143052 tendon_slack_length=0.07873249 pennation_angle=0.6108652
      PathPoint: right_humerus (0.005709555 0.009744907 -0.1387935)
      PathPoint: right_antebrachium (0.0186575 -0.003984422 0.005385264)
      PathPoint: right_antebrachium (0.01303097 -0.01000002 -0.06205781)
      PathWrap: wrap_object=right_humerus
      PathWrap: wrap_object=right_antebrachium
    Millard2012EquilibriumMuscle right_supinator: min_control=0.01 max_isometric_force=11.99771
        optimal_fiber_length=0.03133648 tendon_slack_length=0.01268511 pennation_angle=0.4363323
      PathPoint: right_humerus (-0.02721862 0.003537015 -0.1427219)
      PathPoint: right_antebrachium (-0.01306863 -0.001005284 0.002371974)
      PathPoint: right_antebrachium (0.002288572 -0.007745883 -0.03598774)
      PathWrap: wrap_object=right_humerus
      PathWrap: wrap_object=right_antebrachium
    Millard2012EquilibriumMuscle right_flexor_carpi_radialis: min_control=0.01 max_isometric_force=57.46301
        optimal_fiber_length=0.07406596 tendon_slack_length=0.1616284 pennation_angle=0.2617994
      PathPoint: right_humerus (-0.02185366 0.01800022 -0.1109196)
      PathPoint: right_antebrachium (0.009290038 -0.01536012 -0.06631998)
      PathPoint: right_carpus (0.01272967 -0.006231308 -0.002991797)
    Millard2012EquilibriumMuscle right_flexor_carpi_ulnaris: min_control=0.01 max_isometric_force=283.4406
        optimal_fiber_length=0.02393723 tendon_slack_length=0.2286899 pennation_angle=0.6108652
      PathPoint: right_humerus (-0.02744807 0.0105949 -0.1444532)
      PathPoint: right_antebrachium (-0.003947168 0.01617592 -0.1040014)
      PathPoint: right_carpus (-0.01184946 0.005477 -0.002689956)
      PathWrap: wrap_object=right_humerus
      PathWrap: wrap_object=right_antebrachium
      PathWrap: wrap_object=right_carpus
    Millard2012EquilibriumMuscle right_extensor_carpi_ulnaris: min_control=0.01 max_isometric_force=135.3576
        optimal_fiber_length=0.01793408 tendon_slack_length=0.2295957 pennation_angle=0.6108652
      PathPoint: right_carpus (0.006694466 0.01348393 0.02559602)
      PathPoint: right_antebrachium (0.008179771 0.02545068 0.0050464)
      PathPoint: right_humerus (-0.003030539 0.03662578 -0.1424333)
      PathWrap: wrap_object=right_humerus
      PathWrap: wrap_object=right_antebrachium
      PathWrap: wrap_object=right_carpus
    Millard2012EquilibriumMuscle right_extensor_carpi_radialis: min_control=0.01 max_isometric_force=117.639
        optimal_fiber_length=0.06151155 tendon_slack_length=0.193722 pennation_angle=0.5235988
      PathPoint: right_humerus (0.005115386 0.01228674 -0.144208)
      PathPoint: right_antebrachium (0.02213877 -0.002453166 -0.01610767)
      PathPoint: right_carpus (0.02089269 0.008803447 0.005209974)
      PathPoint: right_carpus (0.01209365 0.008118755 -0.02549743)
      PathWrap: wrap_object=right_humerus
      PathWrap: wrap_object=right_antebrachium
      PathWrap: wrap_object=right_carpus
    Millard2012EquilibriumMuscle right_abductor_policis_longum: min_control=0.01 max_isometric_force=77.79716
        optimal_fiber_length=0.007249454 tendon_slack_length=0.1140802 pennation_angle=0.5235988
      PathPoint: right_carpus (0.02557677 0.007761307 -0.001957232)
      PathPoint: right_carpus (0.02500116 0.001836452 0.006090908)
      PathPoint: right_antebrachium (0.001291851 -0.001518098 -0.09872434)
      PathWrap: wrap_object=right_antebrachium
      PathWrap: wrap_object=right_carpus
    Millard2012EquilibriumMuscle left_longissimus: min_control=0.01 max_isometric_force=1 optimal_fiber_length=0.01
        tendon_slack_length=0 pennation_angle=0
      PathPoint: pelvis (0.02959004 0.006585585 -0.01201989)
      PathPoint: thorax (0.02552 -0.08467 0.12568)
    Millard2012EquilibriumMuscle left_quadratus_lumborum: min_control=0.01 max_isometric_force=1
        optimal_fiber_length=0.01 tendon_slack_length=0 pennation_angle=0
      PathPoint: pelvis (0.03466003 -0.02144776 -0.02701985)
      PathPoint: thorax (0.00516 -0.00432 0.13748)
    Millard2012EquilibriumMuscle left_iliocostalis: min_control=0.01 max_isometric_force=1 optimal_fiber_length=0.01
        tendon_slack_length=0 pennation_angle=0
      PathPoint: pelvis (0.03684999 -0.01125426 -0.004860162)
      PathPoint: thorax (0.02771 -0.10938 0.11044)
    Millard2012EquilibriumMuscle right_longissimus: min_control=0.01 max_isometric_force=1 optimal_fiber_length=0.01
        tendon_slack_length=0 pennation_angle=0
      PathPoint: pelvis (-0.03188996 0.006585674 -0.01202004)
      PathPoint: thorax (-0.02552 -0.08467 0.12568)
    Millard2012EquilibriumMuscle right_quadratus_lumborum: min_control=0.01 max_isometric_force=1
        optimal_fiber_length=0.01 tendon_slack_length=0 pennation_angle=0
      PathPoint: pelvis (-0.03520995 -0.01748748 -0.02917841)
      PathPoint: thorax (-0.00309 -0.00416 0.13702)
    Millard2012EquilibriumMuscle right_iliocostalis: min_control=0.01 max_isometric_force=1 optimal_fiber_length=0.01
        tendon_slack_length=0 pennation_angle=0
      PathPoint: pelvis (-0.03923 -0.01129034 -0.005172102)
      PathPoint: thorax (-0.0277 -0.11235 0.11056)
    Millard2012EquilibriumMuscle left_sacrocaudalis: min_control=0.01 max_isometric_force=1 optimal_fiber_length=0.01
        tendon_slack_length=0 pennation_angle=0
      PathPoint: cauda (0.015085 0.069395 0.018305)
      PathPoint: abdomen (0.01098 0.01654 0.03546)
    Millard2012EquilibriumMuscle left_psoas_major: min_control=0.01 max_isometric_force=37.91612
        optimal_fiber_length=0.06764 tendon_slack_length=0.10399 pennation_angle=0.4775221
      PathPoint: left_femur (-0.01031935 0.008374071 -0.02653501)
      PathPoint: abdomen (0.02734 0.04867 0.00284)
      PathWrap: wrap_object=left_femur
    Millard2012EquilibriumMuscle left_psoas_minor: min_control=0.01 max_isometric_force=37.91612
        optimal_fiber_length=0.06668 tendon_slack_length=0.1025 pennation_angle=0.7737045
      PathPoint: pelvis (0.02739021 -0.0193504 -0.09857131)
      PathPoint: abdomen (0.00912 -0.00102 -0.00319)
    Millard2012EquilibriumMuscle left_adductor_longus: min_control=0.01 max_isometric_force=68.88
        optimal_fiber_length=0.0207 tendon_slack_length=0.03398 pennation_angle=0.4886922
      PathPoint: left_femur (0.001879739 0.01254273 -0.03958805)
      PathPoint: pelvis (0.01397025 -0.01960308 -0.1136863)
      PathWrap: wrap_object=left_femur
    Millard2012EquilibriumMuscle left_gemelli: min_control=0.01 max_isometric_force=51.36 optimal_fiber_length=0.01046
        tendon_slack_length=0.02672 pennation_angle=0.7490953
      PathPoint: left_femur (0.007255201 0.01208393 -0.008650038)
      PathPoint: pelvis (0.04339031 0.02212916 -0.1161646)
      PathWrap: wrap_object=left_femur
    Millard2012EquilibriumMuscle left_gluteus_medius: min_control=0.01 max_isometric_force=513.2042
        optimal_fiber_length=0.03845 tendon_slack_length=0.06153 pennation_angle=0.643852
      PathPoint: left_femur (0.01358926 0.00555246 0.001694191)
      PathPoint: pelvis (0.03803005 -0.004557052 -0.02447275)
      PathWrap: wrap_object=left_femur
    Millard2012EquilibriumMuscle left_gluteus_profundus: min_control=0.01 max_isometric_force=126.96
        optimal_fiber_length=0.00832 tendon_slack_length=0.05253 pennation_angle=0.461116
      PathPoint: left_femur (0.01473227 0.002341535 -0.005648852)
      PathPoint: pelvis (0.03504016 0.0009878653 -0.06688248)
      PathWrap: wrap_object=left_femur
    Millard2012EquilibriumMuscle left_gluteus_superficialis: min_control=0.01 max_isometric_force=127.4565
        optimal_fiber_length=0.07149 tendon_slack_length=0.05838 pennation_angle=0.7482227
      PathPoint: pelvis (0.0003301204 0.02331888 -0.03568484)
      PathPoint: left_femur (0.01459108 0.01453337 -0.01247615)
      PathWrap: wrap_object=left_femur
    Millard2012EquilibriumMuscle left_iliacus: min_control=0.01 max_isometric_force=75.83223
        optimal_fiber_length=0.03015 tendon_slack_length=0.04636 pennation_angle=0.2755875
      PathPoint: left_femur (-0.009455294 0.008713723 -0.02470732)
      PathPoint: pelvis (0.0353501 -0.0193129 -0.0531229)
      PathWrap: wrap_object=left_femur
    Millard2012EquilibriumMuscle left_obturator_ext: min_control=0.01 max_isometric_force=132.96
        optimal_fiber_length=0.01875 tendon_slack_length=0.02626 pennation_angle=0.5843362
      PathPoint: left_femur (0.004209904 0.01161297 -0.01486615)
      PathPoint: pelvis (0.02407034 0.009881354 -0.1346746)
      PathWrap: wrap_object=left_femur
    Millard2012EquilibriumMuscle left_obturator_int: min_control=0.01 max_isometric_force=188.4
        optimal_fiber_length=0.01601 tendon_slack_length=0.03523 pennation_angle=0.4537856
      PathPoint: pelvis (0.08620028 -0.0006009912 -0.1162283)
      PathPoint: left_femur (-0.0153157 0.02345266 -0.007778207)
      PathWrap: wrap_object=left_femur
    Millard2012EquilibriumMuscle left_piriformis: min_control=0.01 max_isometric_force=104.3504
        optimal_fiber_length=0.05836 tendon_slack_length=0.11024 pennation_angle=0.5457645
      PathPoint: left_femur (0.02924058 0.006980351 0.00510442)
      PathPoint: pelvis (0.03945015 0.02140544 -0.04928029)
      PathWrap: wrap_object=left_femur
    Millard2012EquilibriumMuscle left_pectineus: min_control=0.01 max_isometric_force=191.76
        optimal_fiber_length=0.03766 tendon_slack_length=0.12054 pennation_angle=0.726406
      PathPoint: left_femur (-0.002899265 -0.007947707 -0.1382378)
      PathPoint: pelvis (0.02665023 -0.01907231 -0.1056386)
      PathWrap: wrap_object=left_femur
    Millard2012EquilibriumMuscle left_sartorius_caudal: min_control=0.01 max_isometric_force=21.7012
        optimal_fiber_length=0.22579 tendon_slack_length=0.06577 pennation_angle=0.6871361
      PathPoint: pelvis (0.04474 -0.03144343 -0.0185152)
      PathPoint: left_crus (-0.008774928 -0.01813049 -0.01936293)
      PathPoint: left_crus (-0.003817675 -0.02381814 -0.04699512)
      PathWrap: wrap_object=left_femur
      PathWrap: wrap_object=left_crus
    Millard2012EquilibriumMuscle left_sartorius_cranial: min_control=0.01 max_isometric_force=66.24
        optimal_fiber_length=0.18837 tendon_slack_length=0.07883 pennation_angle=0.6871361
      PathPoint: pelvis (0.04884997 -0.02228697 -0.002187262)
      PathPoint: left_crus (0.003727454 -0.0252383 0.007270881)
      PathPoint: left_crus (0.004132105 -0.02586863 0.002325107)
      PathWrap: wrap_object=left_femur
      PathWrap: wrap_object=left_crus
    Millard2012EquilibriumMuscle left_tensor_fasciae: min_control=0.01 max_isometric_force=51.22743
        optimal_fiber_length=0.13469 tendon_slack_length=0.02711 pennation_angle=0.8501499
      PathPoint: pelvis (0.04537 -0.02863173 -0.01749366)
      PathPoint: left_femur (0.02610287 -0.008694876 -0.08767903)
      PathWrap: wrap_object=left_femur
    Millard2012EquilibriumMuscle left_quadratus_femoris: min_control=0.01 max_isometric_force=64.8
        optimal_fiber_length=0.02843 tendon_slack_length=0.01669 pennation_angle=0.5274385
      PathPoint: pelvis (0.04284039 0.02709492 -0.1452624)
      PathPoint: left_femur (0.001076417 0.01526593 -0.02773563)
      PathWrap: wrap_object=left_femur
    Millard2012EquilibriumMuscle left_vastus_lateralis: min_control=0.01 max_isometric_force=487.68
        optimal_fiber_length=0.08996 tendon_slack_length=0.15346 pennation_angle=0.8820894
      PathPoint: left_femur (0.01377522 0.001680698 -0.02181986)
      PathPoint: left_crus (0.01298141 -0.02343185 -0.003943969)
      PathPoint: left_crus (0.007768907 -0.02465784 -0.02953542)
      PathWrap: wrap_object=left_femur
      PathWrap: wrap_object=left_crus
    Millard2012EquilibriumMuscle left_vastus_medialis: min_control=0.01 max_isometric_force=513.84
        optimal_fiber_length=0.04727 tendon_slack_length=0.16983 pennation_angle=0.6565929
      PathPoint: left_femur (-0.004496535 -0.0007689086 -0.0275251)
      PathPoint: left_crus (0.0001993451 -0.0219961 0.005765745)
      PathPoint: left_crus (-8.868961e-5 -0.02530997 -0.02963703)
      PathWrap: wrap_object=left_femur
      PathWrap: wrap_object=left_crus
    Millard2012EquilibriumMuscle left_rectus_femoris: min_control=0.01 max_isometric_force=444.1453
        optimal_fiber_length=0.04521 tendon_slack_length=0.2098 pennation_angle=0.6059783
      PathPoint: pelvis (0.04247019 -0.01037208 -0.08272788)
      PathPoint: left_crus (0.00819655 -0.02465871 0.005634526)
      PathPoint: left_crus (0.002931831 -0.02450891 -0.02753971)
      PathWrap: wrap_object=left_femur
      PathWrap: wrap_object=left_crus
    Millard2012EquilibriumMuscle left_abductor_cruris: min_control=0.01 max_isometric_force=5.64705
        optimal_fiber_length=0.22742 tendon_slack_length=0.08206 pennation_angle=0
      PathPoint: pelvis (0.03213029 0.03241493 -0.09900031)
      PathPoint: left_crus (0.01168661 0.06226911 -0.03327064)
      PathPoint: left_crus (0.01067425 -0.02627993 -0.1135228)
      PathWrap: wrap_object=left_femur
      PathWrap: wrap_object=left_crus
    Millard2012EquilibriumMuscle left_adductoren: min_control=0.01 max_isometric_force=342.3875
        optimal_fiber_length=0.0652 tendon_slack_length=0.03153 pennation_angle=0.4886922
      PathPoint: left_femur (0.007449845 0.001537603 -0.0945288)
      PathPoint: pelvis (0.01156034 0.001709148 -0.1381716)
      PathWrap: wrap_object=left_femur
    Millard2012EquilibriumMuscle left_biceps_femoris_longum: min_control=0.01 max_isometric_force=284.2208
        optimal_fiber_length=0.07889 tendon_slack_length=0.14069 pennation_angle=0.6728244
      PathPoint: pelvis (0.06040037 0.03354377 -0.1346833)
      PathPoint: left_crus (0.02234091 0.0554145 -0.02541386)
      PathPoint: left_crus (0.01143679 -0.02538726 -0.03942623)
      PathWrap: wrap_object=left_femur
      PathWrap: wrap_object=left_crus
    Millard2012EquilibriumMuscle left_biceps_femoris_breve: min_control=0.01 max_isometric_force=400
        optimal_fiber_length=0.06353 tendon_slack_length=0.11329 pennation_angle=0
      PathPoint: left_femur (0.01779494 0.03787755 -0.07086192)
      PathPoint: left_crus (0.02234091 0.0554145 -0.02541386)
      PathPoint: left_crus (0.01143679 -0.02538726 -0.03942623)
      PathWrap: wrap_object=left_femur
      PathWrap: wrap_object=left_crus
    Millard2012EquilibriumMuscle left_gracilis_tractus_calcaneus: min_control=0.01 max_isometric_force=217.6883
        optimal_fiber_length=0.16507 tendon_slack_length=0.08512 pennation_angle=0.8794714
      PathPoint: pelvis (0.01018036 0.00643758 -0.1441109)
      PathPoint: left_crus (-0.02624586 0.03855279 -0.02787962)
      PathPoint: left_crus (-0.00546714 -0.01866338 -0.06932467)
      PathWrap: wrap_object=left_femur
      PathWrap: wrap_object=left_crus
    Millard2012EquilibriumMuscle left_semimembranosus: min_control=0.01 max_isometric_force=223.3075
        optimal_fiber_length=0.16401 tendon_slack_length=0.0354 pennation_angle=0.4832817
      PathPoint: pelvis (0.04321042 0.03546711 -0.1505974)
      PathPoint: left_crus (-0.01566884 0.01061733 -0.00464313)
      PathPoint: left_crus (-0.00768433 -0.01284937 -0.01671237)
      PathWrap: wrap_object=left_femur
      PathWrap: wrap_object=left_crus
    Millard2012EquilibriumMuscle left_semitendinosus: min_control=0.01 max_isometric_force=83.93746
        optimal_fiber_length=0.18363 tendon_slack_length=0.0673 pennation_angle=0.6091199
      PathPoint: pelvis (0.05850039 0.0328901 -0.1396412)
      PathPoint: left_crus (-0.01819858 0.03920677 -0.04833081)
      PathPoint: left_crus (-0.005575639 -0.01686414 -0.07022911)
      PathWrap: wrap_object=left_femur
      PathWrap: wrap_object=left_crus
    Millard2012EquilibriumMuscle left_gastrocnemius_lateralis: min_control=0.01 max_isometric_force=604.4022
        optimal_fiber_length=0.02336 tendon_slack_length=0.22723 pennation_angle=0.4665265
      PathPoint: left_femur (0.01764315 0.00174935 -0.1602258)
      PathPoint: left_crus (0.02160194 0.02183389 -0.01331088)
      PathPoint: left_calx (0.01340414 0.0185177 0.03917566)
      PathWrap: wrap_object=left_femur
      PathWrap: wrap_object=left_crus
      PathWrap: wrap_object=left_calx
    Millard2012EquilibriumMuscle left_gastrocnemius_medialis: min_control=0.01 max_isometric_force=488.1962
        optimal_fiber_length=0.03493 tendon_slack_length=0.24724 pennation_angle=0.6635742
      PathPoint: left_femur (-0.005165694 0.0004450134 -0.1571737)
      PathPoint: left_crus (-0.004947388 0.02477252 -0.02284399)
      PathPoint: left_calx (0.01046722 0.01907486 0.03964539)
      PathWrap: wrap_object=left_femur
      PathWrap: wrap_object=left_crus
      PathWrap: wrap_object=left_calx
    Millard2012EquilibriumMuscle left_peroneus_longus: min_control=0.01 max_isometric_force=327.1443
        optimal_fiber_length=0.13793 tendon_slack_length=0.1131 pennation_angle=0.3490659
      PathPoint: left_crus (0.01922724 -0.0009918017 -0.02762922)
      PathPoint: left_calx (0.02091146 0.007977913 -0.001474798)
      PathPoint: left_calx (0.01885835 0.02308972 -0.0121654)
      PathWrap: wrap_object=left_crus
      PathWrap: wrap_object=left_calx
    Millard2012EquilibriumMuscle left_tibialis_caudalis: min_control=0.01 max_isometric_force=45
        optimal_fiber_length=0.10237 tendon_slack_length=0.08253 pennation_angle=0.3490659
      PathPoint: left_calx (-0.007351065 0.001991383 0.01177341)
      PathPoint: left_crus (-0.005693826 0.01250566 -0.2086469)
      PathPoint: left_crus (0.01587225 0.01251421 -0.03045292)
      PathWrap: wrap_object=left_crus
      PathWrap: wrap_object=left_calx
    Millard2012EquilibriumMuscle left_tibialis_cranialis: min_control=0.01 max_isometric_force=45
        optimal_fiber_length=0.11974 tendon_slack_length=0.09653 pennation_angle=0.3490659
      PathPoint: left_calx (-0.006618192 0.02479413 -0.008788555)
      PathPoint: left_calx (-0.006502612 0.006635826 -0.003158624)
      PathPoint: left_crus (0.005099351 -0.02122879 -0.03951714)
      PathWrap: wrap_object=left_crus
      PathWrap: wrap_object=left_calx
    Millard2012EquilibriumMuscle left_popliteus: min_control=0.01 max_isometric_force=119.2033
        optimal_fiber_length=0.01221 tendon_slack_length=0.04508 pennation_angle=0.7566002
      PathPoint: left_femur (0.01925391 0.00411341 -0.1781618)
      PathPoint: left_crus (0.01997308 -0.000684713 -0.008634819)
      PathPoint: left_crus (-0.007345652 0.00369628 -0.04395002)
      PathWrap: wrap_object=left_femur
      PathWrap: wrap_object=left_crus
    Millard2012EquilibriumMuscle right_sacrocaudalis: min_control=0.01 max_isometric_force=1 optimal_fiber_length=0.01
        tendon_slack_length=0 pennation_angle=0
      PathPoint: cauda (-0.015085 0.069395 0.018305)
      PathPoint: abdomen (-0.01098 0.01654 0.03546)
    Millard2012EquilibriumMuscle right_psoas_major: min_control=0.01 max_isometric_force=37.91612
        optimal_fiber_length=0.06764 tendon_slack_length=0.10399 pennation_angle=0.4775221
      PathPoint: right_femur (0.0107998 0.008359756 -0.02634766)
      PathPoint: abdomen (-0.02734 0.04867 0.00284)
      PathWrap: wrap_object=right_femur
    Millard2012EquilibriumMuscle right_psoas_minor: min_control=0.01 max_isometric_force=37.91612
        optimal_fiber_length=0.06668 tendon_slack_length=0.1025 pennation_angle=0.7737045
      PathPoint: pelvis (-0.02968979 -0.01935031 -0.09857145)
      PathPoint: abdomen (-0.00912 -0.00102 -0.00319)
    Millard2012EquilibriumMuscle right_adductor_longus: min_control=0.01 max_isometric_force=68.88
        optimal_fiber_length=0.0207 tendon_slack_length=0.03398 pennation_angle=0.4886922
      PathPoint: right_femur (-0.001160138 0.01254479 -0.03961502)
      PathPoint: pelvis (-0.01626975 -0.01960304 -0.1136864)
      PathWrap: wrap_object=right_femur
    Millard2012EquilibriumMuscle right_gemelli: min_control=0.01 max_isometric_force=51.36 optimal_fiber_length=0.01046
        tendon_slack_length=0.02672 pennation_angle=0.7490953
      PathPoint: right_femur (-0.007084219 0.01209365 -0.00877724)
      PathPoint: pelvis (-0.04568968 0.02212929 -0.1161648)
      PathWrap: wrap_object=right_femur
    Millard2012EquilibriumMuscle right_gluteus_medius: min_control=0.01 max_isometric_force=513.2042
        optimal_fiber_length=0.03845 tendon_slack_length=0.06153 pennation_angle=0.643852
      PathPoint: right_femur (-0.01360964 0.005570897 0.001452915)
      PathPoint: pelvis (-0.04032995 -0.00455694 -0.02447294)
      PathWrap: wrap_object=right_femur
    Millard2012EquilibriumMuscle right_gluteus_profundus: min_control=0.01 max_isometric_force=126.96
        optimal_fiber_length=0.00832 tendon_slack_length=0.05253 pennation_angle=0.461116
      PathPoint: right_femur (-0.01462655 0.002361436 -0.005909289)
      PathPoint: pelvis (-0.03733983 0.0009879691 -0.06688266)
      PathWrap: wrap_object=right_femur
    Millard2012EquilibriumMuscle right_gluteus_superficialis: min_control=0.01 max_isometric_force=127.4565
        optimal_fiber_length=0.07149 tendon_slack_length=0.05838 pennation_angle=0.7482227
      PathPoint: pelvis (-0.002629879 0.02331889 -0.03568485)
      PathPoint: right_femur (-0.01434774 0.01455299 -0.01273286)
      PathWrap: wrap_object=right_femur
    Millard2012EquilibriumMuscle right_iliacus: min_control=0.01 max_isometric_force=75.83223
        optimal_fiber_length=0.03015 tendon_slack_length=0.04636 pennation_angle=0.2755875
      PathPoint: right_femur (0.009903923 0.0087006 -0.02453558)
      PathPoint: pelvis (-0.0376499 -0.0193128 -0.05312307)
      PathWrap: wrap_object=right_femur
    Millard2012EquilibriumMuscle right_obturator_ext: min_control=0.01 max_isometric_force=132.96
        optimal_fiber_length=0.01875 tendon_slack_length=0.02626 pennation_angle=0.5843362
      PathPoint: right_femur (-0.003929767 0.01161849 -0.01493836)
      PathPoint: pelvis (-0.02636966 0.009881426 -0.1346747)
      PathWrap: wrap_object=right_femur
    Millard2012EquilibriumMuscle right_obturator_int: min_control=0.01 max_isometric_force=188.4
        optimal_fiber_length=0.01601 tendon_slack_length=0.03523 pennation_angle=0.4537856
      PathPoint: pelvis (-0.08849972 -0.0006007407 -0.1162287)
      PathPoint: right_femur (0.01548305 0.02343179 -0.007504997)
      PathWrap: wrap_object=right_femur
    Millard2012EquilibriumMuscle right_piriformis: min_control=0.01 max_isometric_force=104.3504
        optimal_fiber_length=0.05836 tendon_slack_length=0.11024 pennation_angle=0.5457645
      PathPoint: right_femur (-0.02931705 0.007020044 0.004584966)
      PathPoint: pelvis (-0.04174985 0.02140556 -0.04928048)
      PathWrap: wrap_object=right_femur
    Millard2012EquilibriumMuscle right_pectineus: min_control=0.01 max_isometric_force=191.76
        optimal_fiber_length=0.03766 tendon_slack_length=0.12054 pennation_angle=0.726406
      PathPoint: right_femur (0.005340401 -0.007953292 -0.1381647)
      PathPoint: pelvis (-0.02894977 -0.01907223 -0.1056387)
      PathWrap: wrap_object=right_femur
    Millard2012EquilibriumMuscle right_sartorius_caudal: min_control=0.01 max_isometric_force=21.7012
        optimal_fiber_length=0.22579 tendon_slack_length=0.06577 pennation_angle=0.6871361
      PathPoint: pelvis (-0.04704 -0.0314433 -0.01851542)
      PathPoint: right_crus (0.01039205 -0.01800886 -0.01866342)
      PathPoint: right_crus (0.007534614 -0.0237461 -0.04658081)
      PathWrap: wrap_object=right_femur
      PathWrap: wrap_object=right_crus
    Millard2012EquilibriumMuscle right_sartorius_cranial: min_control=0.01 max_isometric_force=66.24
        optimal_fiber_length=0.18837 tendon_slack_length=0.07883 pennation_angle=0.6871361
      PathPoint: pelvis (-0.05115003 -0.02228683 -0.002187506)
      PathPoint: right_crus (-0.003927347 -0.02528688 0.006991514)
      PathPoint: right_crus (-0.003962397 -0.02592 0.002029694)
      PathWrap: wrap_object=right_femur
      PathWrap: wrap_object=right_crus
    Millard2012EquilibriumMuscle right_tensor_fasciae: min_control=0.01 max_isometric_force=51.22743
        optimal_fiber_length=0.13469 tendon_slack_length=0.02711 pennation_angle=0.8501499
      PathPoint: pelvis (-0.04767 -0.02863159 -0.01749389)
      PathPoint: right_femur (-0.02455508 -0.008660538 -0.0881284)
      PathWrap: wrap_object=right_femur
    Millard2012EquilibriumMuscle right_quadratus_femoris: min_control=0.01 max_isometric_force=64.8
        optimal_fiber_length=0.02843 tendon_slack_length=0.01669 pennation_angle=0.5274385
      PathPoint: pelvis (-0.04513961 0.02709504 -0.1452626)
      PathPoint: right_femur (-0.0005635166 0.01526704 -0.02775018)
      PathWrap: wrap_object=right_femur
    Millard2012EquilibriumMuscle right_vastus_lateralis: min_control=0.01 max_isometric_force=487.68
        optimal_fiber_length=0.08996 tendon_slack_length=0.15346 pennation_angle=0.8820894
      PathPoint: right_femur (-0.01338368 0.001699108 -0.02206078)
      PathPoint: right_crus (-0.01236138 -0.02359267 -0.004868869)
      PathPoint: right_crus (-0.005282228 -0.02474066 -0.03001173)
      PathWrap: wrap_object=right_femur
      PathWrap: wrap_object=right_crus
    Millard2012EquilibriumMuscle right_vastus_medialis: min_control=0.01 max_isometric_force=513.84
        optimal_fiber_length=0.04727 tendon_slack_length=0.16983 pennation_angle=0.6565929
      PathPoint: right_femur (0.004983082 -0.0007753342 -0.02744101)
      PathPoint: right_crus (-0.0003402884 -0.02199953 0.00574605)
      PathPoint: right_crus (0.002569505 -0.02529311 -0.02954001)
      PathWrap: wrap_object=right_femur
      PathWrap: wrap_object=right_crus
    Millard2012EquilibriumMuscle right_rectus_femoris: min_control=0.01 max_isometric_force=444.1453
        optimal_fiber_length=0.04521 tendon_slack_length=0.2098 pennation_angle=0.6059783
      PathPoint: pelvis (-0.04476981 -0.01037195 -0.08272809)
      PathPoint: right_crus (-0.008272265 -0.02476321 0.005033487)
      PathPoint: right_crus (-0.0006057662 -0.02453135 -0.02766882)
      PathWrap: wrap_object=right_femur
      PathWrap: wrap_object=right_crus
    Millard2012EquilibriumMuscle right_abductor_cruris: min_control=0.01 max_isometric_force=5.64705
        optimal_fiber_length=0.22742 tendon_slack_length=0.08206 pennation_angle=0
      PathPoint: pelvis (-0.03442971 0.03241502 -0.09900048)
      PathPoint: right_crus (-0.01001865 0.06213137 -0.03406278)
      PathPoint: right_crus (-0.002037115 -0.02636059 -0.1139867)
      PathWrap: wrap_object=right_femur
      PathWrap: wrap_object=right_crus
    Millard2012EquilibriumMuscle right_adductoren: min_control=0.01 max_isometric_force=342.3875
        optimal_fiber_length=0.0652 tendon_slack_length=0.03153 pennation_angle=0.4886922
      PathPoint: right_femur (-0.00576962 0.001546563 -0.09464607)
      PathPoint: pelvis (-0.01385966 0.001709185 -0.1381717)
      PathWrap: wrap_object=right_femur
    Millard2012EquilibriumMuscle right_biceps_femoris_longum: min_control=0.01 max_isometric_force=284.2208
        optimal_fiber_length=0.07889 tendon_slack_length=0.14069 pennation_angle=0.6728244
      PathPoint: pelvis (-0.06269962 0.03354394 -0.1346836)
      PathPoint: right_crus (-0.02112957 0.05513865 -0.02700034)
      PathPoint: right_crus (-0.008209864 -0.02551193 -0.04014325)
      PathWrap: wrap_object=right_femur
      PathWrap: wrap_object=right_crus
    Millard2012EquilibriumMuscle right_biceps_femoris_breve: min_control=0.01 max_isometric_force=400
        optimal_fiber_length=0.06353 tendon_slack_length=0.11329 pennation_angle=0
      PathPoint: right_femur (-0.01648367 0.03790078 -0.071166)
      PathPoint: right_crus (-0.02112957 0.05513865 -0.02700034)
      PathPoint: right_crus (-0.008209864 -0.02551193 -0.04014325)
      PathWrap: wrap_object=right_femur
      PathWrap: wrap_object=right_crus
    Millard2012EquilibriumMuscle right_gracilis_tractus_calcaneus: min_control=0.01 max_isometric_force=217.6883
        optimal_fiber_length=0.16507 tendon_slack_length=0.08512 pennation_angle=0.8794714
      PathPoint: pelvis (-0.01247964 0.006437613 -0.1441109)
      PathPoint: right_crus (0.02771749 0.03889523 -0.02591019)
      PathPoint: right_crus (0.01074185 -0.01856052 -0.06873311)
      PathWrap: wrap_object=right_femur
      PathWrap: wrap_object=right_crus
    Millard2012EquilibriumMuscle right_semimembranosus: min_control=0.01 max_isometric_force=223.3075
        optimal_fiber_length=0.16401 tendon_slack_length=0.0354 pennation_angle=0.4832817
      PathPoint: pelvis (-0.04550958 0.03546724 -0.1505976)
      PathPoint: right_crus (0.01582977 0.01081721 -0.00349357)
      PathPoint: right_crus (0.009044308 -0.01274321 -0.01610185)
      PathWrap: wrap_object=right_femur
      PathWrap: wrap_object=right_crus
    Millard2012EquilibriumMuscle right_semitendinosus: min_control=0.01 max_isometric_force=83.93746
        optimal_fiber_length=0.18363 tendon_slack_length=0.0673 pennation_angle=0.6091199
      PathPoint: pelvis (-0.06079961 0.03289027 -0.1396415)
      PathPoint: right_crus (0.02117468 0.03945662 -0.04689386)
      PathPoint: right_crus (0.01089318 -0.01675963 -0.06962807)
      PathWrap: wrap_object=right_femur
      PathWrap: wrap_object=right_crus
    Millard2012EquilibriumMuscle right_gastrocnemius_lateralis: min_control=0.01 max_isometric_force=604.4022
        optimal_fiber_length=0.02336 tendon_slack_length=0.22723 pennation_angle=0.4665265
      PathPoint: right_femur (-0.01479554 0.001771338 -0.1605136)
      PathPoint: right_crus (-0.02084922 0.02156451 -0.01486016)
      PathPoint: right_calx (-0.01892265 0.01965394 0.03623484)
      PathWrap: wrap_object=right_femur
      PathWrap: wrap_object=right_crus
      PathWrap: wrap_object=right_calx
    Millard2012EquilibriumMuscle right_gastrocnemius_medialis: min_control=0.01 max_isometric_force=488.1962
        optimal_fiber_length=0.03493 tendon_slack_length=0.24724 pennation_angle=0.6635742
      PathPoint: right_femur (0.007953776 0.0004361205 -0.1570573)
      PathPoint: right_crus (0.006284983 0.0248438 -0.02243406)
      PathPoint: right_calx (-0.01608693 0.02000821 0.03722972)
      PathWrap: wrap_object=right_femur
      PathWrap: wrap_object=right_crus
      PathWrap: wrap_object=right_calx
    Millard2012EquilibriumMuscle right_peroneus_longus: min_control=0.01 max_isometric_force=327.1443
        optimal_fiber_length=0.13793 tendon_slack_length=0.1131 pennation_angle=0.3490659
      PathPoint: right_crus (-0.01714805 -0.001222631 -0.02895675)
      PathPoint: right_calx (-0.01969608 0.009405218 -0.005168924)
      PathPoint: right_calx (-0.01470259 0.02426934 -0.01521848)
      PathWrap: wrap_object=right_crus
      PathWrap: wrap_object=right_calx
    Millard2012EquilibriumMuscle right_tibialis_caudalis: min_control=0.01 max_isometric_force=45
        optimal_fiber_length=0.10237 tendon_slack_length=0.08253 pennation_angle=0.3490659
      PathPoint: right_calx (0.005229312 0.001549199 0.01291786)
      PathPoint: right_crus (0.02072823 0.01267333 -0.2076826)
      PathPoint: right_crus (-0.01376761 0.01232613 -0.03153464)
      PathWrap: wrap_object=right_crus
      PathWrap: wrap_object=right_calx
    Millard2012EquilibriumMuscle right_tibialis_cranialis: min_control=0.01 max_isometric_force=45
        optimal_fiber_length=0.11974 tendon_slack_length=0.09653 pennation_angle=0.3490659
      PathPoint: right_calx (0.009803977 0.02421692 -0.007294607)
      PathPoint: right_calx (0.007411443 0.006146764 -0.001892842)
      PathPoint: right_crus (-0.00193587 -0.02127344 -0.03977389)
      PathWrap: wrap_object=right_crus
      PathWrap: wrap_object=right_calx
    Millard2012EquilibriumMuscle right_popliteus: min_control=0.01 max_isometric_force=119.2033
        optimal_fiber_length=0.01221 tendon_slack_length=0.04508 pennation_angle=0.7566002
      PathPoint: right_femur (-0.01608466 0.004137364 -0.1784753)
      PathPoint: right_crus (-0.01928026 -0.0009338057 -0.01006739)
      PathPoint: right_crus (0.01048224 0.003809412 -0.04329938)
      PathWrap: wrap_object=right_femur
      PathWrap: wrap_object=right_crus
    # Ground - Thorax
    PointActuator FX: body=thorax point=(-0.034 0 0) point_is_global=false direction=(1 0 0) force_is_global=true
        optimal_force=1e-9
    PointActuator FY: body=thorax point=(-0.034 0 0) point_is_global=false direction=(0 1 0) force_is_global=true
        optimal_force=1e-9
    PointActuator FZ: body=thorax point=(-0.034 0 0) point_is_global=false direction=(0 0 1) force_is_global=true
        optimal_force=1e-9
    # Ground - left Scapula
    CoordinateActuator motor_left_r_m_superioris_sagittal: coordinate=left_r_m_superioris_sagittal optimal_force=0
    CoordinateActuator motor_left_r_m_superioris_frontal: coordinate=left_r_m_superioris_frontal optimal_force=0
    CoordinateActuator motor_left_r_m_superioris_horizontal: coordinate=left_r_m_superioris_horizontal optimal_force=0
    CoordinateActuator motor_left_r_m_superioris_transx: coordinate=left_r_m_superioris_transx optimal_force=0
    CoordinateActuator motor_left_r_m_superioris_transy: coordinate=left_r_m_superioris_transy optimal_force=0
    CoordinateActuator motor_left_r_m_superioris_transz: coordinate=left_r_m_superioris_transz optimal_force=0
    # Ground - right Scapula
    CoordinateActuator motor_right_r_m_superioris_sagittal: coordinate=right_r_m_superioris_sagittal optimal_force=0
    CoordinateActuator motor_right_r_m_superioris_frontal: coordinate=right_r_m_superioris_frontal optimal_force=0
    CoordinateActuator motor_right_r_m_superioris_horizontal: coordinate=right_r_m_superioris_horizontal
        optimal_force=0
    CoordinateActuator motor_right_r_m_superioris_transx: coordinate=right_r_m_superioris_transx optimal_force=0
    CoordinateActuator motor_right_r_m_superioris_transy: coordinate=right_r_m_superioris_transy optimal_force=0
    CoordinateActuator motor_right_r_m_superioris_transz: coordinate=right_r_m_superioris_transz optimal_force=0
    # Ground - Pelvis
    CoordinateActuator motor_m_inferioris_sagittal: coordinate=m_inferioris_sagittal optimal_force=0
    CoordinateActuator motor_m_inferioris_frontal: coordinate=m_inferioris_frontal optimal_force=0
    CoordinateActuator motor_m_inferioris_horizontal: coordinate=m_inferioris_horizontal optimal_force=0
    CoordinateActuator motor_left_r_coxae_sagittal: coordinate=left_r_coxae_sagittal optimal_force=0
    CoordinateActuator motor_left_r_coxae_frontal: coordinate=left_r_coxae_frontal optimal_force=0
    CoordinateActuator motor_left_r_coxae_horizontal: coordinate=left_r_coxae_horizontal optimal_force=0
    CoordinateActuator motor_right_r_coxae_sagittal: coordinate=right_r_coxae_sagittal optimal_force=0
    CoordinateActuator motor_right_r_coxae_frontal: coordinate=right_r_coxae_frontal optimal_force=0
    CoordinateActuator motor_right_r_coxae_horizontal: coordinate=right_r_coxae_horizontal optimal_force=0
    CoordinateActuator motor_right_r_genus_sagittal: coordinate=right_r_genus_sagittal optimal_force=0
    CoordinateActuator motor_right_r_genus_frontal: coordinate=right_r_genus_frontal optimal_force=0
    CoordinateActuator motor_right_r_genus_horizontal: coordinate=right_r_genus_horizontal optimal_force=0
    CoordinateActuator motor_right_r_talocruralis_sagittal: coordinate=right_r_talocruralis_sagittal optimal_force=0
    CoordinateActuator motor_right_r_talocruralis_frontal: coordinate=right_r_talocruralis_frontal optimal_force=0
    CoordinateActuator motor_right_r_talocruralis_horizontal: coordinate=right_r_talocruralis_horizontal
        optimal_force=0
    CoordinateActuator motor_right_r_hindpaw_sagittal: coordinate=right_r_hindpaw_sagittal optimal_force=0
    CoordinateActuator motor_right_r_hindpaw_frontal: coordinate=right_r_hindpaw_frontal optimal_force=0
    CoordinateActuator motor_right_r_hindpaw_horizontal: coordinate=right_r_hindpaw_horizontal optimal_force=0
    CoordinateActuator motor_left_r_genus_sagittal: coordinate=left_r_genus_sagittal optimal_force=0
    CoordinateActuator motor_left_r_genus_frontal: coordinate=left_r_genus_frontal optimal_force=0
    CoordinateActuator motor_left_r_genus_horizontal: coordinate=left_r_genus_horizontal optimal_force=0
    CoordinateActuator motor_left_r_talocruralis_sagittal: coordinate=left_r_talocruralis_sagittal optimal_force=0
    CoordinateActuator motor_left_r_talocruralis_frontal: coordinate=left_r_talocruralis_frontal optimal_force=0
    CoordinateActuator motor_left_r_talocruralis_horizontal: coordinate=left_r_talocruralis_horizontal optimal_force=0
    CoordinateActuator motor_left_r_hindpaw_sagittal: coordinate=left_r_hindpaw_sagittal optimal_force=0
    CoordinateActuator motor_left_r_hindpaw_frontal: coordinate=left_r_hindpaw_frontal optimal_force=0
    CoordinateActuator motor_left_r_hindpaw_horizontal: coordinate=left_r_hindpaw_horizontal optimal_force=0
    CoordinateActuator motor_right_r_deltoidea_sagittal: coordinate=right_r_deltoidea_sagittal optimal_force=0
    CoordinateActuator motor_right_r_deltoidea_frontal: coordinate=right_r_deltoidea_frontal optimal_force=0
    CoordinateActuator motor_right_r_deltoidea_horizontal: coordinate=right_r_deltoidea_horizontal optimal_force=0
    CoordinateActuator motor_right_r_cubitalis_sagittal: coordinate=right_r_cubitalis_sagittal optimal_force=0
    CoordinateActuator motor_right_r_cubitalis_frontal: coordinate=right_r_cubitalis_frontal optimal_force=0
    CoordinateActuator motor_right_r_cubitalis_horizontal: coordinate=right_r_cubitalis_horizontal optimal_force=0
    CoordinateActuator motor_right_r_carpalis_sagittal: coordinate=right_r_carpalis_sagittal optimal_force=0
    CoordinateActuator motor_right_r_carpalis_frontal: coordinate=right_r_carpalis_frontal optimal_force=0
    CoordinateActuator motor_right_r_carpalis_horizontal: coordinate=right_r_carpalis_horizontal optimal_force=0
    CoordinateActuator motor_right_r_forepaw_sagittal: coordinate=right_r_forepaw_sagittal optimal_force=0
    CoordinateActuator motor_right_r_forepaw_frontal: coordinate=right_r_forepaw_frontal optimal_force=0
    CoordinateActuator motor_right_r_forepaw_horizontal: coordinate=right_r_forepaw_horizontal optimal_force=0
    CoordinateActuator motor_left_r_deltoidea_sagittal: coordinate=left_r_deltoidea_sagittal optimal_force=0
    CoordinateActuator motor_left_r_deltoidea_frontal: coordinate=left_r_deltoidea_frontal optimal_force=0
    CoordinateActuator motor_left_r_deltoidea_horizontal: coordinate=left_r_deltoidea_horizontal optimal_force=0
    CoordinateActuator motor_left_r_cubitalis_sagittal: coordinate=left_r_cubitalis_sagittal optimal_force=0
    CoordinateActuator motor_left_r_cubitalis_frontal: coordinate=left_r_cubitalis_frontal optimal_force=0
    CoordinateActuator motor_left_r_cubitalis_horizontal: coordinate=left_r_cubitalis_horizontal optimal_force=0
    CoordinateActuator motor_left_r_carpalis_sagittal: coordinate=left_r_carpalis_sagittal optimal_force=0
    CoordinateActuator motor_left_r_carpalis_frontal: coordinate=left_r_carpalis_frontal optimal_force=0
    CoordinateActuator motor_left_r_carpalis_horizontal: coordinate=left_r_carpalis_horizontal optimal_force=0
    CoordinateActuator motor_left_r_forepaw_sagittal: coordinate=left_r_forepaw_sagittal optimal_force=0
    CoordinateActuator motor_left_r_forepaw_frontal: coordinate=left_r_forepaw_frontal optimal_force=0
    CoordinateActuator motor_left_r_forepaw_horizontal: coordinate=left_r_forepaw_horizontal optimal_force=0
    TorqueActuator MX: bodyA=thorax bodyB=ground torque_is_global=true axis=(1 0 0) optimal_force=1e-9
    TorqueActuator MY: bodyA=thorax bodyB=ground torque_is_global=true axis=(0 1 0) optimal_force=1e-9
    TorqueActuator MZ: bodyA=thorax bodyB=ground torque_is_global=true axis=(0 0 1) optimal_force=1e-9
  BodySet:
    Body ground: mass=0 mass_center=(0 0 0) inertia_xx=0 inertia_yy=0 inertia_zz=0 meshes=box.obj
    Body thorax: mass=3.76044 mass_center=(0.0009 -0.0699 0.0996) inertia_xx=0.0378039 inertia_yy=0.02207351
        inertia_zz=0.03236193 inertia_xy=-0.000066693 inertia_xz=-0.0007913186 inertia_yz=-0.004094456
        meshes=new-thorax.obj
      CustomJoint ground_thorax: parent_body=ground location_in_parent=(0 0 0) location=(0 0 0)
        Coordinate thorax_sagittal: default_value=0.05235988 initial_value=0.05235988 range=(-3.141593 3.141593)
            keys=s_key clamped=true
        Coordinate thorax_frontal: default_value=0 initial_value=0 range=(-3.141593 3.141593) keys=f_key clamped=true
        Coordinate thorax_horizontal: default_value=0 initial_value=0 range=(-3.141593 3.141593) keys=h_key
            clamped=true
        Coordinate thorax_transx: default_value=0 initial_value=0 range=(-100 100) clamped=true locked=true
        Coordinate thorax_transy: default_value=-0.1 initial_value=-0.1 range=(-100 100) clamped=true locked=true
        Coordinate thorax_transz: default_value=0.23 initial_value=0.23 range=(-100 100) clamped=true locked=true
        SpatialTransform:
          TransformAxis rotation1: axis=(1 0 0) coordinates=thorax_sagittal LinearFunction(coefficients=1 0)
          TransformAxis rotation2: axis=(0 1 0) coordinates=thorax_frontal LinearFunction(coefficients=1 0)
          TransformAxis rotation3: axis=(0 0 1) coordinates=thorax_horizontal LinearFunction(coefficients=1 0)
          TransformAxis translation1: axis=(1 0 0) coordinates=thorax_transx LinearFunction(coefficients=1 0)
          TransformAxis translation2: axis=(0 1 0) coordinates=thorax_transy LinearFunction(coefficients=1 0)
          TransformAxis translation3: axis=(0 0 1) coordinates=thorax_transz LinearFunction(coefficients=1 0)
    Body cervix: mass=0.96876 mass_center=(0.0092 -0.0898 0.0353) inertia_xx=0.003161482 inertia_yy=0.0007512777
        inertia_zz=0.002748399 inertia_xy=0.0000060819 inertia_xz=0.0000047024 inertia_yz=0.001089525
        meshes=new-cervix.obj
      CustomJoint thorax_cervix: parent_body=thorax location_in_parent=(0 -0.217 0.08) location=(0 0 0)
        Coordinate cervix_sagittal: default_value=-0.1745329 initial_value=-0.1745329 range=(-1.570796 1.570796)
            clamped=true locked=true
        Coordinate cervix_frontal: default_value=0 initial_value=0 range=(-1.570796 1.570796) clamped=true locked=true
        Coordinate cervix_horizontal: default_value=0 initial_value=0 range=(-1.570796 1.570796) clamped=true
            locked=true
        SpatialTransform: axes_held_at_zero=(translation1 translation2 translation3)
          TransformAxis rotation1: axis=(1 0 0) coordinates=cervix_sagittal LinearFunction(coefficients=1 0)
          TransformAxis rotation2: axis=(0 1 0) coordinates=cervix_frontal LinearFunction(coefficients=1 0)
          TransformAxis rotation3: axis=(0 0 1) coordinates=cervix_horizontal LinearFunction(coefficients=1 0)
    Body caput: mass=1.27236 mass_center=(-0.00119 -0.09091 -0.01684) inertia_xx=0.004753825 inertia_yy=0.002823645
        inertia_zz=0.003319098 inertia_xy=-0.0001167701 inertia_xz=-0.0001105903 inertia_yz=-0.001287715
        meshes=new-caput.obj
      CustomJoint cervix_caput: parent_body=cervix location_in_parent=(0.00699 -0.1775 0.0415529) location=(0 0 0)
        Coordinate caput_sagittal: default_value=0 initial_value=0 range=(-1.570796 1.570796) clamped=true locked=true
        Coordinate caput_frontal: default_value=0 initial_value=0 range=(-1.570796 1.570796) clamped=true locked=true
        Coordinate caput_horizontal: default_value=0 initial_value=0 range=(-1.570796 1.570796) clamped=true
            locked=true
        SpatialTransform: axes_held_at_zero=(translation1 translation2 translation3)
          TransformAxis rotation1: axis=(1 0 0) coordinates=caput_sagittal LinearFunction(coefficients=1 0)
          TransformAxis rotation2: axis=(0 1 0) coordinates=caput_frontal LinearFunction(coefficients=1 0)
          TransformAxis rotation3: axis=(0 0 1) coordinates=caput_horizontal LinearFunction(coefficients=1 0)
    Body abdomen: mass=3.76044 mass_center=(0.0038 0.1049 -0.0096) inertia_xx=0.01418484 inertia_yy=0.001518844
        inertia_zz=0.01372333 inertia_xy=0.0004045839 inertia_xz=0.0000036729 inertia_yz=0.00171798
        meshes=new-abdomen.obj
      CustomJoint thorax_abdomen: parent_body=thorax location_in_parent=(0 0.048 0.1609) location=(0 0 0)
        Coordinate abdomen_sagittal: default_value=0 initial_value=0 range=(-1.570796 1.570796) clamped=true
        Coordinate abdomen_frontal: default_value=0 initial_value=0 range=(-1.570796 1.570796) clamped=true
        Coordinate abdomen_horizontal: default_value=0 initial_value=0 range=(-1.570796 1.570796) clamped=true
        SpatialTransform: axes_held_at_zero=(translation1 translation2 translation3)
          TransformAxis rotation1: axis=(1 0 0) coordinates=abdomen_sagittal LinearFunction(coefficients=1 0)
          TransformAxis rotation2: axis=(0 1 0) coordinates=abdomen_frontal LinearFunction(coefficients=1 0)
          TransformAxis rotation3: axis=(0 0 1) coordinates=abdomen_horizontal LinearFunction(coefficients=1 0)
    Body cauda: mass=0.01 mass_center=(0.0087 0.1049 -0.008) inertia_xx=0.0002079598 inertia_yy=0.0000590519
        inertia_zz=0.0001552826 inertia_xy=-0.0000182202 inertia_xz=0.0000106988 inertia_yz=0.000077173
        meshes=new-cauda.obj
      CustomJoint abdomen_cauda: parent_body=abdomen location_in_parent=(0 0.206 -0.0129) location=(0 0 0)
        Coordinate cauda_sagittal: default_value=0 initial_value=0 range=(-1.570796 1.570796) clamped=true locked=true
        Coordinate cauda_frontal: default_value=0 initial_value=0 range=(-1.570796 1.570796) clamped=true locked=true
        Coordinate cauda_horizontal: default_value=0 initial_value=0 range=(-1.570796 1.570796) clamped=true
            locked=true
        SpatialTransform: axes_held_at_zero=(translation1 translation2 translation3)
          TransformAxis rotation1: axis=(1 0 0) coordinates=cauda_sagittal LinearFunction(coefficients=1 0)
          TransformAxis rotation2: axis=(0 1 0) coordinates=cauda_frontal LinearFunction(coefficients=1 0)
          TransformAxis rotation3: axis=(0 0 1) coordinates=cauda_horizontal LinearFunction(coefficients=1 0)
    Body left_scapula: mass=0.272 mass_center=(0.00214 0.00385 0.00481) inertia_xx=0.0009240344 inertia_yy=0.0007625721
        inertia_zz=0.0002584677 inertia_xy=-0.0000389032 inertia_xz=0.0000562692 inertia_yz=-0.000120587
        meshes=new_stretched-scapula_l.obj
      CustomJoint thorax_left_scapula: parent_body=thorax location_in_parent=(0 0 0) location=(0 0 0)
        Coordinate left_r_m_superioris_sagittal: default_value=-0.1902409 initial_value=-0.1902409
            range=(-3.141593 3.141593) clamped=true
        Coordinate left_r_m_superioris_frontal: default_value=-0.04886922 initial_value=-0.04886922
            range=(-1.570796 1.570796) clamped=true
        Coordinate left_r_m_superioris_horizontal: default_value=-0.005235988 initial_value=-0.005235988
            range=(-1.570796 1.570796) clamped=true
        Coordinate left_r_m_superioris_transx: default_value=0.06561 initial_value=0.06561 range=(-10 10) clamped=true
        Coordinate left_r_m_superioris_transy: default_value=-0.183 initial_value=-0.183 range=(-10 10) clamped=true
        Coordinate left_r_m_superioris_transz: default_value=0.11 initial_value=0.11 range=(-10 10) clamped=true
        SpatialTransform:
          TransformAxis rotation1: axis=(1 0 0) coordinates=left_r_m_superioris_sagittal
              LinearFunction(coefficients=1 0)
          TransformAxis rotation2: axis=(0 1 0) coordinates=left_r_m_superioris_frontal
              LinearFunction(coefficients=1 0)
          TransformAxis rotation3: axis=(0 0 1) coordinates=left_r_m_superioris_horizontal
              LinearFunction(coefficients=1 0)
          TransformAxis translation1: axis=(1 0 0) coordinates=left_r_m_superioris_transx
              LinearFunction(coefficients=1 0)
          TransformAxis translation2: axis=(0 1 0) coordinates=left_r_m_superioris_transy
              LinearFunction(coefficients=1 0)
          TransformAxis translation3: axis=(0 0 1) coordinates=left_r_m_superioris_transz
              LinearFunction(coefficients=1 0)
    Body left_humerus: mass=0.36 mass_center=(0.00361 -0.00295 -0.06176) inertia_xx=0.001425618 inertia_yy=0.001389217
        inertia_zz=0.0001235678 inertia_xy=0.000013655 inertia_xz=-0.0000069604 inertia_yz=0.0000861508
        meshes=new_stretched-humerus_l.obj
      CustomJoint left_scapula_left_humerus: parent_body=left_scapula location_in_parent=(0 0 -0.1179835)
          location=(0 0 0)
        Coordinate left_r_deltoidea_sagittal: default_value=0.9232792 initial_value=0.9232792
            range=(-3.141593 3.141593) clamped=true
        Coordinate left_r_deltoidea_frontal: default_value=-0.001745329 initial_value=-0.001745329
            range=(-1.570796 1.570796) clamped=true
        Coordinate left_r_deltoidea_horizontal: default_value=0.02443461 initial_value=0.02443461
            range=(-1.570796 1.570796) clamped=true
        SpatialTransform: axes_held_at_zero=(translation1 translation2 translation3)
          TransformAxis rotation1: axis=(1 0 0) coordinates=left_r_deltoidea_sagittal LinearFunction(coefficients=1 0)
          TransformAxis rotation2: axis=(0 1 0) coordinates=left_r_deltoidea_frontal LinearFunction(coefficients=1 0)
          TransformAxis rotation3: axis=(0 0 1) coordinates=left_r_deltoidea_horizontal
              LinearFunction(coefficients=1 0)
      WrapCylinder left_humerus: radius=0.03 length=0.1 xyz_body_rotation=(0 1.570796 0) translation=(0 0 0)
    Body left_antebrachium: mass=0.118 mass_center=(0.00428 0.00492 -0.07767) inertia_xx=0.0004972638
        inertia_yy=0.0004795929 inertia_zz=0.0000311098 inertia_xy=0.0000029053 inertia_xz=0.00001333
        inertia_yz=-0.0000475647 meshes=new_stretched-antebrachium_l.obj
      CustomJoint left_humerus_left_antebrachium: parent_body=left_humerus location_in_parent=(0 0 -0.1462523)
          location=(0 0 0)
        Coordinate left_r_cubitalis_sagittal: default_value=-0.8656833 initial_value=-0.8656833
            range=(-3.141593 3.141593) clamped=true
        Coordinate left_r_cubitalis_frontal: default_value=0.07330383 initial_value=0.07330383
            range=(-1.570796 1.570796) clamped=true
        Coordinate left_r_cubitalis_horizontal: default_value=-0.01745329 initial_value=-0.01745329
            range=(-1.570796 1.570796) clamped=true
        SpatialTransform: axes_held_at_zero=(translation1 translation2 translation3)
          TransformAxis rotation1: axis=(1 0 0) coordinates=left_r_cubitalis_sagittal LinearFunction(coefficients=1 0)
          TransformAxis rotation2: axis=(0 1 0) coordinates=left_r_cubitalis_frontal LinearFunction(coefficients=1 0)
          TransformAxis rotation3: axis=(0 0 1) coordinates=left_r_cubitalis_horizontal
              LinearFunction(coefficients=1 0)
      WrapCylinder left_antebrachium: radius=0.013 length=0.1 xyz_body_rotation=(0 1.570796 0) translation=(0 0 0)
    Body left_carpus: mass=0.0205 mass_center=(-0.0008 0.00583 -0.03773) inertia_xx=0.0000722361
        inertia_yy=0.0000838296 inertia_zz=0.0000216593 inertia_xy=-0.0000006997 inertia_xz=-0.0000032748
        inertia_yz=0.0000021434 meshes=(new_stretched-carpus_l.obj new_stretched-carpus_metacarpus_l.obj)
      CustomJoint left_antebrachium_left_carpus: parent_body=left_antebrachium location_in_parent=(0 0 -0.1930928)
          location=(0 0 0)
        Coordinate left_r_carpalis_sagittal: default_value=-0.6492625 initial_value=-0.6492625
            range=(-3.141593 3.141593) clamped=true
        Coordinate left_r_carpalis_frontal: default_value=0.01396263 initial_value=0.01396263
            range=(-1.570796 1.570796) clamped=true
        Coordinate left_r_carpalis_horizontal: default_value=0.01396263 initial_value=0.01396263
            range=(-1.570796 1.570796) clamped=true
        SpatialTransform: axes_held_at_zero=(translation1 translation2 translation3)
          TransformAxis rotation1: axis=(1 0 0) coordinates=left_r_carpalis_sagittal LinearFunction(coefficients=1 0)
          TransformAxis rotation2: axis=(0 1 0) coordinates=left_r_carpalis_frontal LinearFunction(coefficients=1 0)
          TransformAxis rotation3: axis=(0 0 1) coordinates=left_r_carpalis_horizontal LinearFunction(coefficients=1 0)
      WrapCylinder left_carpus: radius=0.01 length=0.1 xyz_body_rotation=(0 1.570796 0) translation=(0 0 0)
    Body left_forepaw: mass=0.0205 mass_center=(0.00017 0.00442 -0.02165) inertia_xx=0.0000105177
        inertia_yy=0.0000181319 inertia_zz=0.0000095787 inertia_xy=-0.0000003871 inertia_xz=-0.0000008491
        inertia_yz=-0.0000012155 meshes=new_stretched-digiti_manus_l.obj
      CustomJoint left_carpus_left_forepaw: parent_body=left_carpus location_in_parent=(0 0 -0.1002879)
          location=(0 0 0)
        Coordinate left_r_forepaw_sagittal: default_value=0 initial_value=0 range=(-3.141593 3.141593) clamped=true
        Coordinate left_r_forepaw_frontal: default_value=0 initial_value=0 range=(-1.570796 1.570796) clamped=true
        Coordinate left_r_forepaw_horizontal: default_value=0 initial_value=0 range=(-1.570796 1.570796) clamped=true
        SpatialTransform: axes_held_at_zero=(translation1 translation2 translation3)
          TransformAxis rotation1: axis=(1 0 0) coordinates=left_r_forepaw_sagittal LinearFunction(coefficients=1 0)
          TransformAxis rotation2: axis=(0 1 0) coordinates=left_r_forepaw_frontal LinearFunction(coefficients=1 0)
          TransformAxis rotation3: axis=(0 0 1) coordinates=left_r_forepaw_horizontal LinearFunction(coefficients=1 0)
    Body right_scapula: mass=0.272 mass_center=(-0.00214 0.00385 0.00481) inertia_xx=0.0009240344
        inertia_yy=0.0007625721 inertia_zz=0.0002584677 inertia_xy=0.0000389032 inertia_xz=-0.0000562692
        inertia_yz=-0.000120587 meshes=new_stretched-scapula_r.obj
      CustomJoint thorax_right_scapula: parent_body=thorax location_in_parent=(0 0 0) location=(0 0 0)
        Coordinate right_r_m_superioris_sagittal: default_value=-0.1902409 initial_value=-0.1902409
            range=(-3.141593 3.141593) clamped=true
        Coordinate right_r_m_superioris_frontal: default_value=-0.04886922 initial_value=-0.04886922
            range=(-1.570796 1.570796) clamped=true
        Coordinate right_r_m_superioris_horizontal: default_value=-0.005235988 initial_value=-0.005235988
            range=(-1.570796 1.570796) clamped=true
        Coordinate right_r_m_superioris_transx: default_value=-0.06561 initial_value=-0.06561 range=(-10 10)
            clamped=true
        Coordinate right_r_m_superioris_transy: default_value=-0.183 initial_value=-0.183 range=(-10 10) clamped=true
        Coordinate right_r_m_superioris_transz: default_value=0.11 initial_value=0.11 range=(-10 10) clamped=true
        SpatialTransform:
          TransformAxis rotation1: axis=(1 0 0) coordinates=right_r_m_superioris_sagittal
              LinearFunction(coefficients=1 0)
          TransformAxis rotation2: axis=(0 1 0) coordinates=right_r_m_superioris_frontal
              LinearFunction(coefficients=1 0)
          TransformAxis rotation3: axis=(0 0 1) coordinates=right_r_m_superioris_horizontal
              LinearFunction(coefficients=1 0)
          TransformAxis translation1: axis=(1 0 0) coordinates=right_r_m_superioris_transx
              LinearFunction(coefficients=1 0)
          TransformAxis translation2: axis=(0 1 0) coordinates=right_r_m_superioris_transy
              LinearFunction(coefficients=1 0)
          TransformAxis translation3: axis=(0 0 1) coordinates=right_r_m_superioris_transz
              LinearFunction(coefficients=1 0)
    Body right_humerus: mass=0.36 mass_center=(-0.00361 -0.00295 -0.06176) inertia_xx=0.001425618
        inertia_yy=0.001389217 inertia_zz=0.0001235678 inertia_xy=-0.000013655 inertia_xz=0.0000069604
        inertia_yz=0.0000861508 meshes=new_stretched-humerus_r.obj
      CustomJoint right_scapula_right_humerus: parent_body=right_scapula location_in_parent=(0 0 -0.1179835)
          location=(0 0 0)
        Coordinate right_r_deltoidea_sagittal: default_value=0.9232792 initial_value=0.9232792
            range=(-3.141593 3.141593) clamped=true
        Coordinate right_r_deltoidea_frontal: default_value=-0.001745329 initial_value=-0.001745329
            range=(-1.570796 1.570796) clamped=true
        Coordinate right_r_deltoidea_horizontal: default_value=0.02443461 initial_value=0.02443461
            range=(-1.570796 1.570796) clamped=true
        SpatialTransform: axes_held_at_zero=(translation1 translation2 translation3)
          TransformAxis rotation1: axis=(1 0 0) coordinates=right_r_deltoidea_sagittal LinearFunction(coefficients=1 0)
          TransformAxis rotation2: axis=(0 1 0) coordinates=right_r_deltoidea_frontal LinearFunction(coefficients=1 0)
          TransformAxis rotation3: axis=(0 0 1) coordinates=right_r_deltoidea_horizontal
              LinearFunction(coefficients=1 0)
      WrapCylinder right_humerus: radius=0.03 length=0.1 xyz_body_rotation=(0 1.570796 0) translation=(0 0 0)
    Body right_antebrachium: mass=0.118 mass_center=(-0.00428 0.00492 -0.07767) inertia_xx=0.0004972638
        inertia_yy=0.0004795929 inertia_zz=0.0000311098 inertia_xy=-0.0000029053 inertia_xz=-0.00001333
        inertia_yz=-0.0000475647 meshes=new_stretched-antebrachium_r.obj
      CustomJoint right_humerus_right_antebrachium: parent_body=right_humerus location_in_parent=(0 0 -0.1462523)
          location=(0 0 0)
        Coordinate right_r_cubitalis_sagittal: default_value=-0.8656833 initial_value=-0.8656833
            range=(-3.141593 3.141593) clamped=true
        Coordinate right_r_cubitalis_frontal: default_value=0.07330383 initial_value=0.07330383
            range=(-1.570796 1.570796) clamped=true
        Coordinate right_r_cubitalis_horizontal: default_value=-0.01745329 initial_value=-0.01745329
            range=(-1.570796 1.570796) clamped=true
        SpatialTransform: axes_held_at_zero=(translation1 translation2 translation3)
          TransformAxis rotation1: axis=(1 0 0) coordinates=right_r_cubitalis_sagittal LinearFunction(coefficients=1 0)
          TransformAxis rotation2: axis=(0 1 0) coordinates=right_r_cubitalis_frontal LinearFunction(coefficients=1 0)
          TransformAxis rotation3: axis=(0 0 1) coordinates=right_r_cubitalis_horizontal
              LinearFunction(coefficients=1 0)
      WrapCylinder right_antebrachium: radius=0.013 length=0.1 xyz_body_rotation=(0 1.570796 0) translation=(0 0 0)
    Body right_carpus: mass=0.0205 mass_center=(0.0008 0.00583 -0.03773) inertia_xx=0.00002176 inertia_yy=0.0000252524
        inertia_zz=0.0000065245 inertia_xy=0.0000002108 inertia_xz=0.0000009865 inertia_yz=0.0000006457
        meshes=(new_stretched-carpus_r.obj new_stretched-carpus_metacarpus_r.obj)
      CustomJoint right_antebrachium_right_carpus: parent_body=right_antebrachium location_in_parent=(0 0 -0.1930928)
          location=(0 0 0)
        Coordinate right_r_carpalis_sagittal: default_value=-0.6492625 initial_value=-0.6492625
            range=(-3.141593 3.141593) clamped=true
        Coordinate right_r_carpalis_frontal: default_value=0.01396263 initial_value=0.01396263
            range=(-1.570796 1.570796) clamped=true
        Coordinate right_r_carpalis_horizontal: default_value=0.01396263 initial_value=0.01396263
            range=(-1.570796 1.570796) clamped=true
        SpatialTransform: axes_held_at_zero=(translation1 translation2 translation3)
          TransformAxis rotation1: axis=(1 0 0) coordinates=right_r_carpalis_sagittal LinearFunction(coefficients=1 0)
          TransformAxis rotation2: axis=(0 1 0) coordinates=right_r_carpalis_frontal LinearFunction(coefficients=1 0)
          TransformAxis rotation3: axis=(0 0 1) coordinates=right_r_carpalis_horizontal
              LinearFunction(coefficients=1 0)
      WrapCylinder right_carpus: radius=0.01 length=0.1 xyz_body_rotation=(0 1.570796 0) translation=(0 0 0)
    Body right_forepaw: mass=0.0205 mass_center=(-0.00017 0.00442 -0.02165) inertia_xx=0.0000105177
        inertia_yy=0.0000181319 inertia_zz=0.0000095787 inertia_xy=0.0000003871 inertia_xz=0.0000008491
        inertia_yz=-0.0000012155 meshes=new_stretched-digiti_manus_r.obj
      CustomJoint right_carpus_right_forepaw: parent_body=right_carpus location_in_parent=(0 0 -0.1002879)
          location=(0 0 0)
        Coordinate right_r_forepaw_sagittal: default_value=0 initial_value=0 range=(-3.141593 3.141593) clamped=true
        Coordinate right_r_forepaw_frontal: default_value=0 initial_value=0 range=(-1.570796 1.570796) clamped=true
        Coordinate right_r_forepaw_horizontal: default_value=0 initial_value=0 range=(-1.570796 1.570796) clamped=true
        SpatialTransform: axes_held_at_zero=(translation1 translation2 translation3)
          TransformAxis rotation1: axis=(1 0 0) coordinates=right_r_forepaw_sagittal LinearFunction(coefficients=1 0)
          TransformAxis rotation2: axis=(0 1 0) coordinates=right_r_forepaw_frontal LinearFunction(coefficients=1 0)
          TransformAxis rotation3: axis=(0 0 1) coordinates=right_r_forepaw_horizontal LinearFunction(coefficients=1 0)
    Body pelvis: mass=0.544 mass_center=(0 0.00707 -0.07404) inertia_xx=0.002122683 inertia_yy=0.002885953
        inertia_zz=0.001134768 inertia_xy=-0.0000010789 inertia_xz=0.0000198747 inertia_yz=0.0002563584
        meshes=new_stretched-pelvis.obj
      CustomJoint cauda_pelvis: parent_body=cauda location_in_parent=(0 0 0) location=(0 0 0)
        Coordinate m_inferioris_sagittal: default_value=0.5078908 initial_value=0.5078908 range=(-3.141593 3.141593)
            clamped=true
        Coordinate m_inferioris_frontal: default_value=0 initial_value=0 range=(-1.570796 1.570796) clamped=true
        Coordinate m_inferioris_horizontal: default_value=0 initial_value=0 range=(-1.570796 1.570796) clamped=true
        Coordinate m_inferioris_transx: default_value=0 initial_value=0 range=(-100 100) clamped=true locked=true
        Coordinate m_inferioris_transy: default_value=0 initial_value=0 range=(-100 100) clamped=true locked=true
        Coordinate m_inferioris_transz: default_value=0 initial_value=0 range=(-100 100) clamped=true locked=true
        SpatialTransform:
          TransformAxis rotation1: axis=(1 0 0) coordinates=m_inferioris_sagittal LinearFunction(coefficients=1 0)
          TransformAxis rotation2: axis=(0 1 0) coordinates=m_inferioris_frontal LinearFunction(coefficients=1 0)
          TransformAxis rotation3: axis=(0 0 1) coordinates=m_inferioris_horizontal LinearFunction(coefficients=1 0)
          TransformAxis translation1: axis=(1 0 0) coordinates=m_inferioris_transx LinearFunction(coefficients=1 0)
          TransformAxis translation2: axis=(0 1 0) coordinates=m_inferioris_transy LinearFunction(coefficients=1 0)
          TransformAxis translation3: axis=(0 0 1) coordinates=m_inferioris_transz LinearFunction(coefficients=1 0)
    Body left_femur: mass=0.673 mass_center=(0.00749 -0.00295 -0.09286) inertia_xx=0.003110121 inertia_yy=0.003173555
        inertia_zz=0.000251391 inertia_xy=-0.0000128676 inertia_xz=-0.0003301086 inertia_yz=-0.0000763332
        meshes=new_stretched-femur_l.obj
      CustomJoint pelvis_left_femur: parent_body=pelvis location_in_parent=(0.05553 0 -0.103) location=(0 0 0)
        Coordinate left_r_coxae_sagittal: default_value=-0.7819075 initial_value=-0.7819075 range=(-3.141593 3.141593)
            clamped=true
        Coordinate left_r_coxae_frontal: default_value=0.008726646 initial_value=0.008726646 range=(-1.570796 1.570796)
            clamped=true
        Coordinate left_r_coxae_horizontal: default_value=0.001745329 initial_value=0.001745329
            range=(-1.570796 1.570796) clamped=true
        SpatialTransform: axes_held_at_zero=(translation1 translation2 translation3)
          TransformAxis rotation1: axis=(1 0 0) coordinates=left_r_coxae_sagittal LinearFunction(coefficients=1 0)
          TransformAxis rotation2: axis=(0 1 0) coordinates=left_r_coxae_frontal LinearFunction(coefficients=1 0)
          TransformAxis rotation3: axis=(0 0 1) coordinates=left_r_coxae_horizontal LinearFunction(coefficients=1 0)
      WrapCylinder left_femur: radius=0.016 length=0.1 xyz_body_rotation=(0 1.570796 0) translation=(0 0 0)
    Body left_crus: mass=0.194 mass_center=(0.00301 0.00298 -0.10517) inertia_xx=0.0008776323 inertia_yy=0.0008800246
        inertia_zz=0.0000642979 inertia_xy=-0.0000032954 inertia_xz=0.00002802 inertia_yz=0.0000095163
        meshes=new_stretched-crus_l.obj
      CustomJoint left_femur_left_crus: parent_body=left_femur location_in_parent=(0 0 -0.1704777) location=(0 0 0)
        Coordinate left_r_genus_sagittal: default_value=0.588176 initial_value=0.588176 range=(-3.141593 3.141593)
            clamped=true
        Coordinate left_r_genus_frontal: default_value=0.02792527 initial_value=0.02792527 range=(-1.570796 1.570796)
            clamped=true
        Coordinate left_r_genus_horizontal: default_value=-0.006981317 initial_value=-0.006981317
            range=(-1.570796 1.570796) clamped=true
        SpatialTransform: axes_held_at_zero=(translation1 translation2 translation3)
          TransformAxis rotation1: axis=(1 0 0) coordinates=left_r_genus_sagittal LinearFunction(coefficients=1 0)
          TransformAxis rotation2: axis=(0 1 0) coordinates=left_r_genus_frontal LinearFunction(coefficients=1 0)
          TransformAxis rotation3: axis=(0 0 1) coordinates=left_r_genus_horizontal LinearFunction(coefficients=1 0)
      WrapCylinder left_crus: radius=0.02 length=0.1 xyz_body_rotation=(0 1.570796 0) translation=(0 0 0)
    Body left_calx: mass=0.055 mass_center=(0.00596 0.00871 -0.04856) inertia_xx=0.0001287891 inertia_yy=0.0001300621
        inertia_zz=0.0000108415 inertia_xy=0.0000005061 inertia_xz=-0.0000060734 inertia_yz=0.0000006131
        meshes=(new_stretched-calx_l.obj new_stretched-calx_tarsus_l.obj new_stretched-calx_metatarsus_l.obj)
      CustomJoint left_crus_left_calx: parent_body=left_crus location_in_parent=(0 0 -0.2185309) location=(0 0 0)
        Coordinate left_r_talocruralis_sagittal: default_value=-1.050688 initial_value=-1.050688
            range=(-3.141593 3.141593) clamped=true
        Coordinate left_r_talocruralis_frontal: default_value=0.05410521 initial_value=0.05410521
            range=(-1.570796 1.570796) clamped=true
        Coordinate left_r_talocruralis_horizontal: default_value=0.04014257 initial_value=0.04014257
            range=(-1.570796 1.570796) clamped=true
        SpatialTransform: axes_held_at_zero=(translation1 translation2 translation3)
          TransformAxis rotation1: axis=(1 0 0) coordinates=left_r_talocruralis_sagittal
              LinearFunction(coefficients=1 0)
          TransformAxis rotation2: axis=(0 1 0) coordinates=left_r_talocruralis_frontal
              LinearFunction(coefficients=1 0)
          TransformAxis rotation3: axis=(0 0 1) coordinates=left_r_talocruralis_horizontal
              LinearFunction(coefficients=1 0)
      WrapCylinder left_calx: radius=0.01 length=0.1 xyz_body_rotation=(0 1.570796 0) translation=(0 0 0)
    Body left_hindpaw: mass=0.034 mass_center=(0.00315 -0.00707 -0.02637) inertia_xx=0.0000201162
        inertia_yy=0.0000211489 inertia_zz=0.0000157163 inertia_xy=0.000002481 inertia_xz=-0.0000018174
        inertia_yz=-0.0000060299 meshes=new_stretched-digiti_pedis_l.obj
      CustomJoint left_calx_left_hindpaw: parent_body=left_calx location_in_parent=(0 0 -0.1343318) location=(0 0 0)
        Coordinate left_r_hindpaw_sagittal: default_value=0 initial_value=0 range=(-3.141593 3.141593) clamped=true
        Coordinate left_r_hindpaw_frontal: default_value=0 initial_value=0 range=(-1.570796 1.570796) clamped=true
        Coordinate left_r_hindpaw_horizontal: default_value=0 initial_value=0 range=(-1.570796 1.570796) clamped=true
        SpatialTransform: axes_held_at_zero=(translation1 translation2 translation3)
          TransformAxis rotation1: axis=(1 0 0) coordinates=left_r_hindpaw_sagittal LinearFunction(coefficients=1 0)
          TransformAxis rotation2: axis=(0 1 0) coordinates=left_r_hindpaw_frontal LinearFunction(coefficients=1 0)
          TransformAxis rotation3: axis=(0 0 1) coordinates=left_r_hindpaw_horizontal LinearFunction(coefficients=1 0)
    Body right_femur: mass=0.673 mass_center=(-0.00749 -0.00295 -0.09286) inertia_xx=0.003110121 inertia_yy=0.003173555
        inertia_zz=0.000251391 inertia_xy=0.0000128676 inertia_xz=0.0003301086 inertia_yz=-0.0000763332
        meshes=new_stretched-femur_r.obj
      CustomJoint pelvis_right_femur: parent_body=pelvis location_in_parent=(-0.05553 0 -0.103) location=(0 0 0)
        Coordinate right_r_coxae_sagittal: default_value=-0.7819075 initial_value=-0.7819075 range=(-3.141593 3.141593)
            clamped=true
        Coordinate right_r_coxae_frontal: default_value=0.008726646 initial_value=0.008726646
            range=(-1.570796 1.570796) clamped=true
        Coordinate right_r_coxae_horizontal: default_value=0.001745329 initial_value=0.001745329
            range=(-1.570796 1.570796) clamped=true
        SpatialTransform: axes_held_at_zero=(translation1 translation2 translation3)
          TransformAxis rotation1: axis=(1 0 0) coordinates=right_r_coxae_sagittal LinearFunction(coefficients=1 0)
          TransformAxis rotation2: axis=(0 1 0) coordinates=right_r_coxae_frontal LinearFunction(coefficients=1 0)
          TransformAxis rotation3: axis=(0 0 1) coordinates=right_r_coxae_horizontal LinearFunction(coefficients=1 0)
      WrapCylinder right_femur: radius=0.016 length=0.1 xyz_body_rotation=(0 1.570796 0) translation=(0 0 0)
    Body right_crus: mass=0.194 mass_center=(-0.00301 0.00298 -0.10517) inertia_xx=0.0008776323 inertia_yy=0.0008800246
        inertia_zz=0.0000642979 inertia_xy=0.0000032954 inertia_xz=-0.00002802 inertia_yz=0.0000095163
        meshes=new_stretched-crus_r.obj
      CustomJoint right_femur_right_crus: parent_body=right_femur location_in_parent=(0 0 -0.1704777) location=(0 0 0)
        Coordinate right_r_genus_sagittal: default_value=0.588176 initial_value=0.588176 range=(-3.141593 3.141593)
            clamped=true
        Coordinate right_r_genus_frontal: default_value=0.02792527 initial_value=0.02792527 range=(-1.570796 1.570796)
            clamped=true
        Coordinate right_r_genus_horizontal: default_value=-0.006981317 initial_value=-0.006981317
            range=(-1.570796 1.570796) clamped=true
        SpatialTransform: axes_held_at_zero=(translation1 translation2 translation3)
          TransformAxis rotation1: axis=(1 0 0) coordinates=right_r_genus_sagittal LinearFunction(coefficients=1 0)
          TransformAxis rotation2: axis=(0 1 0) coordinates=right_r_genus_frontal LinearFunction(coefficients=1 0)
          TransformAxis rotation3: axis=(0 0 1) coordinates=right_r_genus_horizontal LinearFunction(coefficients=1 0)
      WrapCylinder right_crus: radius=0.02 length=0.1 xyz_body_rotation=(0 1.570796 0) translation=(0 0 0)
    Body right_calx: mass=0.055 mass_center=(-0.00596 0.00871 -0.04856) inertia_xx=0.0001287891 inertia_yy=0.0001300621
        inertia_zz=0.0000108415 inertia_xy=-0.0000005061 inertia_xz=0.0000060734 inertia_yz=0.0000006131
        meshes=(new_stretched-calx_r.obj new_stretched-calx_tarsus_r.obj new_stretched-calx_metatarsus_r.obj)
      CustomJoint right_crus_right_calx: parent_body=right_crus location_in_parent=(0 0 -0.2185309) location=(0 0 0)
        Coordinate right_r_talocruralis_sagittal: default_value=-1.050688 initial_value=-1.050688
            range=(-3.141593 3.141593) clamped=true
        Coordinate right_r_talocruralis_frontal: default_value=0.05410521 initial_value=0.05410521
            range=(-1.570796 1.570796) clamped=true
        Coordinate right_r_talocruralis_horizontal: default_value=0.04014257 initial_value=0.04014257
            range=(-1.570796 1.570796) clamped=true
        SpatialTransform: axes_held_at_zero=(translation1 translation2 translation3)
          TransformAxis rotation1: axis=(1 0 0) coordinates=right_r_talocruralis_sagittal
              LinearFunction(coefficients=1 0)
          TransformAxis rotation2: axis=(0 1 0) coordinates=right_r_talocruralis_frontal
              LinearFunction(coefficients=1 0)
          TransformAxis rotation3: axis=(0 0 1) coordinates=right_r_talocruralis_horizontal
              LinearFunction(coefficients=1 0)
      WrapCylinder right_calx: radius=0.01 length=0.1 xyz_body_rotation=(0 1.570796 0) translation=(0 0 0)
    Body right_hindpaw: mass=0.034 mass_center=(-0.00315 -0.00707 -0.02637) inertia_xx=0.0000201162
        inertia_yy=0.0000211489 inertia_zz=0.0000157163 inertia_xy=-0.000002481 inertia_xz=0.0000018174
        inertia_yz=-0.0000060299 meshes=new_stretched-digiti_pedis_r.obj
      CustomJoint right_calx_right_hindpaw: parent_body=right_calx location_in_parent=(0 0 -0.1343318) location=(0 0 0)
        Coordinate right_r_hindpaw_sagittal: default_value=0 initial_value=0 range=(-3.141593 3.141593) clamped=true
        Coordinate right_r_hindpaw_frontal: default_value=0 initial_value=0 range=(-1.570796 1.570796) clamped=true
        Coordinate right_r_hindpaw_horizontal: default_value=0 initial_value=0 range=(-1.570796 1.570796) clamped=true
        SpatialTransform: axes_held_at_zero=(translation1 translation2 translation3)
          TransformAxis rotation1: axis=(1 0 0) coordinates=right_r_hindpaw_sagittal LinearFunction(coefficients=1 0)
          TransformAxis rotation2: axis=(0 1 0) coordinates=right_r_hindpaw_frontal LinearFunction(coefficients=1 0)
          TransformAxis rotation3: axis=(0 0 1) coordinates=right_r_hindpaw_horizontal LinearFunction(coefficients=1 0)
